// SBML level 3 version 1

model Sivakumar2011_NotchSignalingPathway()
  // Sivakumar2011 - Notch Signaling Pathway
  // Notch is a transmembrane receptor that mediates local cell-cell communication and coordinates a signaling cascade. It plays a key role in modulating cell fate decisions throughout the development of invertebrate and vertebrate species and the misregulation leads to a number of human diseases.
  // Notch signaling: from the outside in.
  // Notch signaling in hematopoiesis and early lymphocyte development.
  // An overview of the Notch signalling pathway.
  // Notch and cancer: best to avoid the ups and downs.
  // Notch signaling: control of cell communication and cell fate.
  // This model is described in the article:
  // A systems biology approach to model neural stem cell regulation by notch, shh, wnt, and EGF signaling pathways.
  // Sivakumar KC, Dhanesh SB, Shobana S, James J, Mundayoor S.
  // Omics: a Journal of Integrative Biology. 2011; 15(10):729-737
  // Abstract:
  // The Notch, Sonic Hedgehog (Shh), Wnt, and EGF pathways have long been known to influence cell fate specification in the developing nervous system. Here we attempted to evaluate the contemporary knowledge about neural stem cell differentiation promoted by various drug-based regulations through a systems biology approach. Our model showed the phenomenon of DAPT-mediated antagonism of Enhancer of split [E(spl)] genes and enhancement of Shh target genes by a SAG agonist that were effectively demonstrated computationally and were consistent with experimental studies. However, in the case of model simulation of Wnt and EGF pathways, the model network did not supply any concurrent results with experimental data despite the fact that drugs were added at the appropriate positions. This paves insight into the potential of crosstalks between pathways considered in our study. Therefore, we manually developed a map of signaling crosstalk, which included the species connected by representatives from Notch, Shh, Wnt, and EGF pathways and highlighted the regulation of a single target gene, Hes-1, based on drug-induced simulations. These simulations provided results that matched with experimental studies. Therefore, these signaling crosstalk models complement as a tool toward the discovery of novel regulatory processes involved in neural stem cell maintenance, proliferation, and differentiation during mammalian central nervous system development. To our knowledge, this is the first report of a simple crosstalk map that highlights the differential regulation of neural stem cell differentiation and underscores the flow of positive and negative regulatory signals modulated by drugs.
  // This model is hosted on BioModels Database and identified by: BIOMD0000000396.
  // To cite BioModels Database, please use: BioModels Database: An enhanced, curated and annotated resource for published quantitative kinetic models.
  // To the extent possible under law, all copyright and related or neighbouring rights to this encoded model have been dedicated to the public domain worldwide. Please refer to CC0 Public Domain Dedication for more information.
  // biomodels.db:MODEL1101270000
  // biomodels.db:BIOMD0000000396
  // isDescribedBy pubmed:21978399
  // isDerivedFrom panther.pathway:P00045
  // isVersionOf GO:0007219
  // hasTaxon taxonomy:40674
  // model units - substance: substance, time: second, volume: volume, area: area, length: metre, extent: substance

  // Compartments:
  compartment default = 1 volume;
  compartment cytosol = 1 volume;
  compartment nucleus = 1 volume;
  compartment cis = 1 litre;
  compartment medial = 1 litre;
  compartment trans = 1 litre;
  compartment TGN = 1 litre;
  compartment Sec = 1 litre;

  // Species:
  // Long Name: Fringe Synonym: Lunatic Fringe,Manic Fringe,Radical Fringe Accession: P01107
  species Fringe in default = 5;  // isVersionOf uniprot:Q8NES3
  // Long Name: Delta Synonym: Delta-like1,Delta-like3,Delta-like4,DeltaC,LAG-2 Accession: P01116
  species Delta in default = 5;  // isVersionOf uniprot:O00548
  // Long Name: Notch intracellular tethered fragment Synonym: Synonym not specified Accession: P01119
  species NI_sub_c_sub_t in cytosol = 5;  // isVersionOf GO:0043234
  // Long Name: Notch transmembrane domain fragment Synonym: Synonym not specified Accession: P01114
  species N_sub_tm in cytosol = 0;  // isVersionOf GO:0043234
  // Long Name: TACE Synonym: A disintegrin and metalloproteinase domain 17,ADAM17,Tumor necrosis factor alpha converting enzyme Accession: P01105
  species TACE in cytosol = 0.5;  // isVersionOf uniprot:Q8TE56
  // Long Name: a7_degraded Synonym: Synonym not specified Accession: U02511
  species a7_degraded in default = 0;  // CHEBI:36080
  // Long Name: Neuralized Synonym: Neu Accession: P01117
  species Neuralized in default = 0.5;  // isVersionOf uniprot:Q9BR09
  // Long Name: Numb Synonym: Synonym not specified Accession: P01118
  species Numb in cytosol = 0.64;  // isHomologTo uniprot:P49757
  // Long Name: Mastermind Synonym: MECT-1,Mastermind-like 1 (MAML1),Mastermind-like2 (MAML2),Mastermind-like3(MAML3),mucoepidermoid carcinoma-translocated 1 Accession: P01106
  species Mastermind in nucleus = 0.5;  // isVersionOf uniprot:Q92585
  // Long Name: Suppressor of Hairless [Su(H)] Synonym: C-promoter binding factor 1,CBF1,IKJRB1,Immunoglobulin Kappa J region recombination signal-binding protein 1,LAG-1 Accession: P01101
  species Su_H in nucleus = 5; Su_H is "Su(H)";  // isVersionOf uniprot:P28159
  // Long Name: Co-repressors Synonym: Synonym not specified Accession: P01112
  species CoR in nucleus = 5;
  // Long Name: Long Name: Suppressor of Hairless and Co-repressors Synonym: Synonym not specified Accession: U05412 Heterodimer Member Info: Su(H)#PROTEIN#Suppressor of Hairless [Su(H)]#P01101#C-promoter binding factor 1|CBF1|IKJRB1|Immunoglobulin Kappa J region recombination signal-binding protein 1|LAG-1#;CoR#PROTEIN#Co-repressors#P01112##
  species Complex_br__Su_H_CoR in nucleus = 0; Complex_br__Su_H_CoR is "Complex_br_(Su(H)/CoR)";  // isVersionOf GO:0043234
  // Long Name: Co-Activators Synonym: Synonym not specified Accession: P01100
  species CoA in nucleus = 0.5;  // isVersionOf CHEBI:36080
  // Long Name: Notch intracellular soluble fragment Synonym: Synonym not specified Accession: P01120
  species s24 in nucleus = 0; s24 is "NI_sub_c_sub_s";  // isVersionOf GO:0043234
  // Long Name: Long Name: Long name not specified Synonym: Synonym not specified Accession: U05413 Heterodimer Member Info: CoA#PROTEIN#Co-Activators#P01100##;Su(H)#PROTEIN#Suppressor of Hairless [Su(H)]#P01101#C-promoter binding factor 1|CBF1|IKJRB1|Immunoglobulin Kappa J region recombination signal-binding protein 1|LAG-1#;Mastermind#PROTEIN#Mastermind#P01106#MECT-1|Mastermind-like 1 (MAML1)|Mastermind-like2 (MAML2)|Mastermind-like3(MAML3)|mucoepidermoid carcinoma-translocated 1#;NIcs#PROTEIN#Notch intracellular soluble fragment#P01120##
  species s35 in nucleus = 0; s35 is "Complex_br_(Mastermind/Su(H)/_br_CoA/NI_sub_c_sub_s)";  // isVersionOf GO:0043234
  // Long Name: Notch intracellular soluble fragment Synonym: Synonym not specified Accession: P01120
  species s37 in nucleus = 0; s37 is "NI_sub_c_sub_s_";  // isVersionOf GO:0043234
  // Long Name: Sel 10 Synonym: Synonym not specified Accession: P01102
  species Sel10 in nucleus = 0.6;  // isHomologTo uniprot:Q9UBV2
  // Long Name: Ubiquitin Synonym: Synonym not specified Accession: S01796
  species Ub in nucleus = 0.5;  // CCO:F0004655
  // Long Name: a46_degraded Synonym: Synonym not specified Accession: U02510
  species a46_degraded in nucleus = 0;  // CHEBI:36080
  // Long Name: Long Name: Delta and Notch extracellular fragment Synonym: Synonym not specified Accession: U05409 Heterodimer Member Info: Next#PROTEIN#Serrate and Notch extracellular fragment#P01103##;Delta#PROTEIN#Delta#P01116#Delta-like1|Delta-like3|Delta-like4|DeltaC|LAG-2#
  species Complex_br__Delta_N_sub_ext in default = 0; Complex_br__Delta_N_sub_ext is "Complex_br_(Delta/N_sub_ext)";  // isVersionOf GO:0043234
  // Long Name: Notch Synonym: GLP-1,LIN-12,Notch1,Notch2,Notch3,Notch4 Accession: P01099
  species s41 in cytosol = 0; s41 is "Notch";  // isVersionOf uniprot:Q6IAD4
  species s1 in cytosol = 5; s1 is "Notch_";
  // Long Name: Serrate Synonym: APX-1,F16B12.2,Jagged1,Jagged2 Accession: P01104
  species Serrate in default = 5;  // isHomologTo uniprot:Q6SPF9
  // Long Name: Long Name: Serrate and Notch (fucosylated) Synonym: Synonym not specified Accession: U05410 Heterodimer Member Info: Notch#PROTEIN#Notch#P01099#GLP-1|LIN-12|Notch1|Notch2|Notch3|Notch4#;Serrate#PROTEIN#Serrate#P01104#APX-1|F16B12.2|Jagged1|Jagged2#
  species Complex_br__Serrate_Notch in cytosol = 0; Complex_br__Serrate_Notch is "Complex_br_(Serrate/Notch)";  // isVersionOf GO:0043234
  // Long Name: Long Name: Serrate and Notch extracellular fragment Synonym: Synonym not specified Accession: U05414 Heterodimer Member Info: Next#PROTEIN#Serrate and Notch extracellular fragment#P01103##;Serrate#PROTEIN#Serrate#P01104#APX-1|F16B12.2|Jagged1|Jagged2#
  species Complex_br__Serrate_N_sub_ext in default = 0; Complex_br__Serrate_N_sub_ext is "Complex_br_(Serrate/N_sub_ext)";  // isVersionOf GO:0043234
  // Long Name: Notch intracellular soluble fragment Synonym: Synonym not specified Accession: P01120
  species NI_sub_c_sub_s_cytosol in cytosol = 0; NI_sub_c_sub_s_cytosol is "NI_sub_c_sub_s__";  // isVersionOf GO:0043234
  // Long Name: a25_degraded Synonym: Synonym not specified Accession: U02509
  species a25_degraded in cytosol = 0;
  // Long Name: LNXp80 Synonym: Ligand of Numb-protein X 80 kDa Accession: P01111
  species LNXp80 in cytosol = 0.33;  // isHomologTo uniprot:O70263
  // Long Name: Long Name: Delta and Notch (fucosylated) Synonym: Synonym not specified Accession: U05411 Heterodimer Member Info: Notch#PROTEIN#Notch#P01099#GLP-1|LIN-12|Notch1|Notch2|Notch3|Notch4#;Delta#PROTEIN#Delta#P01116#Delta-like1|Delta-like3|Delta-like4|DeltaC|LAG-2#
  species Complex_br__Notch_Delta in cytosol = 0; Complex_br__Notch_Delta is "Complex_br_(Notch/Delta)";  // isVersionOf GO:0043234
  // Long Name: Enhancer of Split complex genes Synonym: Synonym not specified Accession: G01541
  species E_spl_Cgenes in nucleus = 0; E_spl_Cgenes is "E(spl)-Cgenes";  // isHomologTo uniprot:Q5S414
  species s76 in default = 5;  // isVersionOf CCO:U0000005
  species s77 in default = 5;  // isVersionOf CCO:U0000005
  species dapt in default = 0;  // isVersionOf CCO:U0000005
  species gamasecretase in default = 0;  // hasPart uniprot:Q9NZ42 uniprot:Q96BI3
  species s1_cis_OFUT1 in cis = 1e-6;
  species s1_cis_Fringe in cis = 1e-6;
  species s1_cis_UDP_Fuc in cis = 1e-6;
  species s1_cis_UDP in cis = 1e-6;
  species s1_cis_UDP_GlcNAc in cis = 1e-6;
  species s1_cis_sO0 in cis = 1e-6; s1_cis_sO0 is "cis_;Notch_:8/;Notch_:9/;Notch_:12";
  species s1_cis_sO3 in cis = 0; s1_cis_sO3 is "cis_;Notch_:8/Fa;Notch_:9/;Notch_:12";
  species s1_cis_sO1 in cis = 0; s1_cis_sO1 is "cis_;Notch_:8/;Notch_:9/Fa;Notch_:12";
  species s1_cis_sO4 in cis = 0; s1_cis_sO4 is "cis_;Notch_:8/Fa;Notch_:9/Fa;Notch_:12";
  species s1_cis_sO2 in cis = 0; s1_cis_sO2 is "cis_;Notch_:8/;Notch_:9/GNb3Fa;Notch_:12";
  species s1_cis_sO5 in cis = 0; s1_cis_sO5 is "cis_;Notch_:8/Fa;Notch_:9/GNb3Fa;Notch_:12";
  species s1_cis_sO9 in cis = 0; s1_cis_sO9 is "cis_Fa;Notch_:8/;Notch_:9/;Notch_:12";
  species s1_cis_sO12 in cis = 0; s1_cis_sO12 is "cis_Fa;Notch_:8/Fa;Notch_:9/;Notch_:12";
  species s1_cis_sO10 in cis = 0; s1_cis_sO10 is "cis_Fa;Notch_:8/;Notch_:9/Fa;Notch_:12";
  species s1_cis_sO13 in cis = 0; s1_cis_sO13 is "cis_Fa;Notch_:8/Fa;Notch_:9/Fa;Notch_:12";
  species s1_cis_sO11 in cis = 0; s1_cis_sO11 is "cis_Fa;Notch_:8/;Notch_:9/GNb3Fa;Notch_:12";
  species s1_cis_sO14 in cis = 0; s1_cis_sO14 is "cis_Fa;Notch_:8/Fa;Notch_:9/GNb3Fa;Notch_:12";
  species s1_cis_sO18 in cis = 0; s1_cis_sO18 is "cis_GNb3Fa;Notch_:8/;Notch_:9/;Notch_:12";
  species s1_cis_sO21 in cis = 0; s1_cis_sO21 is "cis_GNb3Fa;Notch_:8/Fa;Notch_:9/;Notch_:12";
  species s1_cis_sO19 in cis = 0; s1_cis_sO19 is "cis_GNb3Fa;Notch_:8/;Notch_:9/Fa;Notch_:12";
  species s1_cis_sO22 in cis = 0; s1_cis_sO22 is "cis_GNb3Fa;Notch_:8/Fa;Notch_:9/Fa;Notch_:12";
  species s1_cis_sO20 in cis = 0; s1_cis_sO20 is "cis_GNb3Fa;Notch_:8/;Notch_:9/GNb3Fa;Notch_:12";
  species s1_cis_sO23 in cis = 0; s1_cis_sO23 is "cis_GNb3Fa;Notch_:8/Fa;Notch_:9/GNb3Fa;Notch_:12";
  species s1_cis_sO6 in cis = 0; s1_cis_sO6 is "cis_;Notch_:8/GNb3Fa;Notch_:9/;Notch_:12";
  species s1_cis_sO7 in cis = 0; s1_cis_sO7 is "cis_;Notch_:8/GNb3Fa;Notch_:9/Fa;Notch_:12";
  species s1_cis_sO8 in cis = 0; s1_cis_sO8 is "cis_;Notch_:8/GNb3Fa;Notch_:9/GNb3Fa;Notch_:12";
  species s1_cis_sO15 in cis = 0; s1_cis_sO15 is "cis_Fa;Notch_:8/GNb3Fa;Notch_:9/;Notch_:12";
  species s1_cis_sO16 in cis = 0; s1_cis_sO16 is "cis_Fa;Notch_:8/GNb3Fa;Notch_:9/Fa;Notch_:12";
  species s1_cis_sO17 in cis = 0; s1_cis_sO17 is "cis_Fa;Notch_:8/GNb3Fa;Notch_:9/GNb3Fa;Notch_:12";
  species s1_cis_sO24 in cis = 0; s1_cis_sO24 is "cis_GNb3Fa;Notch_:8/GNb3Fa;Notch_:9/;Notch_:12";
  species s1_cis_sO25 in cis = 0; s1_cis_sO25 is "cis_GNb3Fa;Notch_:8/GNb3Fa;Notch_:9/Fa;Notch_:12";
  species s1_medial_OFUT1 in medial = 1e-6;
  species s1_medial_Fringe in medial = 1e-6;
  species s1_medial_UDP_Fuc in medial = 1e-6;
  species s1_medial_UDP in medial = 1e-6;
  species s1_medial_UDP_GlcNAc in medial = 1e-6;
  species s1_medial_sO0 in medial = 0; s1_medial_sO0 is "medial_;Notch_:8/;Notch_:9/;Notch_:12";
  species s1_medial_sO3 in medial = 0; s1_medial_sO3 is "medial_;Notch_:8/Fa;Notch_:9/;Notch_:12";
  species s1_medial_sO1 in medial = 0; s1_medial_sO1 is "medial_;Notch_:8/;Notch_:9/Fa;Notch_:12";
  species s1_medial_sO4 in medial = 0; s1_medial_sO4 is "medial_;Notch_:8/Fa;Notch_:9/Fa;Notch_:12";
  species s1_medial_sO2 in medial = 0; s1_medial_sO2 is "medial_;Notch_:8/;Notch_:9/GNb3Fa;Notch_:12";
  species s1_medial_sO5 in medial = 0; s1_medial_sO5 is "medial_;Notch_:8/Fa;Notch_:9/GNb3Fa;Notch_:12";
  species s1_medial_sO9 in medial = 0; s1_medial_sO9 is "medial_Fa;Notch_:8/;Notch_:9/;Notch_:12";
  species s1_medial_sO12 in medial = 0; s1_medial_sO12 is "medial_Fa;Notch_:8/Fa;Notch_:9/;Notch_:12";
  species s1_medial_sO10 in medial = 0; s1_medial_sO10 is "medial_Fa;Notch_:8/;Notch_:9/Fa;Notch_:12";
  species s1_medial_sO13 in medial = 0; s1_medial_sO13 is "medial_Fa;Notch_:8/Fa;Notch_:9/Fa;Notch_:12";
  species s1_medial_sO11 in medial = 0; s1_medial_sO11 is "medial_Fa;Notch_:8/;Notch_:9/GNb3Fa;Notch_:12";
  species s1_medial_sO14 in medial = 0; s1_medial_sO14 is "medial_Fa;Notch_:8/Fa;Notch_:9/GNb3Fa;Notch_:12";
  species s1_medial_sO18 in medial = 0; s1_medial_sO18 is "medial_GNb3Fa;Notch_:8/;Notch_:9/;Notch_:12";
  species s1_medial_sO21 in medial = 0; s1_medial_sO21 is "medial_GNb3Fa;Notch_:8/Fa;Notch_:9/;Notch_:12";
  species s1_medial_sO19 in medial = 0; s1_medial_sO19 is "medial_GNb3Fa;Notch_:8/;Notch_:9/Fa;Notch_:12";
  species s1_medial_sO22 in medial = 0; s1_medial_sO22 is "medial_GNb3Fa;Notch_:8/Fa;Notch_:9/Fa;Notch_:12";
  species s1_medial_sO20 in medial = 0; s1_medial_sO20 is "medial_GNb3Fa;Notch_:8/;Notch_:9/GNb3Fa;Notch_:12";
  species s1_medial_sO23 in medial = 0; s1_medial_sO23 is "medial_GNb3Fa;Notch_:8/Fa;Notch_:9/GNb3Fa;Notch_:12";
  species s1_medial_sO6 in medial = 0; s1_medial_sO6 is "medial_;Notch_:8/GNb3Fa;Notch_:9/;Notch_:12";
  species s1_medial_sO7 in medial = 0; s1_medial_sO7 is "medial_;Notch_:8/GNb3Fa;Notch_:9/Fa;Notch_:12";
  species s1_medial_sO8 in medial = 0; s1_medial_sO8 is "medial_;Notch_:8/GNb3Fa;Notch_:9/GNb3Fa;Notch_:12";
  species s1_medial_sO15 in medial = 0; s1_medial_sO15 is "medial_Fa;Notch_:8/GNb3Fa;Notch_:9/;Notch_:12";
  species s1_medial_sO16 in medial = 0; s1_medial_sO16 is "medial_Fa;Notch_:8/GNb3Fa;Notch_:9/Fa;Notch_:12";
  species s1_medial_sO17 in medial = 0; s1_medial_sO17 is "medial_Fa;Notch_:8/GNb3Fa;Notch_:9/GNb3Fa;Notch_:12";
  species s1_medial_sO24 in medial = 0; s1_medial_sO24 is "medial_GNb3Fa;Notch_:8/GNb3Fa;Notch_:9/;Notch_:12";
  species s1_medial_sO25 in medial = 0; s1_medial_sO25 is "medial_GNb3Fa;Notch_:8/GNb3Fa;Notch_:9/Fa;Notch_:12";
  species s1_trans_OFUT1 in trans = 1e-6;
  species s1_trans_Fringe in trans = 1e-6;
  species s1_trans_UDP_Fuc in trans = 1e-6;
  species s1_trans_UDP in trans = 1e-6;
  species s1_trans_UDP_GlcNAc in trans = 1e-6;
  species s1_trans_sO0 in trans = 0; s1_trans_sO0 is "trans_;Notch_:8/;Notch_:9/;Notch_:12";
  species s1_trans_sO3 in trans = 0; s1_trans_sO3 is "trans_;Notch_:8/Fa;Notch_:9/;Notch_:12";
  species s1_trans_sO1 in trans = 0; s1_trans_sO1 is "trans_;Notch_:8/;Notch_:9/Fa;Notch_:12";
  species s1_trans_sO4 in trans = 0; s1_trans_sO4 is "trans_;Notch_:8/Fa;Notch_:9/Fa;Notch_:12";
  species s1_trans_sO2 in trans = 0; s1_trans_sO2 is "trans_;Notch_:8/;Notch_:9/GNb3Fa;Notch_:12";
  species s1_trans_sO5 in trans = 0; s1_trans_sO5 is "trans_;Notch_:8/Fa;Notch_:9/GNb3Fa;Notch_:12";
  species s1_trans_sO9 in trans = 0; s1_trans_sO9 is "trans_Fa;Notch_:8/;Notch_:9/;Notch_:12";
  species s1_trans_sO12 in trans = 0; s1_trans_sO12 is "trans_Fa;Notch_:8/Fa;Notch_:9/;Notch_:12";
  species s1_trans_sO10 in trans = 0; s1_trans_sO10 is "trans_Fa;Notch_:8/;Notch_:9/Fa;Notch_:12";
  species s1_trans_sO13 in trans = 0; s1_trans_sO13 is "trans_Fa;Notch_:8/Fa;Notch_:9/Fa;Notch_:12";
  species s1_trans_sO11 in trans = 0; s1_trans_sO11 is "trans_Fa;Notch_:8/;Notch_:9/GNb3Fa;Notch_:12";
  species s1_trans_sO14 in trans = 0; s1_trans_sO14 is "trans_Fa;Notch_:8/Fa;Notch_:9/GNb3Fa;Notch_:12";
  species s1_trans_sO18 in trans = 0; s1_trans_sO18 is "trans_GNb3Fa;Notch_:8/;Notch_:9/;Notch_:12";
  species s1_trans_sO21 in trans = 0; s1_trans_sO21 is "trans_GNb3Fa;Notch_:8/Fa;Notch_:9/;Notch_:12";
  species s1_trans_sO19 in trans = 0; s1_trans_sO19 is "trans_GNb3Fa;Notch_:8/;Notch_:9/Fa;Notch_:12";
  species s1_trans_sO22 in trans = 0; s1_trans_sO22 is "trans_GNb3Fa;Notch_:8/Fa;Notch_:9/Fa;Notch_:12";
  species s1_trans_sO20 in trans = 0; s1_trans_sO20 is "trans_GNb3Fa;Notch_:8/;Notch_:9/GNb3Fa;Notch_:12";
  species s1_trans_sO23 in trans = 0; s1_trans_sO23 is "trans_GNb3Fa;Notch_:8/Fa;Notch_:9/GNb3Fa;Notch_:12";
  species s1_trans_sO6 in trans = 0; s1_trans_sO6 is "trans_;Notch_:8/GNb3Fa;Notch_:9/;Notch_:12";
  species s1_trans_sO7 in trans = 0; s1_trans_sO7 is "trans_;Notch_:8/GNb3Fa;Notch_:9/Fa;Notch_:12";
  species s1_trans_sO8 in trans = 0; s1_trans_sO8 is "trans_;Notch_:8/GNb3Fa;Notch_:9/GNb3Fa;Notch_:12";
  species s1_trans_sO15 in trans = 0; s1_trans_sO15 is "trans_Fa;Notch_:8/GNb3Fa;Notch_:9/;Notch_:12";
  species s1_trans_sO16 in trans = 0; s1_trans_sO16 is "trans_Fa;Notch_:8/GNb3Fa;Notch_:9/Fa;Notch_:12";
  species s1_trans_sO17 in trans = 0; s1_trans_sO17 is "trans_Fa;Notch_:8/GNb3Fa;Notch_:9/GNb3Fa;Notch_:12";
  species s1_trans_sO24 in trans = 0; s1_trans_sO24 is "trans_GNb3Fa;Notch_:8/GNb3Fa;Notch_:9/;Notch_:12";
  species s1_trans_sO25 in trans = 0; s1_trans_sO25 is "trans_GNb3Fa;Notch_:8/GNb3Fa;Notch_:9/Fa;Notch_:12";
  species s1_TGN_OFUT1 in TGN = 1e-6;
  species s1_TGN_Fringe in TGN = 1e-6;
  species s1_TGN_UDP_Fuc in TGN = 1e-6;
  species s1_TGN_UDP in TGN = 1e-6;
  species s1_TGN_UDP_GlcNAc in TGN = 1e-6;
  species s1_TGN_sO0 in TGN = 0; s1_TGN_sO0 is "TGN_;Notch_:8/;Notch_:9/;Notch_:12";
  species s1_TGN_sO3 in TGN = 0; s1_TGN_sO3 is "TGN_;Notch_:8/Fa;Notch_:9/;Notch_:12";
  species s1_TGN_sO1 in TGN = 0; s1_TGN_sO1 is "TGN_;Notch_:8/;Notch_:9/Fa;Notch_:12";
  species s1_TGN_sO4 in TGN = 0; s1_TGN_sO4 is "TGN_;Notch_:8/Fa;Notch_:9/Fa;Notch_:12";
  species s1_TGN_sO2 in TGN = 0; s1_TGN_sO2 is "TGN_;Notch_:8/;Notch_:9/GNb3Fa;Notch_:12";
  species s1_TGN_sO5 in TGN = 0; s1_TGN_sO5 is "TGN_;Notch_:8/Fa;Notch_:9/GNb3Fa;Notch_:12";
  species s1_TGN_sO9 in TGN = 0; s1_TGN_sO9 is "TGN_Fa;Notch_:8/;Notch_:9/;Notch_:12";
  species s1_TGN_sO12 in TGN = 0; s1_TGN_sO12 is "TGN_Fa;Notch_:8/Fa;Notch_:9/;Notch_:12";
  species s1_TGN_sO10 in TGN = 0; s1_TGN_sO10 is "TGN_Fa;Notch_:8/;Notch_:9/Fa;Notch_:12";
  species s1_TGN_sO13 in TGN = 0; s1_TGN_sO13 is "TGN_Fa;Notch_:8/Fa;Notch_:9/Fa;Notch_:12";
  species s1_TGN_sO11 in TGN = 0; s1_TGN_sO11 is "TGN_Fa;Notch_:8/;Notch_:9/GNb3Fa;Notch_:12";
  species s1_TGN_sO14 in TGN = 0; s1_TGN_sO14 is "TGN_Fa;Notch_:8/Fa;Notch_:9/GNb3Fa;Notch_:12";
  species s1_TGN_sO18 in TGN = 0; s1_TGN_sO18 is "TGN_GNb3Fa;Notch_:8/;Notch_:9/;Notch_:12";
  species s1_TGN_sO21 in TGN = 0; s1_TGN_sO21 is "TGN_GNb3Fa;Notch_:8/Fa;Notch_:9/;Notch_:12";
  species s1_TGN_sO19 in TGN = 0; s1_TGN_sO19 is "TGN_GNb3Fa;Notch_:8/;Notch_:9/Fa;Notch_:12";
  species s1_TGN_sO22 in TGN = 0; s1_TGN_sO22 is "TGN_GNb3Fa;Notch_:8/Fa;Notch_:9/Fa;Notch_:12";
  species s1_TGN_sO20 in TGN = 0; s1_TGN_sO20 is "TGN_GNb3Fa;Notch_:8/;Notch_:9/GNb3Fa;Notch_:12";
  species s1_TGN_sO23 in TGN = 0; s1_TGN_sO23 is "TGN_GNb3Fa;Notch_:8/Fa;Notch_:9/GNb3Fa;Notch_:12";
  species s1_TGN_sO6 in TGN = 0; s1_TGN_sO6 is "TGN_;Notch_:8/GNb3Fa;Notch_:9/;Notch_:12";
  species s1_TGN_sO7 in TGN = 0; s1_TGN_sO7 is "TGN_;Notch_:8/GNb3Fa;Notch_:9/Fa;Notch_:12";
  species s1_TGN_sO8 in TGN = 0; s1_TGN_sO8 is "TGN_;Notch_:8/GNb3Fa;Notch_:9/GNb3Fa;Notch_:12";
  species s1_TGN_sO15 in TGN = 0; s1_TGN_sO15 is "TGN_Fa;Notch_:8/GNb3Fa;Notch_:9/;Notch_:12";
  species s1_TGN_sO16 in TGN = 0; s1_TGN_sO16 is "TGN_Fa;Notch_:8/GNb3Fa;Notch_:9/Fa;Notch_:12";
  species s1_TGN_sO17 in TGN = 0; s1_TGN_sO17 is "TGN_Fa;Notch_:8/GNb3Fa;Notch_:9/GNb3Fa;Notch_:12";
  species s1_TGN_sO24 in TGN = 0; s1_TGN_sO24 is "TGN_GNb3Fa;Notch_:8/GNb3Fa;Notch_:9/;Notch_:12";
  species s1_TGN_sO25 in TGN = 0; s1_TGN_sO25 is "TGN_GNb3Fa;Notch_:8/GNb3Fa;Notch_:9/Fa;Notch_:12";
  species s1_Sec_OFUT1 in Sec = 1e-6;
  species s1_Sec_Fringe in Sec = 1e-6;
  species s1_Sec_UDP_Fuc in Sec = 1e-6;
  species s1_Sec_UDP in Sec = 1e-6;
  species s1_Sec_UDP_GlcNAc in Sec = 1e-6;
  species s1_Sec_sO0 in Sec = 0; s1_Sec_sO0 is "Sec_;Notch_:8/;Notch_:9/;Notch_:12";
  species s1_Sec_sO3 in Sec = 0; s1_Sec_sO3 is "Sec_;Notch_:8/Fa;Notch_:9/;Notch_:12";
  species s1_Sec_sO1 in Sec = 0; s1_Sec_sO1 is "Sec_;Notch_:8/;Notch_:9/Fa;Notch_:12";
  species s1_Sec_sO4 in Sec = 0; s1_Sec_sO4 is "Sec_;Notch_:8/Fa;Notch_:9/Fa;Notch_:12";
  species s1_Sec_sO2 in Sec = 0; s1_Sec_sO2 is "Sec_;Notch_:8/;Notch_:9/GNb3Fa;Notch_:12";
  species s1_Sec_sO5 in Sec = 0; s1_Sec_sO5 is "Sec_;Notch_:8/Fa;Notch_:9/GNb3Fa;Notch_:12";
  species s1_Sec_sO9 in Sec = 0; s1_Sec_sO9 is "Sec_Fa;Notch_:8/;Notch_:9/;Notch_:12";
  species s1_Sec_sO12 in Sec = 0; s1_Sec_sO12 is "Sec_Fa;Notch_:8/Fa;Notch_:9/;Notch_:12";
  species s1_Sec_sO10 in Sec = 0; s1_Sec_sO10 is "Sec_Fa;Notch_:8/;Notch_:9/Fa;Notch_:12";
  species s1_Sec_sO13 in Sec = 0; s1_Sec_sO13 is "Sec_Fa;Notch_:8/Fa;Notch_:9/Fa;Notch_:12";
  species s1_Sec_sO11 in Sec = 0; s1_Sec_sO11 is "Sec_Fa;Notch_:8/;Notch_:9/GNb3Fa;Notch_:12";
  species s1_Sec_sO14 in Sec = 0; s1_Sec_sO14 is "Sec_Fa;Notch_:8/Fa;Notch_:9/GNb3Fa;Notch_:12";
  species s1_Sec_sO18 in Sec = 0; s1_Sec_sO18 is "Sec_GNb3Fa;Notch_:8/;Notch_:9/;Notch_:12";
  species s1_Sec_sO21 in Sec = 0; s1_Sec_sO21 is "Sec_GNb3Fa;Notch_:8/Fa;Notch_:9/;Notch_:12";
  species s1_Sec_sO19 in Sec = 0; s1_Sec_sO19 is "Sec_GNb3Fa;Notch_:8/;Notch_:9/Fa;Notch_:12";
  species s1_Sec_sO22 in Sec = 0; s1_Sec_sO22 is "Sec_GNb3Fa;Notch_:8/Fa;Notch_:9/Fa;Notch_:12";
  species s1_Sec_sO20 in Sec = 0; s1_Sec_sO20 is "Sec_GNb3Fa;Notch_:8/;Notch_:9/GNb3Fa;Notch_:12";
  species s1_Sec_sO23 in Sec = 0; s1_Sec_sO23 is "Sec_GNb3Fa;Notch_:8/Fa;Notch_:9/GNb3Fa;Notch_:12";
  species s1_Sec_sO6 in Sec = 0; s1_Sec_sO6 is "Sec_;Notch_:8/GNb3Fa;Notch_:9/;Notch_:12";
  species s1_Sec_sO7 in Sec = 0; s1_Sec_sO7 is "Sec_;Notch_:8/GNb3Fa;Notch_:9/Fa;Notch_:12";
  species s1_Sec_sO8 in Sec = 0; s1_Sec_sO8 is "Sec_;Notch_:8/GNb3Fa;Notch_:9/GNb3Fa;Notch_:12";
  species s1_Sec_sO15 in Sec = 0; s1_Sec_sO15 is "Sec_Fa;Notch_:8/GNb3Fa;Notch_:9/;Notch_:12";
  species s1_Sec_sO16 in Sec = 0; s1_Sec_sO16 is "Sec_Fa;Notch_:8/GNb3Fa;Notch_:9/Fa;Notch_:12";
  species s1_Sec_sO17 in Sec = 0; s1_Sec_sO17 is "Sec_Fa;Notch_:8/GNb3Fa;Notch_:9/GNb3Fa;Notch_:12";
  species s1_Sec_sO24 in Sec = 0; s1_Sec_sO24 is "Sec_GNb3Fa;Notch_:8/GNb3Fa;Notch_:9/;Notch_:12";
  species s1_Sec_sO25 in Sec = 0; s1_Sec_sO25 is "Sec_GNb3Fa;Notch_:8/GNb3Fa;Notch_:9/Fa;Notch_:12";

  // Parameters:
  kcatp_r8 = 0.5;
  kM_r8_s15 = 1;
  kcatn_r8 = 1.5;
  kM_r8_s19 = 2;
  kM_r8_s63 = 1.5;
  kcatp_r9 = 1.5;
  kM_r9_s7 = 1;
  kcatn_r9 = 0.04;
  kM_r9_s22 = 0.05;
  kass_r10 = 2;
  kdiss_r10 = 0.01;
  kI_r10_s25 = 1;
  kcatp_r11 = 0.5;
  kM_r11_s32 = 1;
  kcatn_r11 = 0.5;
  kM_r11_s26 = 1.5;
  kM_r11_s28 = 1;
  kass_r13 = 0.5;
  kdiss_r13 = 2;
  kcatp_r16 = 1;
  kcatn_r16 = 1;
  kM_r16_s39 = 1;
  ki_r16_s39 = 1;
  kass_r17 = 1.5;
  kdiss_r17 = 1.5;
  kcatp_r18 = 1;
  kcatn_r18 = 1.5;
  kM_r18_s4 = 1;
  ki_r18_s4 = 1.5;
  kass_r21 = 1.5;
  kdiss_r21 = 1.5;
  kI_r21_s2 = 1.5;
  kcatp_r25 = 1;
  kM_r25_s53 = 1.5;
  kcatn_r25 = 1.5;
  kM_r25_s60 = 1.25;
  kM_r25_s15 = 1.5;
  kcatp_r26 = 0.5;
  kM_r26_s25 = 1.7;
  kcatn_r26 = 1;
  kM_r26_s64 = 1.61;
  kcatp_r28 = 1.71;
  kcatn_r28 = 1.48;
  kM_r28_s41 = 1.64;
  ki_r28_s41 = 1.28;
  kcatp_r29 = 1.86;
  kM_r29_s67 = 1.61;
  kcatn_r29 = 1.78;
  kM_r29_s18 = 0.15;
  kM_r29_s15 = 1.87;
  kass_r30 = 1.95;
  kass_r31 = 0.055;
  kdiss_r31 = 2;
  kass_re16 = 0.004;
  kdiss_re16 = 2;
  kI_re16_s81 = 0.00594;
  OFUT1_kf_OR0_0 = 1 per_minute;
  OFUT1_Km_OR0_0 = 1 micro_molar;
  OFUT1_kf_OR0_1 = 1 per_minute;
  OFUT1_Km_OR0_1 = 1 micro_molar;
  OFUT1_kf_OR0_2 = 1 per_minute;
  OFUT1_Km_OR0_2 = 1 micro_molar;
  OFUT1_kf_OR0_3 = 1 per_minute;
  OFUT1_Km_OR0_3 = 1 micro_molar;
  OFUT1_kf_OR0_4 = 1 per_minute;
  OFUT1_Km_OR0_4 = 1 micro_molar;
  OFUT1_kf_OR0_5 = 1 per_minute;
  OFUT1_Km_OR0_5 = 1 micro_molar;
  OFUT1_kf_OR0_6 = 1 per_minute;
  OFUT1_Km_OR0_6 = 1 micro_molar;
  OFUT1_kf_OR0_7 = 1 per_minute;
  OFUT1_Km_OR0_7 = 1 micro_molar;
  OFUT1_kf_OR0_8 = 1 per_minute;
  OFUT1_Km_OR0_8 = 1 micro_molar;
  Fringe_kf_OR1_0 = 1 per_minute;
  Fringe_Km_OR1_0 = 1 micro_molar;
  Fringe_kf_OR1_1 = 1 per_minute;
  Fringe_Km_OR1_1 = 1 micro_molar;
  Fringe_kf_OR1_2 = 1 per_minute;
  Fringe_Km_OR1_2 = 1 micro_molar;
  Fringe_kf_OR1_3 = 1 per_minute;
  Fringe_Km_OR1_3 = 1 micro_molar;
  Fringe_kf_OR1_4 = 1 per_minute;
  Fringe_Km_OR1_4 = 1 micro_molar;
  Fringe_kf_OR1_5 = 1 per_minute;
  Fringe_Km_OR1_5 = 1 micro_molar;
  Fringe_kf_OR1_6 = 1 per_minute;
  Fringe_Km_OR1_6 = 1 micro_molar;
  Fringe_kf_OR1_7 = 1 per_minute;
  Fringe_Km_OR1_7 = 1 micro_molar;
  OFUT1_kf_OR2_0 = 1 per_minute;
  OFUT1_Km_OR2_0 = 1 micro_molar;
  OFUT1_kf_OR2_1 = 1 per_minute;
  OFUT1_Km_OR2_1 = 1 micro_molar;
  OFUT1_kf_OR2_2 = 1 per_minute;
  OFUT1_Km_OR2_2 = 1 micro_molar;
  OFUT1_kf_OR2_3 = 1 per_minute;
  OFUT1_Km_OR2_3 = 1 micro_molar;
  OFUT1_kf_OR2_4 = 1 per_minute;
  OFUT1_Km_OR2_4 = 1 micro_molar;
  OFUT1_kf_OR2_5 = 1 per_minute;
  OFUT1_Km_OR2_5 = 1 micro_molar;
  OFUT1_kf_OR2_6 = 1 per_minute;
  OFUT1_Km_OR2_6 = 1 micro_molar;
  OFUT1_kf_OR2_7 = 1 per_minute;
  OFUT1_Km_OR2_7 = 1 micro_molar;
  OFUT1_kf_OR2_8 = 1 per_minute;
  OFUT1_Km_OR2_8 = 1 micro_molar;
  Fringe_kf_OR3_0 = 1 per_minute;
  Fringe_Km_OR3_0 = 1 micro_molar;
  Fringe_kf_OR3_1 = 1 per_minute;
  Fringe_Km_OR3_1 = 1 micro_molar;
  Fringe_kf_OR3_2 = 1 per_minute;
  Fringe_Km_OR3_2 = 1 micro_molar;
  Fringe_kf_OR3_3 = 1 per_minute;
  Fringe_Km_OR3_3 = 1 micro_molar;
  Fringe_kf_OR3_4 = 1 per_minute;
  Fringe_Km_OR3_4 = 1 micro_molar;
  Fringe_kf_OR3_5 = 1 per_minute;
  Fringe_Km_OR3_5 = 1 micro_molar;
  Fringe_kf_OR3_6 = 1 per_minute;
  Fringe_Km_OR3_6 = 1 micro_molar;
  Fringe_kf_OR3_7 = 1 per_minute;
  Fringe_Km_OR3_7 = 1 micro_molar;
  OFUT1_kf_OR4_0 = 1 per_minute;
  OFUT1_Km_OR4_0 = 1 micro_molar;
  OFUT1_kf_OR4_1 = 1 per_minute;
  OFUT1_Km_OR4_1 = 1 micro_molar;
  OFUT1_kf_OR4_2 = 1 per_minute;
  OFUT1_Km_OR4_2 = 1 micro_molar;
  OFUT1_kf_OR4_3 = 1 per_minute;
  OFUT1_Km_OR4_3 = 1 micro_molar;
  OFUT1_kf_OR4_4 = 1 per_minute;
  OFUT1_Km_OR4_4 = 1 micro_molar;
  OFUT1_kf_OR4_5 = 1 per_minute;
  OFUT1_Km_OR4_5 = 1 micro_molar;
  OFUT1_kf_OR4_6 = 1 per_minute;
  OFUT1_Km_OR4_6 = 1 micro_molar;
  OFUT1_kf_OR4_7 = 1 per_minute;
  OFUT1_Km_OR4_7 = 1 micro_molar;
  OFUT1_kf_OR4_8 = 1 per_minute;
  OFUT1_Km_OR4_8 = 1 micro_molar;
  Fringe_kf_OR5_0 = 1 per_minute;
  Fringe_Km_OR5_0 = 1 micro_molar;
  Fringe_kf_OR5_1 = 1 per_minute;
  Fringe_Km_OR5_1 = 1 micro_molar;
  Fringe_kf_OR5_2 = 1 per_minute;
  Fringe_Km_OR5_2 = 1 micro_molar;
  Fringe_kf_OR5_3 = 1 per_minute;
  Fringe_Km_OR5_3 = 1 micro_molar;
  Fringe_kf_OR5_4 = 1 per_minute;
  Fringe_Km_OR5_4 = 1 micro_molar;
  Fringe_kf_OR5_5 = 1 per_minute;
  Fringe_Km_OR5_5 = 1 micro_molar;
  Fringe_kf_OR5_6 = 1 per_minute;
  Fringe_Km_OR5_6 = 1 micro_molar;
  Fringe_kf_OR5_7 = 1 per_minute;
  Fringe_Km_OR5_7 = 1 micro_molar;
  cis_transport_O0 = 0.18 per_minute;
  cis_transport_O3 = 0.18 per_minute;
  cis_transport_O1 = 0.18 per_minute;
  cis_transport_O4 = 0.18 per_minute;
  cis_transport_O2 = 0.18 per_minute;
  cis_transport_O5 = 0.18 per_minute;
  cis_transport_O9 = 0.18 per_minute;
  cis_transport_O12 = 0.18 per_minute;
  cis_transport_O10 = 0.18 per_minute;
  cis_transport_O13 = 0.18 per_minute;
  cis_transport_O11 = 0.18 per_minute;
  cis_transport_O14 = 0.18 per_minute;
  cis_transport_O18 = 0.18 per_minute;
  cis_transport_O21 = 0.18 per_minute;
  cis_transport_O19 = 0.18 per_minute;
  cis_transport_O22 = 0.18 per_minute;
  cis_transport_O20 = 0.18 per_minute;
  cis_transport_O23 = 0.18 per_minute;
  cis_transport_O6 = 0.18 per_minute;
  cis_transport_O7 = 0.18 per_minute;
  cis_transport_O8 = 0.18 per_minute;
  cis_transport_O15 = 0.18 per_minute;
  cis_transport_O16 = 0.18 per_minute;
  cis_transport_O17 = 0.18 per_minute;
  cis_transport_O24 = 0.18 per_minute;
  cis_transport_O25 = 0.18 per_minute;
  medial_transport_O0 = 0.18 per_minute;
  medial_transport_O3 = 0.18 per_minute;
  medial_transport_O1 = 0.18 per_minute;
  medial_transport_O4 = 0.18 per_minute;
  medial_transport_O2 = 0.18 per_minute;
  medial_transport_O5 = 0.18 per_minute;
  medial_transport_O9 = 0.18 per_minute;
  medial_transport_O12 = 0.18 per_minute;
  medial_transport_O10 = 0.18 per_minute;
  medial_transport_O13 = 0.18 per_minute;
  medial_transport_O11 = 0.18 per_minute;
  medial_transport_O14 = 0.18 per_minute;
  medial_transport_O18 = 0.18 per_minute;
  medial_transport_O21 = 0.18 per_minute;
  medial_transport_O19 = 0.18 per_minute;
  medial_transport_O22 = 0.18 per_minute;
  medial_transport_O20 = 0.18 per_minute;
  medial_transport_O23 = 0.18 per_minute;
  medial_transport_O6 = 0.18 per_minute;
  medial_transport_O7 = 0.18 per_minute;
  medial_transport_O8 = 0.18 per_minute;
  medial_transport_O15 = 0.18 per_minute;
  medial_transport_O16 = 0.18 per_minute;
  medial_transport_O17 = 0.18 per_minute;
  medial_transport_O24 = 0.18 per_minute;
  medial_transport_O25 = 0.18 per_minute;
  trans_transport_O0 = 0.18 per_minute;
  trans_transport_O3 = 0.18 per_minute;
  trans_transport_O1 = 0.18 per_minute;
  trans_transport_O4 = 0.18 per_minute;
  trans_transport_O2 = 0.18 per_minute;
  trans_transport_O5 = 0.18 per_minute;
  trans_transport_O9 = 0.18 per_minute;
  trans_transport_O12 = 0.18 per_minute;
  trans_transport_O10 = 0.18 per_minute;
  trans_transport_O13 = 0.18 per_minute;
  trans_transport_O11 = 0.18 per_minute;
  trans_transport_O14 = 0.18 per_minute;
  trans_transport_O18 = 0.18 per_minute;
  trans_transport_O21 = 0.18 per_minute;
  trans_transport_O19 = 0.18 per_minute;
  trans_transport_O22 = 0.18 per_minute;
  trans_transport_O20 = 0.18 per_minute;
  trans_transport_O23 = 0.18 per_minute;
  trans_transport_O6 = 0.18 per_minute;
  trans_transport_O7 = 0.18 per_minute;
  trans_transport_O8 = 0.18 per_minute;
  trans_transport_O15 = 0.18 per_minute;
  trans_transport_O16 = 0.18 per_minute;
  trans_transport_O17 = 0.18 per_minute;
  trans_transport_O24 = 0.18 per_minute;
  trans_transport_O25 = 0.18 per_minute;
  TGN_transport_O0 = 0.18 per_minute;
  TGN_transport_O3 = 0.18 per_minute;
  TGN_transport_O1 = 0.18 per_minute;
  TGN_transport_O4 = 0.18 per_minute;
  TGN_transport_O2 = 0.18 per_minute;
  TGN_transport_O5 = 0.18 per_minute;
  TGN_transport_O9 = 0.18 per_minute;
  TGN_transport_O12 = 0.18 per_minute;
  TGN_transport_O10 = 0.18 per_minute;
  TGN_transport_O13 = 0.18 per_minute;
  TGN_transport_O11 = 0.18 per_minute;
  TGN_transport_O14 = 0.18 per_minute;
  TGN_transport_O18 = 0.18 per_minute;
  TGN_transport_O21 = 0.18 per_minute;
  TGN_transport_O19 = 0.18 per_minute;
  TGN_transport_O22 = 0.18 per_minute;
  TGN_transport_O20 = 0.18 per_minute;
  TGN_transport_O23 = 0.18 per_minute;
  TGN_transport_O6 = 0.18 per_minute;
  TGN_transport_O7 = 0.18 per_minute;
  TGN_transport_O8 = 0.18 per_minute;
  TGN_transport_O15 = 0.18 per_minute;
  TGN_transport_O16 = 0.18 per_minute;
  TGN_transport_O17 = 0.18 per_minute;
  TGN_transport_O24 = 0.18 per_minute;
  TGN_transport_O25 = 0.18 per_minute;
  transport_Notch_s1_Sec_sO0 = 0.5;
  transport_Notch_s1_Sec_sO3 = 0.5;
  transport_Notch_s1_Sec_sO1 = 0.5;
  transport_Notch_s1_Sec_sO4 = 0.5;
  transport_Notch_s1_Sec_sO2 = 0.5;
  transport_Notch_s1_Sec_sO5 = 0.5;
  transport_Notch_s1_Sec_sO9 = 0.5;
  transport_Notch_s1_Sec_sO12 = 0.5;
  transport_Notch_s1_Sec_sO10 = 0.5;
  transport_Notch_s1_Sec_sO13 = 0.5;
  transport_Notch_s1_Sec_sO11 = 0.5;
  transport_Notch_s1_Sec_sO14 = 0.5;
  transport_Notch_s1_Sec_sO18 = 0.5;
  transport_Notch_s1_Sec_sO21 = 0.5;
  transport_Notch_s1_Sec_sO19 = 0.5;
  transport_Notch_s1_Sec_sO22 = 0.5;
  transport_Notch_s1_Sec_sO20 = 0.5;
  transport_Notch_s1_Sec_sO23 = 0.5;
  transport_Notch_s1_Sec_sO6 = 0.5;
  transport_Notch_s1_Sec_sO7 = 0.5;
  transport_Notch_s1_Sec_sO8 = 0.5;
  transport_Notch_s1_Sec_sO15 = 0.5;
  transport_Notch_s1_Sec_sO16 = 0.5;
  transport_Notch_s1_Sec_sO17 = 0.5;
  transport_Notch_s1_Sec_sO24 = 0.5;
  transport_Notch_s1_Sec_sO25 = 0.5;

  // Reactions:
  r30: Complex_br__Su_H_CoR => E_spl_Cgenes; kass_r30*Complex_br__Su_H_CoR;
  r31: s35 => E_spl_Cgenes; kass_r31*s35 - kdiss_r31*E_spl_Cgenes;
  // reversible simple convenience kinetics
  r8: NI_sub_c_sub_t -> N_sub_tm + NI_sub_c_sub_s_cytosol; gamasecretase*((kcatp_r8*(NI_sub_c_sub_t/kM_r8_s15) - kcatn_r8*N_sub_tm/kM_r8_s19*(NI_sub_c_sub_s_cytosol/kM_r8_s63))/(NI_sub_c_sub_t/kM_r8_s15 + (1 + N_sub_tm/kM_r8_s19)*(1 + NI_sub_c_sub_s_cytosol/kM_r8_s63)));  // modifiers: gamasecretase
  // kinetics of non-modulated unireactant enzymes
  r9: Delta -> a7_degraded; Neuralized*((kcatp_r9/kM_r9_s7*Delta - kcatn_r9/kM_r9_s22*a7_degraded)/(1 + Delta/kM_r9_s7 + a7_degraded/kM_r9_s22));  // modifiers: Neuralized
  // mass action rate law for first order forward, first order reverse, reversible reactions, continuous scheme
  r10: NI_sub_c_sub_s_cytosol -> s24; kI_r10_s25/(kI_r10_s25 + Numb)*(kass_r10*NI_sub_c_sub_s_cytosol - kdiss_r10*s24);  // modifiers: Numb
  // reversible simple convenience kinetics
  r11: Complex_br__Su_H_CoR -> Su_H + CoR; s24*((kcatp_r11*(Complex_br__Su_H_CoR/kM_r11_s32) - kcatn_r11*Su_H/kM_r11_s26*(CoR/kM_r11_s28))/(Complex_br__Su_H_CoR/kM_r11_s32 + (1 + Su_H/kM_r11_s26)*(1 + CoR/kM_r11_s28)));  // modifiers: s24
  // mass action rate law for , reversible reactions, continuous scheme
  r13: s24 + Su_H + Mastermind + CoA -> s35; kass_r13*s24*Su_H*Mastermind*CoA - kdiss_r13*s35;
  // reversible rapid-equilibrium random order ternary-complex mechanism with one product
  r16: s24 + Ub -> s37; (kcatp_r16/(ki_r16_s39*kM_r16_s39)*Sel10*s24*Ub - kcatn_r16/kM_r16_s39*Sel10*s37)/(1 + s24/ki_r16_s39 + Ub/ki_r16_s39 + s24*Ub/(ki_r16_s39*kM_r16_s39) + s37/kM_r16_s39);  // modifiers: Sel10
  // mass action rate law for first order forward, first order reverse, reversible reactions, continuous scheme
  r17: s37 -> a46_degraded; kass_r17*s37 - kdiss_r17*a46_degraded;
  // mass action rate law for second order forward, first order reverse, reversible reactions, two reactants, continuous scheme
  r21: s41 + Serrate -> Complex_br__Serrate_Notch; kI_r21_s2/(kI_r21_s2 + Fringe)*(kass_r21*s41*Serrate - kdiss_r21*Complex_br__Serrate_Notch);  // modifiers: Fringe
  // reversible simple convenience kinetics
  r25: Complex_br__Serrate_Notch -> Complex_br__Serrate_N_sub_ext + NI_sub_c_sub_t; TACE*((kcatp_r25*(Complex_br__Serrate_Notch/kM_r25_s53) - kcatn_r25*Complex_br__Serrate_N_sub_ext/kM_r25_s60*(NI_sub_c_sub_t/kM_r25_s15))/(Complex_br__Serrate_Notch/kM_r25_s53 + (1 + Complex_br__Serrate_N_sub_ext/kM_r25_s60)*(1 + NI_sub_c_sub_t/kM_r25_s15)));  // modifiers: TACE
  // kinetics of non-modulated unireactant enzymes
  r26: Numb -> a25_degraded; LNXp80*((kcatp_r26/kM_r26_s25*Numb - kcatn_r26/kM_r26_s64*a25_degraded)/(1 + Numb/kM_r26_s25 + a25_degraded/kM_r26_s64));  // modifiers: LNXp80
  // reversible rapid-equilibrium random order ternary-complex mechanism with one product
  r28: Delta + s41 -> Complex_br__Notch_Delta; (kcatp_r28/(ki_r28_s41*kM_r28_s41)*Fringe*Delta*s41 - kcatn_r28/kM_r28_s41*Fringe*Complex_br__Notch_Delta)/(1 + Delta/ki_r28_s41 + s41/ki_r28_s41 + Delta*s41/(ki_r28_s41*kM_r28_s41) + Complex_br__Notch_Delta/kM_r28_s41);  // modifiers: Fringe
  // reversible simple convenience kinetics
  r29: Complex_br__Notch_Delta -> Complex_br__Delta_N_sub_ext + NI_sub_c_sub_t; TACE*((kcatp_r29*(Complex_br__Notch_Delta/kM_r29_s67) - kcatn_r29*Complex_br__Delta_N_sub_ext/kM_r29_s18*(NI_sub_c_sub_t/kM_r29_s15))/(Complex_br__Notch_Delta/kM_r29_s67 + (1 + Complex_br__Delta_N_sub_ext/kM_r29_s18)*(1 + NI_sub_c_sub_t/kM_r29_s15)));  // modifiers: TACE
  // mass action rate law for second order forward, first order reverse, reversible reactions, two reactants, continuous scheme
  re16: s76 + s77 -> gamasecretase; kI_re16_s81/(kI_re16_s81 + dapt)*(kass_re16*s76*s77 - kdiss_re16*gamasecretase);  // modifiers: dapt
  cis_reOR0_0: s1_cis_sO0 => s1_cis_sO3; OFUT1_kf_OR0_0*s1_cis_OFUT1*s1_cis_sO0/((1 + s1_cis_sO0/OFUT1_Km_OR0_0)*OFUT1_Km_OR0_0);  // modifiers: s1_cis_OFUT1
  cis_reOR0_1: s1_cis_sO1 => s1_cis_sO4; OFUT1_kf_OR0_1*s1_cis_OFUT1*s1_cis_sO1/((1 + s1_cis_sO0/OFUT1_Km_OR0_1)*OFUT1_Km_OR0_1);  // modifiers: s1_cis_OFUT1
  cis_reOR0_2: s1_cis_sO2 => s1_cis_sO5; OFUT1_kf_OR0_2*s1_cis_OFUT1*s1_cis_sO2/((1 + s1_cis_sO0/OFUT1_Km_OR0_2)*OFUT1_Km_OR0_2);  // modifiers: s1_cis_OFUT1
  cis_reOR0_3: s1_cis_sO9 => s1_cis_sO12; OFUT1_kf_OR0_3*s1_cis_OFUT1*s1_cis_sO9/((1 + s1_cis_sO0/OFUT1_Km_OR0_3)*OFUT1_Km_OR0_3);  // modifiers: s1_cis_OFUT1
  cis_reOR0_4: s1_cis_sO10 => s1_cis_sO13; OFUT1_kf_OR0_4*s1_cis_OFUT1*s1_cis_sO10/((1 + s1_cis_sO0/OFUT1_Km_OR0_4)*OFUT1_Km_OR0_4);  // modifiers: s1_cis_OFUT1
  cis_reOR0_5: s1_cis_sO11 => s1_cis_sO14; OFUT1_kf_OR0_5*s1_cis_OFUT1*s1_cis_sO11/((1 + s1_cis_sO0/OFUT1_Km_OR0_5)*OFUT1_Km_OR0_5);  // modifiers: s1_cis_OFUT1
  cis_reOR0_6: s1_cis_sO18 => s1_cis_sO21; OFUT1_kf_OR0_6*s1_cis_OFUT1*s1_cis_sO18/((1 + s1_cis_sO0/OFUT1_Km_OR0_6)*OFUT1_Km_OR0_6);  // modifiers: s1_cis_OFUT1
  cis_reOR0_7: s1_cis_sO19 => s1_cis_sO22; OFUT1_kf_OR0_7*s1_cis_OFUT1*s1_cis_sO19/((1 + s1_cis_sO0/OFUT1_Km_OR0_7)*OFUT1_Km_OR0_7);  // modifiers: s1_cis_OFUT1
  cis_reOR0_8: s1_cis_sO20 => s1_cis_sO23; OFUT1_kf_OR0_8*s1_cis_OFUT1*s1_cis_sO20/((1 + s1_cis_sO0/OFUT1_Km_OR0_8)*OFUT1_Km_OR0_8);  // modifiers: s1_cis_OFUT1
  cis_reOR1_0: s1_cis_sO3 => s1_cis_sO6; Fringe_kf_OR1_0*s1_cis_Fringe*s1_cis_sO3/((1 + s1_cis_sO3/Fringe_Km_OR1_0)*Fringe_Km_OR1_0);  // modifiers: s1_cis_Fringe
  cis_reOR1_1: s1_cis_sO4 => s1_cis_sO7; Fringe_kf_OR1_1*s1_cis_Fringe*s1_cis_sO4/((1 + s1_cis_sO3/Fringe_Km_OR1_1)*Fringe_Km_OR1_1);  // modifiers: s1_cis_Fringe
  cis_reOR1_2: s1_cis_sO5 => s1_cis_sO8; Fringe_kf_OR1_2*s1_cis_Fringe*s1_cis_sO5/((1 + s1_cis_sO3/Fringe_Km_OR1_2)*Fringe_Km_OR1_2);  // modifiers: s1_cis_Fringe
  cis_reOR1_3: s1_cis_sO12 => s1_cis_sO15; Fringe_kf_OR1_3*s1_cis_Fringe*s1_cis_sO12/((1 + s1_cis_sO3/Fringe_Km_OR1_3)*Fringe_Km_OR1_3);  // modifiers: s1_cis_Fringe
  cis_reOR1_4: s1_cis_sO13 => s1_cis_sO16; Fringe_kf_OR1_4*s1_cis_Fringe*s1_cis_sO13/((1 + s1_cis_sO3/Fringe_Km_OR1_4)*Fringe_Km_OR1_4);  // modifiers: s1_cis_Fringe
  cis_reOR1_5: s1_cis_sO14 => s1_cis_sO17; Fringe_kf_OR1_5*s1_cis_Fringe*s1_cis_sO14/((1 + s1_cis_sO3/Fringe_Km_OR1_5)*Fringe_Km_OR1_5);  // modifiers: s1_cis_Fringe
  cis_reOR1_6: s1_cis_sO21 => s1_cis_sO24; Fringe_kf_OR1_6*s1_cis_Fringe*s1_cis_sO21/((1 + s1_cis_sO3/Fringe_Km_OR1_6)*Fringe_Km_OR1_6);  // modifiers: s1_cis_Fringe
  cis_reOR1_7: s1_cis_sO22 => s1_cis_sO25; Fringe_kf_OR1_7*s1_cis_Fringe*s1_cis_sO22/((1 + s1_cis_sO3/Fringe_Km_OR1_7)*Fringe_Km_OR1_7);  // modifiers: s1_cis_Fringe
  cis_reOR2_0: s1_cis_sO0 => s1_cis_sO1; OFUT1_kf_OR2_0*s1_cis_OFUT1*s1_cis_sO0/((1 + s1_cis_sO0/OFUT1_Km_OR2_0)*OFUT1_Km_OR2_0);  // modifiers: s1_cis_OFUT1
  cis_reOR2_1: s1_cis_sO3 => s1_cis_sO4; OFUT1_kf_OR2_1*s1_cis_OFUT1*s1_cis_sO3/((1 + s1_cis_sO0/OFUT1_Km_OR2_1)*OFUT1_Km_OR2_1);  // modifiers: s1_cis_OFUT1
  cis_reOR2_2: s1_cis_sO6 => s1_cis_sO7; OFUT1_kf_OR2_2*s1_cis_OFUT1*s1_cis_sO6/((1 + s1_cis_sO0/OFUT1_Km_OR2_2)*OFUT1_Km_OR2_2);  // modifiers: s1_cis_OFUT1
  cis_reOR2_3: s1_cis_sO9 => s1_cis_sO10; OFUT1_kf_OR2_3*s1_cis_OFUT1*s1_cis_sO9/((1 + s1_cis_sO0/OFUT1_Km_OR2_3)*OFUT1_Km_OR2_3);  // modifiers: s1_cis_OFUT1
  cis_reOR2_4: s1_cis_sO12 => s1_cis_sO13; OFUT1_kf_OR2_4*s1_cis_OFUT1*s1_cis_sO12/((1 + s1_cis_sO0/OFUT1_Km_OR2_4)*OFUT1_Km_OR2_4);  // modifiers: s1_cis_OFUT1
  cis_reOR2_5: s1_cis_sO15 => s1_cis_sO16; OFUT1_kf_OR2_5*s1_cis_OFUT1*s1_cis_sO15/((1 + s1_cis_sO0/OFUT1_Km_OR2_5)*OFUT1_Km_OR2_5);  // modifiers: s1_cis_OFUT1
  cis_reOR2_6: s1_cis_sO18 => s1_cis_sO19; OFUT1_kf_OR2_6*s1_cis_OFUT1*s1_cis_sO18/((1 + s1_cis_sO0/OFUT1_Km_OR2_6)*OFUT1_Km_OR2_6);  // modifiers: s1_cis_OFUT1
  cis_reOR2_7: s1_cis_sO21 => s1_cis_sO22; OFUT1_kf_OR2_7*s1_cis_OFUT1*s1_cis_sO21/((1 + s1_cis_sO0/OFUT1_Km_OR2_7)*OFUT1_Km_OR2_7);  // modifiers: s1_cis_OFUT1
  cis_reOR2_8: s1_cis_sO24 => s1_cis_sO25; OFUT1_kf_OR2_8*s1_cis_OFUT1*s1_cis_sO24/((1 + s1_cis_sO0/OFUT1_Km_OR2_8)*OFUT1_Km_OR2_8);  // modifiers: s1_cis_OFUT1
  cis_reOR3_0: s1_cis_sO1 => s1_cis_sO2; Fringe_kf_OR3_0*s1_cis_Fringe*s1_cis_sO1/((1 + s1_cis_sO3/Fringe_Km_OR3_0)*Fringe_Km_OR3_0);  // modifiers: s1_cis_Fringe
  cis_reOR3_1: s1_cis_sO4 => s1_cis_sO5; Fringe_kf_OR3_1*s1_cis_Fringe*s1_cis_sO4/((1 + s1_cis_sO3/Fringe_Km_OR3_1)*Fringe_Km_OR3_1);  // modifiers: s1_cis_Fringe
  cis_reOR3_2: s1_cis_sO7 => s1_cis_sO8; Fringe_kf_OR3_2*s1_cis_Fringe*s1_cis_sO7/((1 + s1_cis_sO3/Fringe_Km_OR3_2)*Fringe_Km_OR3_2);  // modifiers: s1_cis_Fringe
  cis_reOR3_3: s1_cis_sO10 => s1_cis_sO11; Fringe_kf_OR3_3*s1_cis_Fringe*s1_cis_sO10/((1 + s1_cis_sO3/Fringe_Km_OR3_3)*Fringe_Km_OR3_3);  // modifiers: s1_cis_Fringe
  cis_reOR3_4: s1_cis_sO13 => s1_cis_sO14; Fringe_kf_OR3_4*s1_cis_Fringe*s1_cis_sO13/((1 + s1_cis_sO3/Fringe_Km_OR3_4)*Fringe_Km_OR3_4);  // modifiers: s1_cis_Fringe
  cis_reOR3_5: s1_cis_sO16 => s1_cis_sO17; Fringe_kf_OR3_5*s1_cis_Fringe*s1_cis_sO16/((1 + s1_cis_sO3/Fringe_Km_OR3_5)*Fringe_Km_OR3_5);  // modifiers: s1_cis_Fringe
  cis_reOR3_6: s1_cis_sO19 => s1_cis_sO20; Fringe_kf_OR3_6*s1_cis_Fringe*s1_cis_sO19/((1 + s1_cis_sO3/Fringe_Km_OR3_6)*Fringe_Km_OR3_6);  // modifiers: s1_cis_Fringe
  cis_reOR3_7: s1_cis_sO22 => s1_cis_sO23; Fringe_kf_OR3_7*s1_cis_Fringe*s1_cis_sO22/((1 + s1_cis_sO3/Fringe_Km_OR3_7)*Fringe_Km_OR3_7);  // modifiers: s1_cis_Fringe
  cis_reOR4_0: s1_cis_sO0 => s1_cis_sO9; OFUT1_kf_OR4_0*s1_cis_OFUT1*s1_cis_sO0/((1 + s1_cis_sO0/OFUT1_Km_OR4_0)*OFUT1_Km_OR4_0);  // modifiers: s1_cis_OFUT1
  cis_reOR4_1: s1_cis_sO1 => s1_cis_sO10; OFUT1_kf_OR4_1*s1_cis_OFUT1*s1_cis_sO1/((1 + s1_cis_sO0/OFUT1_Km_OR4_1)*OFUT1_Km_OR4_1);  // modifiers: s1_cis_OFUT1
  cis_reOR4_2: s1_cis_sO2 => s1_cis_sO11; OFUT1_kf_OR4_2*s1_cis_OFUT1*s1_cis_sO2/((1 + s1_cis_sO0/OFUT1_Km_OR4_2)*OFUT1_Km_OR4_2);  // modifiers: s1_cis_OFUT1
  cis_reOR4_3: s1_cis_sO3 => s1_cis_sO12; OFUT1_kf_OR4_3*s1_cis_OFUT1*s1_cis_sO3/((1 + s1_cis_sO0/OFUT1_Km_OR4_3)*OFUT1_Km_OR4_3);  // modifiers: s1_cis_OFUT1
  cis_reOR4_4: s1_cis_sO4 => s1_cis_sO13; OFUT1_kf_OR4_4*s1_cis_OFUT1*s1_cis_sO4/((1 + s1_cis_sO0/OFUT1_Km_OR4_4)*OFUT1_Km_OR4_4);  // modifiers: s1_cis_OFUT1
  cis_reOR4_5: s1_cis_sO5 => s1_cis_sO14; OFUT1_kf_OR4_5*s1_cis_OFUT1*s1_cis_sO5/((1 + s1_cis_sO0/OFUT1_Km_OR4_5)*OFUT1_Km_OR4_5);  // modifiers: s1_cis_OFUT1
  cis_reOR4_6: s1_cis_sO6 => s1_cis_sO15; OFUT1_kf_OR4_6*s1_cis_OFUT1*s1_cis_sO6/((1 + s1_cis_sO0/OFUT1_Km_OR4_6)*OFUT1_Km_OR4_6);  // modifiers: s1_cis_OFUT1
  cis_reOR4_7: s1_cis_sO7 => s1_cis_sO16; OFUT1_kf_OR4_7*s1_cis_OFUT1*s1_cis_sO7/((1 + s1_cis_sO0/OFUT1_Km_OR4_7)*OFUT1_Km_OR4_7);  // modifiers: s1_cis_OFUT1
  cis_reOR4_8: s1_cis_sO8 => s1_cis_sO17; OFUT1_kf_OR4_8*s1_cis_OFUT1*s1_cis_sO8/((1 + s1_cis_sO0/OFUT1_Km_OR4_8)*OFUT1_Km_OR4_8);  // modifiers: s1_cis_OFUT1
  cis_reOR5_0: s1_cis_sO9 => s1_cis_sO18; Fringe_kf_OR5_0*s1_cis_Fringe*s1_cis_sO9/((1 + s1_cis_sO3/Fringe_Km_OR5_0)*Fringe_Km_OR5_0);  // modifiers: s1_cis_Fringe
  cis_reOR5_1: s1_cis_sO10 => s1_cis_sO19; Fringe_kf_OR5_1*s1_cis_Fringe*s1_cis_sO10/((1 + s1_cis_sO3/Fringe_Km_OR5_1)*Fringe_Km_OR5_1);  // modifiers: s1_cis_Fringe
  cis_reOR5_2: s1_cis_sO11 => s1_cis_sO20; Fringe_kf_OR5_2*s1_cis_Fringe*s1_cis_sO11/((1 + s1_cis_sO3/Fringe_Km_OR5_2)*Fringe_Km_OR5_2);  // modifiers: s1_cis_Fringe
  cis_reOR5_3: s1_cis_sO12 => s1_cis_sO21; Fringe_kf_OR5_3*s1_cis_Fringe*s1_cis_sO12/((1 + s1_cis_sO3/Fringe_Km_OR5_3)*Fringe_Km_OR5_3);  // modifiers: s1_cis_Fringe
  cis_reOR5_4: s1_cis_sO13 => s1_cis_sO22; Fringe_kf_OR5_4*s1_cis_Fringe*s1_cis_sO13/((1 + s1_cis_sO3/Fringe_Km_OR5_4)*Fringe_Km_OR5_4);  // modifiers: s1_cis_Fringe
  cis_reOR5_5: s1_cis_sO14 => s1_cis_sO23; Fringe_kf_OR5_5*s1_cis_Fringe*s1_cis_sO14/((1 + s1_cis_sO3/Fringe_Km_OR5_5)*Fringe_Km_OR5_5);  // modifiers: s1_cis_Fringe
  cis_reOR5_6: s1_cis_sO15 => s1_cis_sO24; Fringe_kf_OR5_6*s1_cis_Fringe*s1_cis_sO15/((1 + s1_cis_sO3/Fringe_Km_OR5_6)*Fringe_Km_OR5_6);  // modifiers: s1_cis_Fringe
  cis_reOR5_7: s1_cis_sO16 => s1_cis_sO25; Fringe_kf_OR5_7*s1_cis_Fringe*s1_cis_sO16/((1 + s1_cis_sO3/Fringe_Km_OR5_7)*Fringe_Km_OR5_7);  // modifiers: s1_cis_Fringe
  medial_reOR0_0: s1_medial_sO0 => s1_medial_sO3; OFUT1_kf_OR0_0*s1_medial_OFUT1*s1_medial_sO0/((1 + s1_cis_sO0/OFUT1_Km_OR0_0 + s1_medial_sO0/OFUT1_Km_OR0_0)*OFUT1_Km_OR0_0);  // modifiers: s1_medial_OFUT1
  medial_reOR0_1: s1_medial_sO1 => s1_medial_sO4; OFUT1_kf_OR0_1*s1_medial_OFUT1*s1_medial_sO1/((1 + s1_cis_sO0/OFUT1_Km_OR0_1 + s1_medial_sO0/OFUT1_Km_OR0_1)*OFUT1_Km_OR0_1);  // modifiers: s1_medial_OFUT1
  medial_reOR0_2: s1_medial_sO2 => s1_medial_sO5; OFUT1_kf_OR0_2*s1_medial_OFUT1*s1_medial_sO2/((1 + s1_cis_sO0/OFUT1_Km_OR0_2 + s1_medial_sO0/OFUT1_Km_OR0_2)*OFUT1_Km_OR0_2);  // modifiers: s1_medial_OFUT1
  medial_reOR0_3: s1_medial_sO9 => s1_medial_sO12; OFUT1_kf_OR0_3*s1_medial_OFUT1*s1_medial_sO9/((1 + s1_cis_sO0/OFUT1_Km_OR0_3 + s1_medial_sO0/OFUT1_Km_OR0_3)*OFUT1_Km_OR0_3);  // modifiers: s1_medial_OFUT1
  medial_reOR0_4: s1_medial_sO10 => s1_medial_sO13; OFUT1_kf_OR0_4*s1_medial_OFUT1*s1_medial_sO10/((1 + s1_cis_sO0/OFUT1_Km_OR0_4 + s1_medial_sO0/OFUT1_Km_OR0_4)*OFUT1_Km_OR0_4);  // modifiers: s1_medial_OFUT1
  medial_reOR0_5: s1_medial_sO11 => s1_medial_sO14; OFUT1_kf_OR0_5*s1_medial_OFUT1*s1_medial_sO11/((1 + s1_cis_sO0/OFUT1_Km_OR0_5 + s1_medial_sO0/OFUT1_Km_OR0_5)*OFUT1_Km_OR0_5);  // modifiers: s1_medial_OFUT1
  medial_reOR0_6: s1_medial_sO18 => s1_medial_sO21; OFUT1_kf_OR0_6*s1_medial_OFUT1*s1_medial_sO18/((1 + s1_cis_sO0/OFUT1_Km_OR0_6 + s1_medial_sO0/OFUT1_Km_OR0_6)*OFUT1_Km_OR0_6);  // modifiers: s1_medial_OFUT1
  medial_reOR0_7: s1_medial_sO19 => s1_medial_sO22; OFUT1_kf_OR0_7*s1_medial_OFUT1*s1_medial_sO19/((1 + s1_cis_sO0/OFUT1_Km_OR0_7 + s1_medial_sO0/OFUT1_Km_OR0_7)*OFUT1_Km_OR0_7);  // modifiers: s1_medial_OFUT1
  medial_reOR0_8: s1_medial_sO20 => s1_medial_sO23; OFUT1_kf_OR0_8*s1_medial_OFUT1*s1_medial_sO20/((1 + s1_cis_sO0/OFUT1_Km_OR0_8 + s1_medial_sO0/OFUT1_Km_OR0_8)*OFUT1_Km_OR0_8);  // modifiers: s1_medial_OFUT1
  medial_reOR1_0: s1_medial_sO3 => s1_medial_sO6; Fringe_kf_OR1_0*s1_medial_Fringe*s1_medial_sO3/((1 + s1_cis_sO3/Fringe_Km_OR1_0 + s1_medial_sO3/Fringe_Km_OR1_0)*Fringe_Km_OR1_0);  // modifiers: s1_medial_Fringe
  medial_reOR1_1: s1_medial_sO4 => s1_medial_sO7; Fringe_kf_OR1_1*s1_medial_Fringe*s1_medial_sO4/((1 + s1_cis_sO3/Fringe_Km_OR1_1 + s1_medial_sO3/Fringe_Km_OR1_1)*Fringe_Km_OR1_1);  // modifiers: s1_medial_Fringe
  medial_reOR1_2: s1_medial_sO5 => s1_medial_sO8; Fringe_kf_OR1_2*s1_medial_Fringe*s1_medial_sO5/((1 + s1_cis_sO3/Fringe_Km_OR1_2 + s1_medial_sO3/Fringe_Km_OR1_2)*Fringe_Km_OR1_2);  // modifiers: s1_medial_Fringe
  medial_reOR1_3: s1_medial_sO12 => s1_medial_sO15; Fringe_kf_OR1_3*s1_medial_Fringe*s1_medial_sO12/((1 + s1_cis_sO3/Fringe_Km_OR1_3 + s1_medial_sO3/Fringe_Km_OR1_3)*Fringe_Km_OR1_3);  // modifiers: s1_medial_Fringe
  medial_reOR1_4: s1_medial_sO13 => s1_medial_sO16; Fringe_kf_OR1_4*s1_medial_Fringe*s1_medial_sO13/((1 + s1_cis_sO3/Fringe_Km_OR1_4 + s1_medial_sO3/Fringe_Km_OR1_4)*Fringe_Km_OR1_4);  // modifiers: s1_medial_Fringe
  medial_reOR1_5: s1_medial_sO14 => s1_medial_sO17; Fringe_kf_OR1_5*s1_medial_Fringe*s1_medial_sO14/((1 + s1_cis_sO3/Fringe_Km_OR1_5 + s1_medial_sO3/Fringe_Km_OR1_5)*Fringe_Km_OR1_5);  // modifiers: s1_medial_Fringe
  medial_reOR1_6: s1_medial_sO21 => s1_medial_sO24; Fringe_kf_OR1_6*s1_medial_Fringe*s1_medial_sO21/((1 + s1_cis_sO3/Fringe_Km_OR1_6 + s1_medial_sO3/Fringe_Km_OR1_6)*Fringe_Km_OR1_6);  // modifiers: s1_medial_Fringe
  medial_reOR1_7: s1_medial_sO22 => s1_medial_sO25; Fringe_kf_OR1_7*s1_medial_Fringe*s1_medial_sO22/((1 + s1_cis_sO3/Fringe_Km_OR1_7 + s1_medial_sO3/Fringe_Km_OR1_7)*Fringe_Km_OR1_7);  // modifiers: s1_medial_Fringe
  medial_reOR2_0: s1_medial_sO0 => s1_medial_sO1; OFUT1_kf_OR2_0*s1_medial_OFUT1*s1_medial_sO0/((1 + s1_cis_sO0/OFUT1_Km_OR2_0 + s1_medial_sO0/OFUT1_Km_OR2_0)*OFUT1_Km_OR2_0);  // modifiers: s1_medial_OFUT1
  medial_reOR2_1: s1_medial_sO3 => s1_medial_sO4; OFUT1_kf_OR2_1*s1_medial_OFUT1*s1_medial_sO3/((1 + s1_cis_sO0/OFUT1_Km_OR2_1 + s1_medial_sO0/OFUT1_Km_OR2_1)*OFUT1_Km_OR2_1);  // modifiers: s1_medial_OFUT1
  medial_reOR2_2: s1_medial_sO6 => s1_medial_sO7; OFUT1_kf_OR2_2*s1_medial_OFUT1*s1_medial_sO6/((1 + s1_cis_sO0/OFUT1_Km_OR2_2 + s1_medial_sO0/OFUT1_Km_OR2_2)*OFUT1_Km_OR2_2);  // modifiers: s1_medial_OFUT1
  medial_reOR2_3: s1_medial_sO9 => s1_medial_sO10; OFUT1_kf_OR2_3*s1_medial_OFUT1*s1_medial_sO9/((1 + s1_cis_sO0/OFUT1_Km_OR2_3 + s1_medial_sO0/OFUT1_Km_OR2_3)*OFUT1_Km_OR2_3);  // modifiers: s1_medial_OFUT1
  medial_reOR2_4: s1_medial_sO12 => s1_medial_sO13; OFUT1_kf_OR2_4*s1_medial_OFUT1*s1_medial_sO12/((1 + s1_cis_sO0/OFUT1_Km_OR2_4 + s1_medial_sO0/OFUT1_Km_OR2_4)*OFUT1_Km_OR2_4);  // modifiers: s1_medial_OFUT1
  medial_reOR2_5: s1_medial_sO15 => s1_medial_sO16; OFUT1_kf_OR2_5*s1_medial_OFUT1*s1_medial_sO15/((1 + s1_cis_sO0/OFUT1_Km_OR2_5 + s1_medial_sO0/OFUT1_Km_OR2_5)*OFUT1_Km_OR2_5);  // modifiers: s1_medial_OFUT1
  medial_reOR2_6: s1_medial_sO18 => s1_medial_sO19; OFUT1_kf_OR2_6*s1_medial_OFUT1*s1_medial_sO18/((1 + s1_cis_sO0/OFUT1_Km_OR2_6 + s1_medial_sO0/OFUT1_Km_OR2_6)*OFUT1_Km_OR2_6);  // modifiers: s1_medial_OFUT1
  medial_reOR2_7: s1_medial_sO21 => s1_medial_sO22; OFUT1_kf_OR2_7*s1_medial_OFUT1*s1_medial_sO21/((1 + s1_cis_sO0/OFUT1_Km_OR2_7 + s1_medial_sO0/OFUT1_Km_OR2_7)*OFUT1_Km_OR2_7);  // modifiers: s1_medial_OFUT1
  medial_reOR2_8: s1_medial_sO24 => s1_medial_sO25; OFUT1_kf_OR2_8*s1_medial_OFUT1*s1_medial_sO24/((1 + s1_cis_sO0/OFUT1_Km_OR2_8 + s1_medial_sO0/OFUT1_Km_OR2_8)*OFUT1_Km_OR2_8);  // modifiers: s1_medial_OFUT1
  medial_reOR3_0: s1_medial_sO1 => s1_medial_sO2; Fringe_kf_OR3_0*s1_medial_Fringe*s1_medial_sO1/((1 + s1_cis_sO3/Fringe_Km_OR3_0 + s1_medial_sO3/Fringe_Km_OR3_0)*Fringe_Km_OR3_0);  // modifiers: s1_medial_Fringe
  medial_reOR3_1: s1_medial_sO4 => s1_medial_sO5; Fringe_kf_OR3_1*s1_medial_Fringe*s1_medial_sO4/((1 + s1_cis_sO3/Fringe_Km_OR3_1 + s1_medial_sO3/Fringe_Km_OR3_1)*Fringe_Km_OR3_1);  // modifiers: s1_medial_Fringe
  medial_reOR3_2: s1_medial_sO7 => s1_medial_sO8; Fringe_kf_OR3_2*s1_medial_Fringe*s1_medial_sO7/((1 + s1_cis_sO3/Fringe_Km_OR3_2 + s1_medial_sO3/Fringe_Km_OR3_2)*Fringe_Km_OR3_2);  // modifiers: s1_medial_Fringe
  medial_reOR3_3: s1_medial_sO10 => s1_medial_sO11; Fringe_kf_OR3_3*s1_medial_Fringe*s1_medial_sO10/((1 + s1_cis_sO3/Fringe_Km_OR3_3 + s1_medial_sO3/Fringe_Km_OR3_3)*Fringe_Km_OR3_3);  // modifiers: s1_medial_Fringe
  medial_reOR3_4: s1_medial_sO13 => s1_medial_sO14; Fringe_kf_OR3_4*s1_medial_Fringe*s1_medial_sO13/((1 + s1_cis_sO3/Fringe_Km_OR3_4 + s1_medial_sO3/Fringe_Km_OR3_4)*Fringe_Km_OR3_4);  // modifiers: s1_medial_Fringe
  medial_reOR3_5: s1_medial_sO16 => s1_medial_sO17; Fringe_kf_OR3_5*s1_medial_Fringe*s1_medial_sO16/((1 + s1_cis_sO3/Fringe_Km_OR3_5 + s1_medial_sO3/Fringe_Km_OR3_5)*Fringe_Km_OR3_5);  // modifiers: s1_medial_Fringe
  medial_reOR3_6: s1_medial_sO19 => s1_medial_sO20; Fringe_kf_OR3_6*s1_medial_Fringe*s1_medial_sO19/((1 + s1_cis_sO3/Fringe_Km_OR3_6 + s1_medial_sO3/Fringe_Km_OR3_6)*Fringe_Km_OR3_6);  // modifiers: s1_medial_Fringe
  medial_reOR3_7: s1_medial_sO22 => s1_medial_sO23; Fringe_kf_OR3_7*s1_medial_Fringe*s1_medial_sO22/((1 + s1_cis_sO3/Fringe_Km_OR3_7 + s1_medial_sO3/Fringe_Km_OR3_7)*Fringe_Km_OR3_7);  // modifiers: s1_medial_Fringe
  medial_reOR4_0: s1_medial_sO0 => s1_medial_sO9; OFUT1_kf_OR4_0*s1_medial_OFUT1*s1_medial_sO0/((1 + s1_cis_sO0/OFUT1_Km_OR4_0 + s1_medial_sO0/OFUT1_Km_OR4_0)*OFUT1_Km_OR4_0);  // modifiers: s1_medial_OFUT1
  medial_reOR4_1: s1_medial_sO1 => s1_medial_sO10; OFUT1_kf_OR4_1*s1_medial_OFUT1*s1_medial_sO1/((1 + s1_cis_sO0/OFUT1_Km_OR4_1 + s1_medial_sO0/OFUT1_Km_OR4_1)*OFUT1_Km_OR4_1);  // modifiers: s1_medial_OFUT1
  medial_reOR4_2: s1_medial_sO2 => s1_medial_sO11; OFUT1_kf_OR4_2*s1_medial_OFUT1*s1_medial_sO2/((1 + s1_cis_sO0/OFUT1_Km_OR4_2 + s1_medial_sO0/OFUT1_Km_OR4_2)*OFUT1_Km_OR4_2);  // modifiers: s1_medial_OFUT1
  medial_reOR4_3: s1_medial_sO3 => s1_medial_sO12; OFUT1_kf_OR4_3*s1_medial_OFUT1*s1_medial_sO3/((1 + s1_cis_sO0/OFUT1_Km_OR4_3 + s1_medial_sO0/OFUT1_Km_OR4_3)*OFUT1_Km_OR4_3);  // modifiers: s1_medial_OFUT1
  medial_reOR4_4: s1_medial_sO4 => s1_medial_sO13; OFUT1_kf_OR4_4*s1_medial_OFUT1*s1_medial_sO4/((1 + s1_cis_sO0/OFUT1_Km_OR4_4 + s1_medial_sO0/OFUT1_Km_OR4_4)*OFUT1_Km_OR4_4);  // modifiers: s1_medial_OFUT1
  medial_reOR4_5: s1_medial_sO5 => s1_medial_sO14; OFUT1_kf_OR4_5*s1_medial_OFUT1*s1_medial_sO5/((1 + s1_cis_sO0/OFUT1_Km_OR4_5 + s1_medial_sO0/OFUT1_Km_OR4_5)*OFUT1_Km_OR4_5);  // modifiers: s1_medial_OFUT1
  medial_reOR4_6: s1_medial_sO6 => s1_medial_sO15; OFUT1_kf_OR4_6*s1_medial_OFUT1*s1_medial_sO6/((1 + s1_cis_sO0/OFUT1_Km_OR4_6 + s1_medial_sO0/OFUT1_Km_OR4_6)*OFUT1_Km_OR4_6);  // modifiers: s1_medial_OFUT1
  medial_reOR4_7: s1_medial_sO7 => s1_medial_sO16; OFUT1_kf_OR4_7*s1_medial_OFUT1*s1_medial_sO7/((1 + s1_cis_sO0/OFUT1_Km_OR4_7 + s1_medial_sO0/OFUT1_Km_OR4_7)*OFUT1_Km_OR4_7);  // modifiers: s1_medial_OFUT1
  medial_reOR4_8: s1_medial_sO8 => s1_medial_sO17; OFUT1_kf_OR4_8*s1_medial_OFUT1*s1_medial_sO8/((1 + s1_cis_sO0/OFUT1_Km_OR4_8 + s1_medial_sO0/OFUT1_Km_OR4_8)*OFUT1_Km_OR4_8);  // modifiers: s1_medial_OFUT1
  medial_reOR5_0: s1_medial_sO9 => s1_medial_sO18; Fringe_kf_OR5_0*s1_medial_Fringe*s1_medial_sO9/((1 + s1_cis_sO3/Fringe_Km_OR5_0 + s1_medial_sO3/Fringe_Km_OR5_0)*Fringe_Km_OR5_0);  // modifiers: s1_medial_Fringe
  medial_reOR5_1: s1_medial_sO10 => s1_medial_sO19; Fringe_kf_OR5_1*s1_medial_Fringe*s1_medial_sO10/((1 + s1_cis_sO3/Fringe_Km_OR5_1 + s1_medial_sO3/Fringe_Km_OR5_1)*Fringe_Km_OR5_1);  // modifiers: s1_medial_Fringe
  medial_reOR5_2: s1_medial_sO11 => s1_medial_sO20; Fringe_kf_OR5_2*s1_medial_Fringe*s1_medial_sO11/((1 + s1_cis_sO3/Fringe_Km_OR5_2 + s1_medial_sO3/Fringe_Km_OR5_2)*Fringe_Km_OR5_2);  // modifiers: s1_medial_Fringe
  medial_reOR5_3: s1_medial_sO12 => s1_medial_sO21; Fringe_kf_OR5_3*s1_medial_Fringe*s1_medial_sO12/((1 + s1_cis_sO3/Fringe_Km_OR5_3 + s1_medial_sO3/Fringe_Km_OR5_3)*Fringe_Km_OR5_3);  // modifiers: s1_medial_Fringe
  medial_reOR5_4: s1_medial_sO13 => s1_medial_sO22; Fringe_kf_OR5_4*s1_medial_Fringe*s1_medial_sO13/((1 + s1_cis_sO3/Fringe_Km_OR5_4 + s1_medial_sO3/Fringe_Km_OR5_4)*Fringe_Km_OR5_4);  // modifiers: s1_medial_Fringe
  medial_reOR5_5: s1_medial_sO14 => s1_medial_sO23; Fringe_kf_OR5_5*s1_medial_Fringe*s1_medial_sO14/((1 + s1_cis_sO3/Fringe_Km_OR5_5 + s1_medial_sO3/Fringe_Km_OR5_5)*Fringe_Km_OR5_5);  // modifiers: s1_medial_Fringe
  medial_reOR5_6: s1_medial_sO15 => s1_medial_sO24; Fringe_kf_OR5_6*s1_medial_Fringe*s1_medial_sO15/((1 + s1_cis_sO3/Fringe_Km_OR5_6 + s1_medial_sO3/Fringe_Km_OR5_6)*Fringe_Km_OR5_6);  // modifiers: s1_medial_Fringe
  medial_reOR5_7: s1_medial_sO16 => s1_medial_sO25; Fringe_kf_OR5_7*s1_medial_Fringe*s1_medial_sO16/((1 + s1_cis_sO3/Fringe_Km_OR5_7 + s1_medial_sO3/Fringe_Km_OR5_7)*Fringe_Km_OR5_7);  // modifiers: s1_medial_Fringe
  trans_reOR0_0: s1_trans_sO0 => s1_trans_sO3; OFUT1_kf_OR0_0*s1_trans_OFUT1*s1_trans_sO0/((1 + s1_cis_sO0/OFUT1_Km_OR0_0 + s1_medial_sO0/OFUT1_Km_OR0_0 + s1_trans_sO0/OFUT1_Km_OR0_0)*OFUT1_Km_OR0_0);  // modifiers: s1_trans_OFUT1
  trans_reOR0_1: s1_trans_sO1 => s1_trans_sO4; OFUT1_kf_OR0_1*s1_trans_OFUT1*s1_trans_sO1/((1 + s1_cis_sO0/OFUT1_Km_OR0_1 + s1_medial_sO0/OFUT1_Km_OR0_1 + s1_trans_sO0/OFUT1_Km_OR0_1)*OFUT1_Km_OR0_1);  // modifiers: s1_trans_OFUT1
  trans_reOR0_2: s1_trans_sO2 => s1_trans_sO5; OFUT1_kf_OR0_2*s1_trans_OFUT1*s1_trans_sO2/((1 + s1_cis_sO0/OFUT1_Km_OR0_2 + s1_medial_sO0/OFUT1_Km_OR0_2 + s1_trans_sO0/OFUT1_Km_OR0_2)*OFUT1_Km_OR0_2);  // modifiers: s1_trans_OFUT1
  trans_reOR0_3: s1_trans_sO9 => s1_trans_sO12; OFUT1_kf_OR0_3*s1_trans_OFUT1*s1_trans_sO9/((1 + s1_cis_sO0/OFUT1_Km_OR0_3 + s1_medial_sO0/OFUT1_Km_OR0_3 + s1_trans_sO0/OFUT1_Km_OR0_3)*OFUT1_Km_OR0_3);  // modifiers: s1_trans_OFUT1
  trans_reOR0_4: s1_trans_sO10 => s1_trans_sO13; OFUT1_kf_OR0_4*s1_trans_OFUT1*s1_trans_sO10/((1 + s1_cis_sO0/OFUT1_Km_OR0_4 + s1_medial_sO0/OFUT1_Km_OR0_4 + s1_trans_sO0/OFUT1_Km_OR0_4)*OFUT1_Km_OR0_4);  // modifiers: s1_trans_OFUT1
  trans_reOR0_5: s1_trans_sO11 => s1_trans_sO14; OFUT1_kf_OR0_5*s1_trans_OFUT1*s1_trans_sO11/((1 + s1_cis_sO0/OFUT1_Km_OR0_5 + s1_medial_sO0/OFUT1_Km_OR0_5 + s1_trans_sO0/OFUT1_Km_OR0_5)*OFUT1_Km_OR0_5);  // modifiers: s1_trans_OFUT1
  trans_reOR0_6: s1_trans_sO18 => s1_trans_sO21; OFUT1_kf_OR0_6*s1_trans_OFUT1*s1_trans_sO18/((1 + s1_cis_sO0/OFUT1_Km_OR0_6 + s1_medial_sO0/OFUT1_Km_OR0_6 + s1_trans_sO0/OFUT1_Km_OR0_6)*OFUT1_Km_OR0_6);  // modifiers: s1_trans_OFUT1
  trans_reOR0_7: s1_trans_sO19 => s1_trans_sO22; OFUT1_kf_OR0_7*s1_trans_OFUT1*s1_trans_sO19/((1 + s1_cis_sO0/OFUT1_Km_OR0_7 + s1_medial_sO0/OFUT1_Km_OR0_7 + s1_trans_sO0/OFUT1_Km_OR0_7)*OFUT1_Km_OR0_7);  // modifiers: s1_trans_OFUT1
  trans_reOR0_8: s1_trans_sO20 => s1_trans_sO23; OFUT1_kf_OR0_8*s1_trans_OFUT1*s1_trans_sO20/((1 + s1_cis_sO0/OFUT1_Km_OR0_8 + s1_medial_sO0/OFUT1_Km_OR0_8 + s1_trans_sO0/OFUT1_Km_OR0_8)*OFUT1_Km_OR0_8);  // modifiers: s1_trans_OFUT1
  trans_reOR1_0: s1_trans_sO3 => s1_trans_sO6; Fringe_kf_OR1_0*s1_trans_Fringe*s1_trans_sO3/((1 + s1_cis_sO3/Fringe_Km_OR1_0 + s1_medial_sO3/Fringe_Km_OR1_0 + s1_trans_sO3/Fringe_Km_OR1_0)*Fringe_Km_OR1_0);  // modifiers: s1_trans_Fringe
  trans_reOR1_1: s1_trans_sO4 => s1_trans_sO7; Fringe_kf_OR1_1*s1_trans_Fringe*s1_trans_sO4/((1 + s1_cis_sO3/Fringe_Km_OR1_1 + s1_medial_sO3/Fringe_Km_OR1_1 + s1_trans_sO3/Fringe_Km_OR1_1)*Fringe_Km_OR1_1);  // modifiers: s1_trans_Fringe
  trans_reOR1_2: s1_trans_sO5 => s1_trans_sO8; Fringe_kf_OR1_2*s1_trans_Fringe*s1_trans_sO5/((1 + s1_cis_sO3/Fringe_Km_OR1_2 + s1_medial_sO3/Fringe_Km_OR1_2 + s1_trans_sO3/Fringe_Km_OR1_2)*Fringe_Km_OR1_2);  // modifiers: s1_trans_Fringe
  trans_reOR1_3: s1_trans_sO12 => s1_trans_sO15; Fringe_kf_OR1_3*s1_trans_Fringe*s1_trans_sO12/((1 + s1_cis_sO3/Fringe_Km_OR1_3 + s1_medial_sO3/Fringe_Km_OR1_3 + s1_trans_sO3/Fringe_Km_OR1_3)*Fringe_Km_OR1_3);  // modifiers: s1_trans_Fringe
  trans_reOR1_4: s1_trans_sO13 => s1_trans_sO16; Fringe_kf_OR1_4*s1_trans_Fringe*s1_trans_sO13/((1 + s1_cis_sO3/Fringe_Km_OR1_4 + s1_medial_sO3/Fringe_Km_OR1_4 + s1_trans_sO3/Fringe_Km_OR1_4)*Fringe_Km_OR1_4);  // modifiers: s1_trans_Fringe
  trans_reOR1_5: s1_trans_sO14 => s1_trans_sO17; Fringe_kf_OR1_5*s1_trans_Fringe*s1_trans_sO14/((1 + s1_cis_sO3/Fringe_Km_OR1_5 + s1_medial_sO3/Fringe_Km_OR1_5 + s1_trans_sO3/Fringe_Km_OR1_5)*Fringe_Km_OR1_5);  // modifiers: s1_trans_Fringe
  trans_reOR1_6: s1_trans_sO21 => s1_trans_sO24; Fringe_kf_OR1_6*s1_trans_Fringe*s1_trans_sO21/((1 + s1_cis_sO3/Fringe_Km_OR1_6 + s1_medial_sO3/Fringe_Km_OR1_6 + s1_trans_sO3/Fringe_Km_OR1_6)*Fringe_Km_OR1_6);  // modifiers: s1_trans_Fringe
  trans_reOR1_7: s1_trans_sO22 => s1_trans_sO25; Fringe_kf_OR1_7*s1_trans_Fringe*s1_trans_sO22/((1 + s1_cis_sO3/Fringe_Km_OR1_7 + s1_medial_sO3/Fringe_Km_OR1_7 + s1_trans_sO3/Fringe_Km_OR1_7)*Fringe_Km_OR1_7);  // modifiers: s1_trans_Fringe
  trans_reOR2_0: s1_trans_sO0 => s1_trans_sO1; OFUT1_kf_OR2_0*s1_trans_OFUT1*s1_trans_sO0/((1 + s1_cis_sO0/OFUT1_Km_OR2_0 + s1_medial_sO0/OFUT1_Km_OR2_0 + s1_trans_sO0/OFUT1_Km_OR2_0)*OFUT1_Km_OR2_0);  // modifiers: s1_trans_OFUT1
  trans_reOR2_1: s1_trans_sO3 => s1_trans_sO4; OFUT1_kf_OR2_1*s1_trans_OFUT1*s1_trans_sO3/((1 + s1_cis_sO0/OFUT1_Km_OR2_1 + s1_medial_sO0/OFUT1_Km_OR2_1 + s1_trans_sO0/OFUT1_Km_OR2_1)*OFUT1_Km_OR2_1);  // modifiers: s1_trans_OFUT1
  trans_reOR2_2: s1_trans_sO6 => s1_trans_sO7; OFUT1_kf_OR2_2*s1_trans_OFUT1*s1_trans_sO6/((1 + s1_cis_sO0/OFUT1_Km_OR2_2 + s1_medial_sO0/OFUT1_Km_OR2_2 + s1_trans_sO0/OFUT1_Km_OR2_2)*OFUT1_Km_OR2_2);  // modifiers: s1_trans_OFUT1
  trans_reOR2_3: s1_trans_sO9 => s1_trans_sO10; OFUT1_kf_OR2_3*s1_trans_OFUT1*s1_trans_sO9/((1 + s1_cis_sO0/OFUT1_Km_OR2_3 + s1_medial_sO0/OFUT1_Km_OR2_3 + s1_trans_sO0/OFUT1_Km_OR2_3)*OFUT1_Km_OR2_3);  // modifiers: s1_trans_OFUT1
  trans_reOR2_4: s1_trans_sO12 => s1_trans_sO13; OFUT1_kf_OR2_4*s1_trans_OFUT1*s1_trans_sO12/((1 + s1_cis_sO0/OFUT1_Km_OR2_4 + s1_medial_sO0/OFUT1_Km_OR2_4 + s1_trans_sO0/OFUT1_Km_OR2_4)*OFUT1_Km_OR2_4);  // modifiers: s1_trans_OFUT1
  trans_reOR2_5: s1_trans_sO15 => s1_trans_sO16; OFUT1_kf_OR2_5*s1_trans_OFUT1*s1_trans_sO15/((1 + s1_cis_sO0/OFUT1_Km_OR2_5 + s1_medial_sO0/OFUT1_Km_OR2_5 + s1_trans_sO0/OFUT1_Km_OR2_5)*OFUT1_Km_OR2_5);  // modifiers: s1_trans_OFUT1
  trans_reOR2_6: s1_trans_sO18 => s1_trans_sO19; OFUT1_kf_OR2_6*s1_trans_OFUT1*s1_trans_sO18/((1 + s1_cis_sO0/OFUT1_Km_OR2_6 + s1_medial_sO0/OFUT1_Km_OR2_6 + s1_trans_sO0/OFUT1_Km_OR2_6)*OFUT1_Km_OR2_6);  // modifiers: s1_trans_OFUT1
  trans_reOR2_7: s1_trans_sO21 => s1_trans_sO22; OFUT1_kf_OR2_7*s1_trans_OFUT1*s1_trans_sO21/((1 + s1_cis_sO0/OFUT1_Km_OR2_7 + s1_medial_sO0/OFUT1_Km_OR2_7 + s1_trans_sO0/OFUT1_Km_OR2_7)*OFUT1_Km_OR2_7);  // modifiers: s1_trans_OFUT1
  trans_reOR2_8: s1_trans_sO24 => s1_trans_sO25; OFUT1_kf_OR2_8*s1_trans_OFUT1*s1_trans_sO24/((1 + s1_cis_sO0/OFUT1_Km_OR2_8 + s1_medial_sO0/OFUT1_Km_OR2_8 + s1_trans_sO0/OFUT1_Km_OR2_8)*OFUT1_Km_OR2_8);  // modifiers: s1_trans_OFUT1
  trans_reOR3_0: s1_trans_sO1 => s1_trans_sO2; Fringe_kf_OR3_0*s1_trans_Fringe*s1_trans_sO1/((1 + s1_cis_sO3/Fringe_Km_OR3_0 + s1_medial_sO3/Fringe_Km_OR3_0 + s1_trans_sO3/Fringe_Km_OR3_0)*Fringe_Km_OR3_0);  // modifiers: s1_trans_Fringe
  trans_reOR3_1: s1_trans_sO4 => s1_trans_sO5; Fringe_kf_OR3_1*s1_trans_Fringe*s1_trans_sO4/((1 + s1_cis_sO3/Fringe_Km_OR3_1 + s1_medial_sO3/Fringe_Km_OR3_1 + s1_trans_sO3/Fringe_Km_OR3_1)*Fringe_Km_OR3_1);  // modifiers: s1_trans_Fringe
  trans_reOR3_2: s1_trans_sO7 => s1_trans_sO8; Fringe_kf_OR3_2*s1_trans_Fringe*s1_trans_sO7/((1 + s1_cis_sO3/Fringe_Km_OR3_2 + s1_medial_sO3/Fringe_Km_OR3_2 + s1_trans_sO3/Fringe_Km_OR3_2)*Fringe_Km_OR3_2);  // modifiers: s1_trans_Fringe
  trans_reOR3_3: s1_trans_sO10 => s1_trans_sO11; Fringe_kf_OR3_3*s1_trans_Fringe*s1_trans_sO10/((1 + s1_cis_sO3/Fringe_Km_OR3_3 + s1_medial_sO3/Fringe_Km_OR3_3 + s1_trans_sO3/Fringe_Km_OR3_3)*Fringe_Km_OR3_3);  // modifiers: s1_trans_Fringe
  trans_reOR3_4: s1_trans_sO13 => s1_trans_sO14; Fringe_kf_OR3_4*s1_trans_Fringe*s1_trans_sO13/((1 + s1_cis_sO3/Fringe_Km_OR3_4 + s1_medial_sO3/Fringe_Km_OR3_4 + s1_trans_sO3/Fringe_Km_OR3_4)*Fringe_Km_OR3_4);  // modifiers: s1_trans_Fringe
  trans_reOR3_5: s1_trans_sO16 => s1_trans_sO17; Fringe_kf_OR3_5*s1_trans_Fringe*s1_trans_sO16/((1 + s1_cis_sO3/Fringe_Km_OR3_5 + s1_medial_sO3/Fringe_Km_OR3_5 + s1_trans_sO3/Fringe_Km_OR3_5)*Fringe_Km_OR3_5);  // modifiers: s1_trans_Fringe
  trans_reOR3_6: s1_trans_sO19 => s1_trans_sO20; Fringe_kf_OR3_6*s1_trans_Fringe*s1_trans_sO19/((1 + s1_cis_sO3/Fringe_Km_OR3_6 + s1_medial_sO3/Fringe_Km_OR3_6 + s1_trans_sO3/Fringe_Km_OR3_6)*Fringe_Km_OR3_6);  // modifiers: s1_trans_Fringe
  trans_reOR3_7: s1_trans_sO22 => s1_trans_sO23; Fringe_kf_OR3_7*s1_trans_Fringe*s1_trans_sO22/((1 + s1_cis_sO3/Fringe_Km_OR3_7 + s1_medial_sO3/Fringe_Km_OR3_7 + s1_trans_sO3/Fringe_Km_OR3_7)*Fringe_Km_OR3_7);  // modifiers: s1_trans_Fringe
  trans_reOR4_0: s1_trans_sO0 => s1_trans_sO9; OFUT1_kf_OR4_0*s1_trans_OFUT1*s1_trans_sO0/((1 + s1_cis_sO0/OFUT1_Km_OR4_0 + s1_medial_sO0/OFUT1_Km_OR4_0 + s1_trans_sO0/OFUT1_Km_OR4_0)*OFUT1_Km_OR4_0);  // modifiers: s1_trans_OFUT1
  trans_reOR4_1: s1_trans_sO1 => s1_trans_sO10; OFUT1_kf_OR4_1*s1_trans_OFUT1*s1_trans_sO1/((1 + s1_cis_sO0/OFUT1_Km_OR4_1 + s1_medial_sO0/OFUT1_Km_OR4_1 + s1_trans_sO0/OFUT1_Km_OR4_1)*OFUT1_Km_OR4_1);  // modifiers: s1_trans_OFUT1
  trans_reOR4_2: s1_trans_sO2 => s1_trans_sO11; OFUT1_kf_OR4_2*s1_trans_OFUT1*s1_trans_sO2/((1 + s1_cis_sO0/OFUT1_Km_OR4_2 + s1_medial_sO0/OFUT1_Km_OR4_2 + s1_trans_sO0/OFUT1_Km_OR4_2)*OFUT1_Km_OR4_2);  // modifiers: s1_trans_OFUT1
  trans_reOR4_3: s1_trans_sO3 => s1_trans_sO12; OFUT1_kf_OR4_3*s1_trans_OFUT1*s1_trans_sO3/((1 + s1_cis_sO0/OFUT1_Km_OR4_3 + s1_medial_sO0/OFUT1_Km_OR4_3 + s1_trans_sO0/OFUT1_Km_OR4_3)*OFUT1_Km_OR4_3);  // modifiers: s1_trans_OFUT1
  trans_reOR4_4: s1_trans_sO4 => s1_trans_sO13; OFUT1_kf_OR4_4*s1_trans_OFUT1*s1_trans_sO4/((1 + s1_cis_sO0/OFUT1_Km_OR4_4 + s1_medial_sO0/OFUT1_Km_OR4_4 + s1_trans_sO0/OFUT1_Km_OR4_4)*OFUT1_Km_OR4_4);  // modifiers: s1_trans_OFUT1
  trans_reOR4_5: s1_trans_sO5 => s1_trans_sO14; OFUT1_kf_OR4_5*s1_trans_OFUT1*s1_trans_sO5/((1 + s1_cis_sO0/OFUT1_Km_OR4_5 + s1_medial_sO0/OFUT1_Km_OR4_5 + s1_trans_sO0/OFUT1_Km_OR4_5)*OFUT1_Km_OR4_5);  // modifiers: s1_trans_OFUT1
  trans_reOR4_6: s1_trans_sO6 => s1_trans_sO15; OFUT1_kf_OR4_6*s1_trans_OFUT1*s1_trans_sO6/((1 + s1_cis_sO0/OFUT1_Km_OR4_6 + s1_medial_sO0/OFUT1_Km_OR4_6 + s1_trans_sO0/OFUT1_Km_OR4_6)*OFUT1_Km_OR4_6);  // modifiers: s1_trans_OFUT1
  trans_reOR4_7: s1_trans_sO7 => s1_trans_sO16; OFUT1_kf_OR4_7*s1_trans_OFUT1*s1_trans_sO7/((1 + s1_cis_sO0/OFUT1_Km_OR4_7 + s1_medial_sO0/OFUT1_Km_OR4_7 + s1_trans_sO0/OFUT1_Km_OR4_7)*OFUT1_Km_OR4_7);  // modifiers: s1_trans_OFUT1
  trans_reOR4_8: s1_trans_sO8 => s1_trans_sO17; OFUT1_kf_OR4_8*s1_trans_OFUT1*s1_trans_sO8/((1 + s1_cis_sO0/OFUT1_Km_OR4_8 + s1_medial_sO0/OFUT1_Km_OR4_8 + s1_trans_sO0/OFUT1_Km_OR4_8)*OFUT1_Km_OR4_8);  // modifiers: s1_trans_OFUT1
  trans_reOR5_0: s1_trans_sO9 => s1_trans_sO18; Fringe_kf_OR5_0*s1_trans_Fringe*s1_trans_sO9/((1 + s1_cis_sO3/Fringe_Km_OR5_0 + s1_medial_sO3/Fringe_Km_OR5_0 + s1_trans_sO3/Fringe_Km_OR5_0)*Fringe_Km_OR5_0);  // modifiers: s1_trans_Fringe
  trans_reOR5_1: s1_trans_sO10 => s1_trans_sO19; Fringe_kf_OR5_1*s1_trans_Fringe*s1_trans_sO10/((1 + s1_cis_sO3/Fringe_Km_OR5_1 + s1_medial_sO3/Fringe_Km_OR5_1 + s1_trans_sO3/Fringe_Km_OR5_1)*Fringe_Km_OR5_1);  // modifiers: s1_trans_Fringe
  trans_reOR5_2: s1_trans_sO11 => s1_trans_sO20; Fringe_kf_OR5_2*s1_trans_Fringe*s1_trans_sO11/((1 + s1_cis_sO3/Fringe_Km_OR5_2 + s1_medial_sO3/Fringe_Km_OR5_2 + s1_trans_sO3/Fringe_Km_OR5_2)*Fringe_Km_OR5_2);  // modifiers: s1_trans_Fringe
  trans_reOR5_3: s1_trans_sO12 => s1_trans_sO21; Fringe_kf_OR5_3*s1_trans_Fringe*s1_trans_sO12/((1 + s1_cis_sO3/Fringe_Km_OR5_3 + s1_medial_sO3/Fringe_Km_OR5_3 + s1_trans_sO3/Fringe_Km_OR5_3)*Fringe_Km_OR5_3);  // modifiers: s1_trans_Fringe
  trans_reOR5_4: s1_trans_sO13 => s1_trans_sO22; Fringe_kf_OR5_4*s1_trans_Fringe*s1_trans_sO13/((1 + s1_cis_sO3/Fringe_Km_OR5_4 + s1_medial_sO3/Fringe_Km_OR5_4 + s1_trans_sO3/Fringe_Km_OR5_4)*Fringe_Km_OR5_4);  // modifiers: s1_trans_Fringe
  trans_reOR5_5: s1_trans_sO14 => s1_trans_sO23; Fringe_kf_OR5_5*s1_trans_Fringe*s1_trans_sO14/((1 + s1_cis_sO3/Fringe_Km_OR5_5 + s1_medial_sO3/Fringe_Km_OR5_5 + s1_trans_sO3/Fringe_Km_OR5_5)*Fringe_Km_OR5_5);  // modifiers: s1_trans_Fringe
  trans_reOR5_6: s1_trans_sO15 => s1_trans_sO24; Fringe_kf_OR5_6*s1_trans_Fringe*s1_trans_sO15/((1 + s1_cis_sO3/Fringe_Km_OR5_6 + s1_medial_sO3/Fringe_Km_OR5_6 + s1_trans_sO3/Fringe_Km_OR5_6)*Fringe_Km_OR5_6);  // modifiers: s1_trans_Fringe
  trans_reOR5_7: s1_trans_sO16 => s1_trans_sO25; Fringe_kf_OR5_7*s1_trans_Fringe*s1_trans_sO16/((1 + s1_cis_sO3/Fringe_Km_OR5_7 + s1_medial_sO3/Fringe_Km_OR5_7 + s1_trans_sO3/Fringe_Km_OR5_7)*Fringe_Km_OR5_7);  // modifiers: s1_trans_Fringe
  TGN_reOR0_0: s1_TGN_sO0 => s1_TGN_sO3; OFUT1_kf_OR0_0*s1_TGN_OFUT1*s1_TGN_sO0/((1 + s1_cis_sO0/OFUT1_Km_OR0_0 + s1_medial_sO0/OFUT1_Km_OR0_0 + s1_trans_sO0/OFUT1_Km_OR0_0 + s1_TGN_sO0/OFUT1_Km_OR0_0)*OFUT1_Km_OR0_0);  // modifiers: s1_TGN_OFUT1
  TGN_reOR0_1: s1_TGN_sO1 => s1_TGN_sO4; OFUT1_kf_OR0_1*s1_TGN_OFUT1*s1_TGN_sO1/((1 + s1_cis_sO0/OFUT1_Km_OR0_1 + s1_medial_sO0/OFUT1_Km_OR0_1 + s1_trans_sO0/OFUT1_Km_OR0_1 + s1_TGN_sO0/OFUT1_Km_OR0_1)*OFUT1_Km_OR0_1);  // modifiers: s1_TGN_OFUT1
  TGN_reOR0_2: s1_TGN_sO2 => s1_TGN_sO5; OFUT1_kf_OR0_2*s1_TGN_OFUT1*s1_TGN_sO2/((1 + s1_cis_sO0/OFUT1_Km_OR0_2 + s1_medial_sO0/OFUT1_Km_OR0_2 + s1_trans_sO0/OFUT1_Km_OR0_2 + s1_TGN_sO0/OFUT1_Km_OR0_2)*OFUT1_Km_OR0_2);  // modifiers: s1_TGN_OFUT1
  TGN_reOR0_3: s1_TGN_sO9 => s1_TGN_sO12; OFUT1_kf_OR0_3*s1_TGN_OFUT1*s1_TGN_sO9/((1 + s1_cis_sO0/OFUT1_Km_OR0_3 + s1_medial_sO0/OFUT1_Km_OR0_3 + s1_trans_sO0/OFUT1_Km_OR0_3 + s1_TGN_sO0/OFUT1_Km_OR0_3)*OFUT1_Km_OR0_3);  // modifiers: s1_TGN_OFUT1
  TGN_reOR0_4: s1_TGN_sO10 => s1_TGN_sO13; OFUT1_kf_OR0_4*s1_TGN_OFUT1*s1_TGN_sO10/((1 + s1_cis_sO0/OFUT1_Km_OR0_4 + s1_medial_sO0/OFUT1_Km_OR0_4 + s1_trans_sO0/OFUT1_Km_OR0_4 + s1_TGN_sO0/OFUT1_Km_OR0_4)*OFUT1_Km_OR0_4);  // modifiers: s1_TGN_OFUT1
  TGN_reOR0_5: s1_TGN_sO11 => s1_TGN_sO14; OFUT1_kf_OR0_5*s1_TGN_OFUT1*s1_TGN_sO11/((1 + s1_cis_sO0/OFUT1_Km_OR0_5 + s1_medial_sO0/OFUT1_Km_OR0_5 + s1_trans_sO0/OFUT1_Km_OR0_5 + s1_TGN_sO0/OFUT1_Km_OR0_5)*OFUT1_Km_OR0_5);  // modifiers: s1_TGN_OFUT1
  TGN_reOR0_6: s1_TGN_sO18 => s1_TGN_sO21; OFUT1_kf_OR0_6*s1_TGN_OFUT1*s1_TGN_sO18/((1 + s1_cis_sO0/OFUT1_Km_OR0_6 + s1_medial_sO0/OFUT1_Km_OR0_6 + s1_trans_sO0/OFUT1_Km_OR0_6 + s1_TGN_sO0/OFUT1_Km_OR0_6)*OFUT1_Km_OR0_6);  // modifiers: s1_TGN_OFUT1
  TGN_reOR0_7: s1_TGN_sO19 => s1_TGN_sO22; OFUT1_kf_OR0_7*s1_TGN_OFUT1*s1_TGN_sO19/((1 + s1_cis_sO0/OFUT1_Km_OR0_7 + s1_medial_sO0/OFUT1_Km_OR0_7 + s1_trans_sO0/OFUT1_Km_OR0_7 + s1_TGN_sO0/OFUT1_Km_OR0_7)*OFUT1_Km_OR0_7);  // modifiers: s1_TGN_OFUT1
  TGN_reOR0_8: s1_TGN_sO20 => s1_TGN_sO23; OFUT1_kf_OR0_8*s1_TGN_OFUT1*s1_TGN_sO20/((1 + s1_cis_sO0/OFUT1_Km_OR0_8 + s1_medial_sO0/OFUT1_Km_OR0_8 + s1_trans_sO0/OFUT1_Km_OR0_8 + s1_TGN_sO0/OFUT1_Km_OR0_8)*OFUT1_Km_OR0_8);  // modifiers: s1_TGN_OFUT1
  TGN_reOR1_0: s1_TGN_sO3 => s1_TGN_sO6; Fringe_kf_OR1_0*s1_TGN_Fringe*s1_TGN_sO3/((1 + s1_cis_sO3/Fringe_Km_OR1_0 + s1_medial_sO3/Fringe_Km_OR1_0 + s1_trans_sO3/Fringe_Km_OR1_0 + s1_TGN_sO3/Fringe_Km_OR1_0)*Fringe_Km_OR1_0);  // modifiers: s1_TGN_Fringe
  TGN_reOR1_1: s1_TGN_sO4 => s1_TGN_sO7; Fringe_kf_OR1_1*s1_TGN_Fringe*s1_TGN_sO4/((1 + s1_cis_sO3/Fringe_Km_OR1_1 + s1_medial_sO3/Fringe_Km_OR1_1 + s1_trans_sO3/Fringe_Km_OR1_1 + s1_TGN_sO3/Fringe_Km_OR1_1)*Fringe_Km_OR1_1);  // modifiers: s1_TGN_Fringe
  TGN_reOR1_2: s1_TGN_sO5 => s1_TGN_sO8; Fringe_kf_OR1_2*s1_TGN_Fringe*s1_TGN_sO5/((1 + s1_cis_sO3/Fringe_Km_OR1_2 + s1_medial_sO3/Fringe_Km_OR1_2 + s1_trans_sO3/Fringe_Km_OR1_2 + s1_TGN_sO3/Fringe_Km_OR1_2)*Fringe_Km_OR1_2);  // modifiers: s1_TGN_Fringe
  TGN_reOR1_3: s1_TGN_sO12 => s1_TGN_sO15; Fringe_kf_OR1_3*s1_TGN_Fringe*s1_TGN_sO12/((1 + s1_cis_sO3/Fringe_Km_OR1_3 + s1_medial_sO3/Fringe_Km_OR1_3 + s1_trans_sO3/Fringe_Km_OR1_3 + s1_TGN_sO3/Fringe_Km_OR1_3)*Fringe_Km_OR1_3);  // modifiers: s1_TGN_Fringe
  TGN_reOR1_4: s1_TGN_sO13 => s1_TGN_sO16; Fringe_kf_OR1_4*s1_TGN_Fringe*s1_TGN_sO13/((1 + s1_cis_sO3/Fringe_Km_OR1_4 + s1_medial_sO3/Fringe_Km_OR1_4 + s1_trans_sO3/Fringe_Km_OR1_4 + s1_TGN_sO3/Fringe_Km_OR1_4)*Fringe_Km_OR1_4);  // modifiers: s1_TGN_Fringe
  TGN_reOR1_5: s1_TGN_sO14 => s1_TGN_sO17; Fringe_kf_OR1_5*s1_TGN_Fringe*s1_TGN_sO14/((1 + s1_cis_sO3/Fringe_Km_OR1_5 + s1_medial_sO3/Fringe_Km_OR1_5 + s1_trans_sO3/Fringe_Km_OR1_5 + s1_TGN_sO3/Fringe_Km_OR1_5)*Fringe_Km_OR1_5);  // modifiers: s1_TGN_Fringe
  TGN_reOR1_6: s1_TGN_sO21 => s1_TGN_sO24; Fringe_kf_OR1_6*s1_TGN_Fringe*s1_TGN_sO21/((1 + s1_cis_sO3/Fringe_Km_OR1_6 + s1_medial_sO3/Fringe_Km_OR1_6 + s1_trans_sO3/Fringe_Km_OR1_6 + s1_TGN_sO3/Fringe_Km_OR1_6)*Fringe_Km_OR1_6);  // modifiers: s1_TGN_Fringe
  TGN_reOR1_7: s1_TGN_sO22 => s1_TGN_sO25; Fringe_kf_OR1_7*s1_TGN_Fringe*s1_TGN_sO22/((1 + s1_cis_sO3/Fringe_Km_OR1_7 + s1_medial_sO3/Fringe_Km_OR1_7 + s1_trans_sO3/Fringe_Km_OR1_7 + s1_TGN_sO3/Fringe_Km_OR1_7)*Fringe_Km_OR1_7);  // modifiers: s1_TGN_Fringe
  TGN_reOR2_0: s1_TGN_sO0 => s1_TGN_sO1; OFUT1_kf_OR2_0*s1_TGN_OFUT1*s1_TGN_sO0/((1 + s1_cis_sO0/OFUT1_Km_OR2_0 + s1_medial_sO0/OFUT1_Km_OR2_0 + s1_trans_sO0/OFUT1_Km_OR2_0 + s1_TGN_sO0/OFUT1_Km_OR2_0)*OFUT1_Km_OR2_0);  // modifiers: s1_TGN_OFUT1
  TGN_reOR2_1: s1_TGN_sO3 => s1_TGN_sO4; OFUT1_kf_OR2_1*s1_TGN_OFUT1*s1_TGN_sO3/((1 + s1_cis_sO0/OFUT1_Km_OR2_1 + s1_medial_sO0/OFUT1_Km_OR2_1 + s1_trans_sO0/OFUT1_Km_OR2_1 + s1_TGN_sO0/OFUT1_Km_OR2_1)*OFUT1_Km_OR2_1);  // modifiers: s1_TGN_OFUT1
  TGN_reOR2_2: s1_TGN_sO6 => s1_TGN_sO7; OFUT1_kf_OR2_2*s1_TGN_OFUT1*s1_TGN_sO6/((1 + s1_cis_sO0/OFUT1_Km_OR2_2 + s1_medial_sO0/OFUT1_Km_OR2_2 + s1_trans_sO0/OFUT1_Km_OR2_2 + s1_TGN_sO0/OFUT1_Km_OR2_2)*OFUT1_Km_OR2_2);  // modifiers: s1_TGN_OFUT1
  TGN_reOR2_3: s1_TGN_sO9 => s1_TGN_sO10; OFUT1_kf_OR2_3*s1_TGN_OFUT1*s1_TGN_sO9/((1 + s1_cis_sO0/OFUT1_Km_OR2_3 + s1_medial_sO0/OFUT1_Km_OR2_3 + s1_trans_sO0/OFUT1_Km_OR2_3 + s1_TGN_sO0/OFUT1_Km_OR2_3)*OFUT1_Km_OR2_3);  // modifiers: s1_TGN_OFUT1
  TGN_reOR2_4: s1_TGN_sO12 => s1_TGN_sO13; OFUT1_kf_OR2_4*s1_TGN_OFUT1*s1_TGN_sO12/((1 + s1_cis_sO0/OFUT1_Km_OR2_4 + s1_medial_sO0/OFUT1_Km_OR2_4 + s1_trans_sO0/OFUT1_Km_OR2_4 + s1_TGN_sO0/OFUT1_Km_OR2_4)*OFUT1_Km_OR2_4);  // modifiers: s1_TGN_OFUT1
  TGN_reOR2_5: s1_TGN_sO15 => s1_TGN_sO16; OFUT1_kf_OR2_5*s1_TGN_OFUT1*s1_TGN_sO15/((1 + s1_cis_sO0/OFUT1_Km_OR2_5 + s1_medial_sO0/OFUT1_Km_OR2_5 + s1_trans_sO0/OFUT1_Km_OR2_5 + s1_TGN_sO0/OFUT1_Km_OR2_5)*OFUT1_Km_OR2_5);  // modifiers: s1_TGN_OFUT1
  TGN_reOR2_6: s1_TGN_sO18 => s1_TGN_sO19; OFUT1_kf_OR2_6*s1_TGN_OFUT1*s1_TGN_sO18/((1 + s1_cis_sO0/OFUT1_Km_OR2_6 + s1_medial_sO0/OFUT1_Km_OR2_6 + s1_trans_sO0/OFUT1_Km_OR2_6 + s1_TGN_sO0/OFUT1_Km_OR2_6)*OFUT1_Km_OR2_6);  // modifiers: s1_TGN_OFUT1
  TGN_reOR2_7: s1_TGN_sO21 => s1_TGN_sO22; OFUT1_kf_OR2_7*s1_TGN_OFUT1*s1_TGN_sO21/((1 + s1_cis_sO0/OFUT1_Km_OR2_7 + s1_medial_sO0/OFUT1_Km_OR2_7 + s1_trans_sO0/OFUT1_Km_OR2_7 + s1_TGN_sO0/OFUT1_Km_OR2_7)*OFUT1_Km_OR2_7);  // modifiers: s1_TGN_OFUT1
  TGN_reOR2_8: s1_TGN_sO24 => s1_TGN_sO25; OFUT1_kf_OR2_8*s1_TGN_OFUT1*s1_TGN_sO24/((1 + s1_cis_sO0/OFUT1_Km_OR2_8 + s1_medial_sO0/OFUT1_Km_OR2_8 + s1_trans_sO0/OFUT1_Km_OR2_8 + s1_TGN_sO0/OFUT1_Km_OR2_8)*OFUT1_Km_OR2_8);  // modifiers: s1_TGN_OFUT1
  TGN_reOR3_0: s1_TGN_sO1 => s1_TGN_sO2; Fringe_kf_OR3_0*s1_TGN_Fringe*s1_TGN_sO1/((1 + s1_cis_sO3/Fringe_Km_OR3_0 + s1_medial_sO3/Fringe_Km_OR3_0 + s1_trans_sO3/Fringe_Km_OR3_0 + s1_TGN_sO3/Fringe_Km_OR3_0)*Fringe_Km_OR3_0);  // modifiers: s1_TGN_Fringe
  TGN_reOR3_1: s1_TGN_sO4 => s1_TGN_sO5; Fringe_kf_OR3_1*s1_TGN_Fringe*s1_TGN_sO4/((1 + s1_cis_sO3/Fringe_Km_OR3_1 + s1_medial_sO3/Fringe_Km_OR3_1 + s1_trans_sO3/Fringe_Km_OR3_1 + s1_TGN_sO3/Fringe_Km_OR3_1)*Fringe_Km_OR3_1);  // modifiers: s1_TGN_Fringe
  TGN_reOR3_2: s1_TGN_sO7 => s1_TGN_sO8; Fringe_kf_OR3_2*s1_TGN_Fringe*s1_TGN_sO7/((1 + s1_cis_sO3/Fringe_Km_OR3_2 + s1_medial_sO3/Fringe_Km_OR3_2 + s1_trans_sO3/Fringe_Km_OR3_2 + s1_TGN_sO3/Fringe_Km_OR3_2)*Fringe_Km_OR3_2);  // modifiers: s1_TGN_Fringe
  TGN_reOR3_3: s1_TGN_sO10 => s1_TGN_sO11; Fringe_kf_OR3_3*s1_TGN_Fringe*s1_TGN_sO10/((1 + s1_cis_sO3/Fringe_Km_OR3_3 + s1_medial_sO3/Fringe_Km_OR3_3 + s1_trans_sO3/Fringe_Km_OR3_3 + s1_TGN_sO3/Fringe_Km_OR3_3)*Fringe_Km_OR3_3);  // modifiers: s1_TGN_Fringe
  TGN_reOR3_4: s1_TGN_sO13 => s1_TGN_sO14; Fringe_kf_OR3_4*s1_TGN_Fringe*s1_TGN_sO13/((1 + s1_cis_sO3/Fringe_Km_OR3_4 + s1_medial_sO3/Fringe_Km_OR3_4 + s1_trans_sO3/Fringe_Km_OR3_4 + s1_TGN_sO3/Fringe_Km_OR3_4)*Fringe_Km_OR3_4);  // modifiers: s1_TGN_Fringe
  TGN_reOR3_5: s1_TGN_sO16 => s1_TGN_sO17; Fringe_kf_OR3_5*s1_TGN_Fringe*s1_TGN_sO16/((1 + s1_cis_sO3/Fringe_Km_OR3_5 + s1_medial_sO3/Fringe_Km_OR3_5 + s1_trans_sO3/Fringe_Km_OR3_5 + s1_TGN_sO3/Fringe_Km_OR3_5)*Fringe_Km_OR3_5);  // modifiers: s1_TGN_Fringe
  TGN_reOR3_6: s1_TGN_sO19 => s1_TGN_sO20; Fringe_kf_OR3_6*s1_TGN_Fringe*s1_TGN_sO19/((1 + s1_cis_sO3/Fringe_Km_OR3_6 + s1_medial_sO3/Fringe_Km_OR3_6 + s1_trans_sO3/Fringe_Km_OR3_6 + s1_TGN_sO3/Fringe_Km_OR3_6)*Fringe_Km_OR3_6);  // modifiers: s1_TGN_Fringe
  TGN_reOR3_7: s1_TGN_sO22 => s1_TGN_sO23; Fringe_kf_OR3_7*s1_TGN_Fringe*s1_TGN_sO22/((1 + s1_cis_sO3/Fringe_Km_OR3_7 + s1_medial_sO3/Fringe_Km_OR3_7 + s1_trans_sO3/Fringe_Km_OR3_7 + s1_TGN_sO3/Fringe_Km_OR3_7)*Fringe_Km_OR3_7);  // modifiers: s1_TGN_Fringe
  TGN_reOR4_0: s1_TGN_sO0 => s1_TGN_sO9; OFUT1_kf_OR4_0*s1_TGN_OFUT1*s1_TGN_sO0/((1 + s1_cis_sO0/OFUT1_Km_OR4_0 + s1_medial_sO0/OFUT1_Km_OR4_0 + s1_trans_sO0/OFUT1_Km_OR4_0 + s1_TGN_sO0/OFUT1_Km_OR4_0)*OFUT1_Km_OR4_0);  // modifiers: s1_TGN_OFUT1
  TGN_reOR4_1: s1_TGN_sO1 => s1_TGN_sO10; OFUT1_kf_OR4_1*s1_TGN_OFUT1*s1_TGN_sO1/((1 + s1_cis_sO0/OFUT1_Km_OR4_1 + s1_medial_sO0/OFUT1_Km_OR4_1 + s1_trans_sO0/OFUT1_Km_OR4_1 + s1_TGN_sO0/OFUT1_Km_OR4_1)*OFUT1_Km_OR4_1);  // modifiers: s1_TGN_OFUT1
  TGN_reOR4_2: s1_TGN_sO2 => s1_TGN_sO11; OFUT1_kf_OR4_2*s1_TGN_OFUT1*s1_TGN_sO2/((1 + s1_cis_sO0/OFUT1_Km_OR4_2 + s1_medial_sO0/OFUT1_Km_OR4_2 + s1_trans_sO0/OFUT1_Km_OR4_2 + s1_TGN_sO0/OFUT1_Km_OR4_2)*OFUT1_Km_OR4_2);  // modifiers: s1_TGN_OFUT1
  TGN_reOR4_3: s1_TGN_sO3 => s1_TGN_sO12; OFUT1_kf_OR4_3*s1_TGN_OFUT1*s1_TGN_sO3/((1 + s1_cis_sO0/OFUT1_Km_OR4_3 + s1_medial_sO0/OFUT1_Km_OR4_3 + s1_trans_sO0/OFUT1_Km_OR4_3 + s1_TGN_sO0/OFUT1_Km_OR4_3)*OFUT1_Km_OR4_3);  // modifiers: s1_TGN_OFUT1
  TGN_reOR4_4: s1_TGN_sO4 => s1_TGN_sO13; OFUT1_kf_OR4_4*s1_TGN_OFUT1*s1_TGN_sO4/((1 + s1_cis_sO0/OFUT1_Km_OR4_4 + s1_medial_sO0/OFUT1_Km_OR4_4 + s1_trans_sO0/OFUT1_Km_OR4_4 + s1_TGN_sO0/OFUT1_Km_OR4_4)*OFUT1_Km_OR4_4);  // modifiers: s1_TGN_OFUT1
  TGN_reOR4_5: s1_TGN_sO5 => s1_TGN_sO14; OFUT1_kf_OR4_5*s1_TGN_OFUT1*s1_TGN_sO5/((1 + s1_cis_sO0/OFUT1_Km_OR4_5 + s1_medial_sO0/OFUT1_Km_OR4_5 + s1_trans_sO0/OFUT1_Km_OR4_5 + s1_TGN_sO0/OFUT1_Km_OR4_5)*OFUT1_Km_OR4_5);  // modifiers: s1_TGN_OFUT1
  TGN_reOR4_6: s1_TGN_sO6 => s1_TGN_sO15; OFUT1_kf_OR4_6*s1_TGN_OFUT1*s1_TGN_sO6/((1 + s1_cis_sO0/OFUT1_Km_OR4_6 + s1_medial_sO0/OFUT1_Km_OR4_6 + s1_trans_sO0/OFUT1_Km_OR4_6 + s1_TGN_sO0/OFUT1_Km_OR4_6)*OFUT1_Km_OR4_6);  // modifiers: s1_TGN_OFUT1
  TGN_reOR4_7: s1_TGN_sO7 => s1_TGN_sO16; OFUT1_kf_OR4_7*s1_TGN_OFUT1*s1_TGN_sO7/((1 + s1_cis_sO0/OFUT1_Km_OR4_7 + s1_medial_sO0/OFUT1_Km_OR4_7 + s1_trans_sO0/OFUT1_Km_OR4_7 + s1_TGN_sO0/OFUT1_Km_OR4_7)*OFUT1_Km_OR4_7);  // modifiers: s1_TGN_OFUT1
  TGN_reOR4_8: s1_TGN_sO8 => s1_TGN_sO17; OFUT1_kf_OR4_8*s1_TGN_OFUT1*s1_TGN_sO8/((1 + s1_cis_sO0/OFUT1_Km_OR4_8 + s1_medial_sO0/OFUT1_Km_OR4_8 + s1_trans_sO0/OFUT1_Km_OR4_8 + s1_TGN_sO0/OFUT1_Km_OR4_8)*OFUT1_Km_OR4_8);  // modifiers: s1_TGN_OFUT1
  TGN_reOR5_0: s1_TGN_sO9 => s1_TGN_sO18; Fringe_kf_OR5_0*s1_TGN_Fringe*s1_TGN_sO9/((1 + s1_cis_sO3/Fringe_Km_OR5_0 + s1_medial_sO3/Fringe_Km_OR5_0 + s1_trans_sO3/Fringe_Km_OR5_0 + s1_TGN_sO3/Fringe_Km_OR5_0)*Fringe_Km_OR5_0);  // modifiers: s1_TGN_Fringe
  TGN_reOR5_1: s1_TGN_sO10 => s1_TGN_sO19; Fringe_kf_OR5_1*s1_TGN_Fringe*s1_TGN_sO10/((1 + s1_cis_sO3/Fringe_Km_OR5_1 + s1_medial_sO3/Fringe_Km_OR5_1 + s1_trans_sO3/Fringe_Km_OR5_1 + s1_TGN_sO3/Fringe_Km_OR5_1)*Fringe_Km_OR5_1);  // modifiers: s1_TGN_Fringe
  TGN_reOR5_2: s1_TGN_sO11 => s1_TGN_sO20; Fringe_kf_OR5_2*s1_TGN_Fringe*s1_TGN_sO11/((1 + s1_cis_sO3/Fringe_Km_OR5_2 + s1_medial_sO3/Fringe_Km_OR5_2 + s1_trans_sO3/Fringe_Km_OR5_2 + s1_TGN_sO3/Fringe_Km_OR5_2)*Fringe_Km_OR5_2);  // modifiers: s1_TGN_Fringe
  TGN_reOR5_3: s1_TGN_sO12 => s1_TGN_sO21; Fringe_kf_OR5_3*s1_TGN_Fringe*s1_TGN_sO12/((1 + s1_cis_sO3/Fringe_Km_OR5_3 + s1_medial_sO3/Fringe_Km_OR5_3 + s1_trans_sO3/Fringe_Km_OR5_3 + s1_TGN_sO3/Fringe_Km_OR5_3)*Fringe_Km_OR5_3);  // modifiers: s1_TGN_Fringe
  TGN_reOR5_4: s1_TGN_sO13 => s1_TGN_sO22; Fringe_kf_OR5_4*s1_TGN_Fringe*s1_TGN_sO13/((1 + s1_cis_sO3/Fringe_Km_OR5_4 + s1_medial_sO3/Fringe_Km_OR5_4 + s1_trans_sO3/Fringe_Km_OR5_4 + s1_TGN_sO3/Fringe_Km_OR5_4)*Fringe_Km_OR5_4);  // modifiers: s1_TGN_Fringe
  TGN_reOR5_5: s1_TGN_sO14 => s1_TGN_sO23; Fringe_kf_OR5_5*s1_TGN_Fringe*s1_TGN_sO14/((1 + s1_cis_sO3/Fringe_Km_OR5_5 + s1_medial_sO3/Fringe_Km_OR5_5 + s1_trans_sO3/Fringe_Km_OR5_5 + s1_TGN_sO3/Fringe_Km_OR5_5)*Fringe_Km_OR5_5);  // modifiers: s1_TGN_Fringe
  TGN_reOR5_6: s1_TGN_sO15 => s1_TGN_sO24; Fringe_kf_OR5_6*s1_TGN_Fringe*s1_TGN_sO15/((1 + s1_cis_sO3/Fringe_Km_OR5_6 + s1_medial_sO3/Fringe_Km_OR5_6 + s1_trans_sO3/Fringe_Km_OR5_6 + s1_TGN_sO3/Fringe_Km_OR5_6)*Fringe_Km_OR5_6);  // modifiers: s1_TGN_Fringe
  TGN_reOR5_7: s1_TGN_sO16 => s1_TGN_sO25; Fringe_kf_OR5_7*s1_TGN_Fringe*s1_TGN_sO16/((1 + s1_cis_sO3/Fringe_Km_OR5_7 + s1_medial_sO3/Fringe_Km_OR5_7 + s1_trans_sO3/Fringe_Km_OR5_7 + s1_TGN_sO3/Fringe_Km_OR5_7)*Fringe_Km_OR5_7);  // modifiers: s1_TGN_Fringe
  Sec_reOR0_0: s1_Sec_sO0 => s1_Sec_sO3; OFUT1_kf_OR0_0*s1_Sec_OFUT1*s1_Sec_sO0/((1 + s1_cis_sO0/OFUT1_Km_OR0_0 + s1_medial_sO0/OFUT1_Km_OR0_0 + s1_trans_sO0/OFUT1_Km_OR0_0 + s1_TGN_sO0/OFUT1_Km_OR0_0 + s1_Sec_sO0/OFUT1_Km_OR0_0)*OFUT1_Km_OR0_0);  // modifiers: s1_Sec_OFUT1
  Sec_reOR0_1: s1_Sec_sO1 => s1_Sec_sO4; OFUT1_kf_OR0_1*s1_Sec_OFUT1*s1_Sec_sO1/((1 + s1_cis_sO0/OFUT1_Km_OR0_1 + s1_medial_sO0/OFUT1_Km_OR0_1 + s1_trans_sO0/OFUT1_Km_OR0_1 + s1_TGN_sO0/OFUT1_Km_OR0_1 + s1_Sec_sO0/OFUT1_Km_OR0_1)*OFUT1_Km_OR0_1);  // modifiers: s1_Sec_OFUT1
  Sec_reOR0_2: s1_Sec_sO2 => s1_Sec_sO5; OFUT1_kf_OR0_2*s1_Sec_OFUT1*s1_Sec_sO2/((1 + s1_cis_sO0/OFUT1_Km_OR0_2 + s1_medial_sO0/OFUT1_Km_OR0_2 + s1_trans_sO0/OFUT1_Km_OR0_2 + s1_TGN_sO0/OFUT1_Km_OR0_2 + s1_Sec_sO0/OFUT1_Km_OR0_2)*OFUT1_Km_OR0_2);  // modifiers: s1_Sec_OFUT1
  Sec_reOR0_3: s1_Sec_sO9 => s1_Sec_sO12; OFUT1_kf_OR0_3*s1_Sec_OFUT1*s1_Sec_sO9/((1 + s1_cis_sO0/OFUT1_Km_OR0_3 + s1_medial_sO0/OFUT1_Km_OR0_3 + s1_trans_sO0/OFUT1_Km_OR0_3 + s1_TGN_sO0/OFUT1_Km_OR0_3 + s1_Sec_sO0/OFUT1_Km_OR0_3)*OFUT1_Km_OR0_3);  // modifiers: s1_Sec_OFUT1
  Sec_reOR0_4: s1_Sec_sO10 => s1_Sec_sO13; OFUT1_kf_OR0_4*s1_Sec_OFUT1*s1_Sec_sO10/((1 + s1_cis_sO0/OFUT1_Km_OR0_4 + s1_medial_sO0/OFUT1_Km_OR0_4 + s1_trans_sO0/OFUT1_Km_OR0_4 + s1_TGN_sO0/OFUT1_Km_OR0_4 + s1_Sec_sO0/OFUT1_Km_OR0_4)*OFUT1_Km_OR0_4);  // modifiers: s1_Sec_OFUT1
  Sec_reOR0_5: s1_Sec_sO11 => s1_Sec_sO14; OFUT1_kf_OR0_5*s1_Sec_OFUT1*s1_Sec_sO11/((1 + s1_cis_sO0/OFUT1_Km_OR0_5 + s1_medial_sO0/OFUT1_Km_OR0_5 + s1_trans_sO0/OFUT1_Km_OR0_5 + s1_TGN_sO0/OFUT1_Km_OR0_5 + s1_Sec_sO0/OFUT1_Km_OR0_5)*OFUT1_Km_OR0_5);  // modifiers: s1_Sec_OFUT1
  Sec_reOR0_6: s1_Sec_sO18 => s1_Sec_sO21; OFUT1_kf_OR0_6*s1_Sec_OFUT1*s1_Sec_sO18/((1 + s1_cis_sO0/OFUT1_Km_OR0_6 + s1_medial_sO0/OFUT1_Km_OR0_6 + s1_trans_sO0/OFUT1_Km_OR0_6 + s1_TGN_sO0/OFUT1_Km_OR0_6 + s1_Sec_sO0/OFUT1_Km_OR0_6)*OFUT1_Km_OR0_6);  // modifiers: s1_Sec_OFUT1
  Sec_reOR0_7: s1_Sec_sO19 => s1_Sec_sO22; OFUT1_kf_OR0_7*s1_Sec_OFUT1*s1_Sec_sO19/((1 + s1_cis_sO0/OFUT1_Km_OR0_7 + s1_medial_sO0/OFUT1_Km_OR0_7 + s1_trans_sO0/OFUT1_Km_OR0_7 + s1_TGN_sO0/OFUT1_Km_OR0_7 + s1_Sec_sO0/OFUT1_Km_OR0_7)*OFUT1_Km_OR0_7);  // modifiers: s1_Sec_OFUT1
  Sec_reOR0_8: s1_Sec_sO20 => s1_Sec_sO23; OFUT1_kf_OR0_8*s1_Sec_OFUT1*s1_Sec_sO20/((1 + s1_cis_sO0/OFUT1_Km_OR0_8 + s1_medial_sO0/OFUT1_Km_OR0_8 + s1_trans_sO0/OFUT1_Km_OR0_8 + s1_TGN_sO0/OFUT1_Km_OR0_8 + s1_Sec_sO0/OFUT1_Km_OR0_8)*OFUT1_Km_OR0_8);  // modifiers: s1_Sec_OFUT1
  Sec_reOR1_0: s1_Sec_sO3 => s1_Sec_sO6; Fringe_kf_OR1_0*s1_Sec_Fringe*s1_Sec_sO3/((1 + s1_cis_sO3/Fringe_Km_OR1_0 + s1_medial_sO3/Fringe_Km_OR1_0 + s1_trans_sO3/Fringe_Km_OR1_0 + s1_TGN_sO3/Fringe_Km_OR1_0 + s1_Sec_sO3/Fringe_Km_OR1_0)*Fringe_Km_OR1_0);  // modifiers: s1_Sec_Fringe
  Sec_reOR1_1: s1_Sec_sO4 => s1_Sec_sO7; Fringe_kf_OR1_1*s1_Sec_Fringe*s1_Sec_sO4/((1 + s1_cis_sO3/Fringe_Km_OR1_1 + s1_medial_sO3/Fringe_Km_OR1_1 + s1_trans_sO3/Fringe_Km_OR1_1 + s1_TGN_sO3/Fringe_Km_OR1_1 + s1_Sec_sO3/Fringe_Km_OR1_1)*Fringe_Km_OR1_1);  // modifiers: s1_Sec_Fringe
  Sec_reOR1_2: s1_Sec_sO5 => s1_Sec_sO8; Fringe_kf_OR1_2*s1_Sec_Fringe*s1_Sec_sO5/((1 + s1_cis_sO3/Fringe_Km_OR1_2 + s1_medial_sO3/Fringe_Km_OR1_2 + s1_trans_sO3/Fringe_Km_OR1_2 + s1_TGN_sO3/Fringe_Km_OR1_2 + s1_Sec_sO3/Fringe_Km_OR1_2)*Fringe_Km_OR1_2);  // modifiers: s1_Sec_Fringe
  Sec_reOR1_3: s1_Sec_sO12 => s1_Sec_sO15; Fringe_kf_OR1_3*s1_Sec_Fringe*s1_Sec_sO12/((1 + s1_cis_sO3/Fringe_Km_OR1_3 + s1_medial_sO3/Fringe_Km_OR1_3 + s1_trans_sO3/Fringe_Km_OR1_3 + s1_TGN_sO3/Fringe_Km_OR1_3 + s1_Sec_sO3/Fringe_Km_OR1_3)*Fringe_Km_OR1_3);  // modifiers: s1_Sec_Fringe
  Sec_reOR1_4: s1_Sec_sO13 => s1_Sec_sO16; Fringe_kf_OR1_4*s1_Sec_Fringe*s1_Sec_sO13/((1 + s1_cis_sO3/Fringe_Km_OR1_4 + s1_medial_sO3/Fringe_Km_OR1_4 + s1_trans_sO3/Fringe_Km_OR1_4 + s1_TGN_sO3/Fringe_Km_OR1_4 + s1_Sec_sO3/Fringe_Km_OR1_4)*Fringe_Km_OR1_4);  // modifiers: s1_Sec_Fringe
  Sec_reOR1_5: s1_Sec_sO14 => s1_Sec_sO17; Fringe_kf_OR1_5*s1_Sec_Fringe*s1_Sec_sO14/((1 + s1_cis_sO3/Fringe_Km_OR1_5 + s1_medial_sO3/Fringe_Km_OR1_5 + s1_trans_sO3/Fringe_Km_OR1_5 + s1_TGN_sO3/Fringe_Km_OR1_5 + s1_Sec_sO3/Fringe_Km_OR1_5)*Fringe_Km_OR1_5);  // modifiers: s1_Sec_Fringe
  Sec_reOR1_6: s1_Sec_sO21 => s1_Sec_sO24; Fringe_kf_OR1_6*s1_Sec_Fringe*s1_Sec_sO21/((1 + s1_cis_sO3/Fringe_Km_OR1_6 + s1_medial_sO3/Fringe_Km_OR1_6 + s1_trans_sO3/Fringe_Km_OR1_6 + s1_TGN_sO3/Fringe_Km_OR1_6 + s1_Sec_sO3/Fringe_Km_OR1_6)*Fringe_Km_OR1_6);  // modifiers: s1_Sec_Fringe
  Sec_reOR1_7: s1_Sec_sO22 => s1_Sec_sO25; Fringe_kf_OR1_7*s1_Sec_Fringe*s1_Sec_sO22/((1 + s1_cis_sO3/Fringe_Km_OR1_7 + s1_medial_sO3/Fringe_Km_OR1_7 + s1_trans_sO3/Fringe_Km_OR1_7 + s1_TGN_sO3/Fringe_Km_OR1_7 + s1_Sec_sO3/Fringe_Km_OR1_7)*Fringe_Km_OR1_7);  // modifiers: s1_Sec_Fringe
  Sec_reOR2_0: s1_Sec_sO0 => s1_Sec_sO1; OFUT1_kf_OR2_0*s1_Sec_OFUT1*s1_Sec_sO0/((1 + s1_cis_sO0/OFUT1_Km_OR2_0 + s1_medial_sO0/OFUT1_Km_OR2_0 + s1_trans_sO0/OFUT1_Km_OR2_0 + s1_TGN_sO0/OFUT1_Km_OR2_0 + s1_Sec_sO0/OFUT1_Km_OR2_0)*OFUT1_Km_OR2_0);  // modifiers: s1_Sec_OFUT1
  Sec_reOR2_1: s1_Sec_sO3 => s1_Sec_sO4; OFUT1_kf_OR2_1*s1_Sec_OFUT1*s1_Sec_sO3/((1 + s1_cis_sO0/OFUT1_Km_OR2_1 + s1_medial_sO0/OFUT1_Km_OR2_1 + s1_trans_sO0/OFUT1_Km_OR2_1 + s1_TGN_sO0/OFUT1_Km_OR2_1 + s1_Sec_sO0/OFUT1_Km_OR2_1)*OFUT1_Km_OR2_1);  // modifiers: s1_Sec_OFUT1
  Sec_reOR2_2: s1_Sec_sO6 => s1_Sec_sO7; OFUT1_kf_OR2_2*s1_Sec_OFUT1*s1_Sec_sO6/((1 + s1_cis_sO0/OFUT1_Km_OR2_2 + s1_medial_sO0/OFUT1_Km_OR2_2 + s1_trans_sO0/OFUT1_Km_OR2_2 + s1_TGN_sO0/OFUT1_Km_OR2_2 + s1_Sec_sO0/OFUT1_Km_OR2_2)*OFUT1_Km_OR2_2);  // modifiers: s1_Sec_OFUT1
  Sec_reOR2_3: s1_Sec_sO9 => s1_Sec_sO10; OFUT1_kf_OR2_3*s1_Sec_OFUT1*s1_Sec_sO9/((1 + s1_cis_sO0/OFUT1_Km_OR2_3 + s1_medial_sO0/OFUT1_Km_OR2_3 + s1_trans_sO0/OFUT1_Km_OR2_3 + s1_TGN_sO0/OFUT1_Km_OR2_3 + s1_Sec_sO0/OFUT1_Km_OR2_3)*OFUT1_Km_OR2_3);  // modifiers: s1_Sec_OFUT1
  Sec_reOR2_4: s1_Sec_sO12 => s1_Sec_sO13; OFUT1_kf_OR2_4*s1_Sec_OFUT1*s1_Sec_sO12/((1 + s1_cis_sO0/OFUT1_Km_OR2_4 + s1_medial_sO0/OFUT1_Km_OR2_4 + s1_trans_sO0/OFUT1_Km_OR2_4 + s1_TGN_sO0/OFUT1_Km_OR2_4 + s1_Sec_sO0/OFUT1_Km_OR2_4)*OFUT1_Km_OR2_4);  // modifiers: s1_Sec_OFUT1
  Sec_reOR2_5: s1_Sec_sO15 => s1_Sec_sO16; OFUT1_kf_OR2_5*s1_Sec_OFUT1*s1_Sec_sO15/((1 + s1_cis_sO0/OFUT1_Km_OR2_5 + s1_medial_sO0/OFUT1_Km_OR2_5 + s1_trans_sO0/OFUT1_Km_OR2_5 + s1_TGN_sO0/OFUT1_Km_OR2_5 + s1_Sec_sO0/OFUT1_Km_OR2_5)*OFUT1_Km_OR2_5);  // modifiers: s1_Sec_OFUT1
  Sec_reOR2_6: s1_Sec_sO18 => s1_Sec_sO19; OFUT1_kf_OR2_6*s1_Sec_OFUT1*s1_Sec_sO18/((1 + s1_cis_sO0/OFUT1_Km_OR2_6 + s1_medial_sO0/OFUT1_Km_OR2_6 + s1_trans_sO0/OFUT1_Km_OR2_6 + s1_TGN_sO0/OFUT1_Km_OR2_6 + s1_Sec_sO0/OFUT1_Km_OR2_6)*OFUT1_Km_OR2_6);  // modifiers: s1_Sec_OFUT1
  Sec_reOR2_7: s1_Sec_sO21 => s1_Sec_sO22; OFUT1_kf_OR2_7*s1_Sec_OFUT1*s1_Sec_sO21/((1 + s1_cis_sO0/OFUT1_Km_OR2_7 + s1_medial_sO0/OFUT1_Km_OR2_7 + s1_trans_sO0/OFUT1_Km_OR2_7 + s1_TGN_sO0/OFUT1_Km_OR2_7 + s1_Sec_sO0/OFUT1_Km_OR2_7)*OFUT1_Km_OR2_7);  // modifiers: s1_Sec_OFUT1
  Sec_reOR2_8: s1_Sec_sO24 => s1_Sec_sO25; OFUT1_kf_OR2_8*s1_Sec_OFUT1*s1_Sec_sO24/((1 + s1_cis_sO0/OFUT1_Km_OR2_8 + s1_medial_sO0/OFUT1_Km_OR2_8 + s1_trans_sO0/OFUT1_Km_OR2_8 + s1_TGN_sO0/OFUT1_Km_OR2_8 + s1_Sec_sO0/OFUT1_Km_OR2_8)*OFUT1_Km_OR2_8);  // modifiers: s1_Sec_OFUT1
  Sec_reOR3_0: s1_Sec_sO1 => s1_Sec_sO2; Fringe_kf_OR3_0*s1_Sec_Fringe*s1_Sec_sO1/((1 + s1_cis_sO3/Fringe_Km_OR3_0 + s1_medial_sO3/Fringe_Km_OR3_0 + s1_trans_sO3/Fringe_Km_OR3_0 + s1_TGN_sO3/Fringe_Km_OR3_0 + s1_Sec_sO3/Fringe_Km_OR3_0)*Fringe_Km_OR3_0);  // modifiers: s1_Sec_Fringe
  Sec_reOR3_1: s1_Sec_sO4 => s1_Sec_sO5; Fringe_kf_OR3_1*s1_Sec_Fringe*s1_Sec_sO4/((1 + s1_cis_sO3/Fringe_Km_OR3_1 + s1_medial_sO3/Fringe_Km_OR3_1 + s1_trans_sO3/Fringe_Km_OR3_1 + s1_TGN_sO3/Fringe_Km_OR3_1 + s1_Sec_sO3/Fringe_Km_OR3_1)*Fringe_Km_OR3_1);  // modifiers: s1_Sec_Fringe
  Sec_reOR3_2: s1_Sec_sO7 => s1_Sec_sO8; Fringe_kf_OR3_2*s1_Sec_Fringe*s1_Sec_sO7/((1 + s1_cis_sO3/Fringe_Km_OR3_2 + s1_medial_sO3/Fringe_Km_OR3_2 + s1_trans_sO3/Fringe_Km_OR3_2 + s1_TGN_sO3/Fringe_Km_OR3_2 + s1_Sec_sO3/Fringe_Km_OR3_2)*Fringe_Km_OR3_2);  // modifiers: s1_Sec_Fringe
  Sec_reOR3_3: s1_Sec_sO10 => s1_Sec_sO11; Fringe_kf_OR3_3*s1_Sec_Fringe*s1_Sec_sO10/((1 + s1_cis_sO3/Fringe_Km_OR3_3 + s1_medial_sO3/Fringe_Km_OR3_3 + s1_trans_sO3/Fringe_Km_OR3_3 + s1_TGN_sO3/Fringe_Km_OR3_3 + s1_Sec_sO3/Fringe_Km_OR3_3)*Fringe_Km_OR3_3);  // modifiers: s1_Sec_Fringe
  Sec_reOR3_4: s1_Sec_sO13 => s1_Sec_sO14; Fringe_kf_OR3_4*s1_Sec_Fringe*s1_Sec_sO13/((1 + s1_cis_sO3/Fringe_Km_OR3_4 + s1_medial_sO3/Fringe_Km_OR3_4 + s1_trans_sO3/Fringe_Km_OR3_4 + s1_TGN_sO3/Fringe_Km_OR3_4 + s1_Sec_sO3/Fringe_Km_OR3_4)*Fringe_Km_OR3_4);  // modifiers: s1_Sec_Fringe
  Sec_reOR3_5: s1_Sec_sO16 => s1_Sec_sO17; Fringe_kf_OR3_5*s1_Sec_Fringe*s1_Sec_sO16/((1 + s1_cis_sO3/Fringe_Km_OR3_5 + s1_medial_sO3/Fringe_Km_OR3_5 + s1_trans_sO3/Fringe_Km_OR3_5 + s1_TGN_sO3/Fringe_Km_OR3_5 + s1_Sec_sO3/Fringe_Km_OR3_5)*Fringe_Km_OR3_5);  // modifiers: s1_Sec_Fringe
  Sec_reOR3_6: s1_Sec_sO19 => s1_Sec_sO20; Fringe_kf_OR3_6*s1_Sec_Fringe*s1_Sec_sO19/((1 + s1_cis_sO3/Fringe_Km_OR3_6 + s1_medial_sO3/Fringe_Km_OR3_6 + s1_trans_sO3/Fringe_Km_OR3_6 + s1_TGN_sO3/Fringe_Km_OR3_6 + s1_Sec_sO3/Fringe_Km_OR3_6)*Fringe_Km_OR3_6);  // modifiers: s1_Sec_Fringe
  Sec_reOR3_7: s1_Sec_sO22 => s1_Sec_sO23; Fringe_kf_OR3_7*s1_Sec_Fringe*s1_Sec_sO22/((1 + s1_cis_sO3/Fringe_Km_OR3_7 + s1_medial_sO3/Fringe_Km_OR3_7 + s1_trans_sO3/Fringe_Km_OR3_7 + s1_TGN_sO3/Fringe_Km_OR3_7 + s1_Sec_sO3/Fringe_Km_OR3_7)*Fringe_Km_OR3_7);  // modifiers: s1_Sec_Fringe
  Sec_reOR4_0: s1_Sec_sO0 => s1_Sec_sO9; OFUT1_kf_OR4_0*s1_Sec_OFUT1*s1_Sec_sO0/((1 + s1_cis_sO0/OFUT1_Km_OR4_0 + s1_medial_sO0/OFUT1_Km_OR4_0 + s1_trans_sO0/OFUT1_Km_OR4_0 + s1_TGN_sO0/OFUT1_Km_OR4_0 + s1_Sec_sO0/OFUT1_Km_OR4_0)*OFUT1_Km_OR4_0);  // modifiers: s1_Sec_OFUT1
  Sec_reOR4_1: s1_Sec_sO1 => s1_Sec_sO10; OFUT1_kf_OR4_1*s1_Sec_OFUT1*s1_Sec_sO1/((1 + s1_cis_sO0/OFUT1_Km_OR4_1 + s1_medial_sO0/OFUT1_Km_OR4_1 + s1_trans_sO0/OFUT1_Km_OR4_1 + s1_TGN_sO0/OFUT1_Km_OR4_1 + s1_Sec_sO0/OFUT1_Km_OR4_1)*OFUT1_Km_OR4_1);  // modifiers: s1_Sec_OFUT1
  Sec_reOR4_2: s1_Sec_sO2 => s1_Sec_sO11; OFUT1_kf_OR4_2*s1_Sec_OFUT1*s1_Sec_sO2/((1 + s1_cis_sO0/OFUT1_Km_OR4_2 + s1_medial_sO0/OFUT1_Km_OR4_2 + s1_trans_sO0/OFUT1_Km_OR4_2 + s1_TGN_sO0/OFUT1_Km_OR4_2 + s1_Sec_sO0/OFUT1_Km_OR4_2)*OFUT1_Km_OR4_2);  // modifiers: s1_Sec_OFUT1
  Sec_reOR4_3: s1_Sec_sO3 => s1_Sec_sO12; OFUT1_kf_OR4_3*s1_Sec_OFUT1*s1_Sec_sO3/((1 + s1_cis_sO0/OFUT1_Km_OR4_3 + s1_medial_sO0/OFUT1_Km_OR4_3 + s1_trans_sO0/OFUT1_Km_OR4_3 + s1_TGN_sO0/OFUT1_Km_OR4_3 + s1_Sec_sO0/OFUT1_Km_OR4_3)*OFUT1_Km_OR4_3);  // modifiers: s1_Sec_OFUT1
  Sec_reOR4_4: s1_Sec_sO4 => s1_Sec_sO13; OFUT1_kf_OR4_4*s1_Sec_OFUT1*s1_Sec_sO4/((1 + s1_cis_sO0/OFUT1_Km_OR4_4 + s1_medial_sO0/OFUT1_Km_OR4_4 + s1_trans_sO0/OFUT1_Km_OR4_4 + s1_TGN_sO0/OFUT1_Km_OR4_4 + s1_Sec_sO0/OFUT1_Km_OR4_4)*OFUT1_Km_OR4_4);  // modifiers: s1_Sec_OFUT1
  Sec_reOR4_5: s1_Sec_sO5 => s1_Sec_sO14; OFUT1_kf_OR4_5*s1_Sec_OFUT1*s1_Sec_sO5/((1 + s1_cis_sO0/OFUT1_Km_OR4_5 + s1_medial_sO0/OFUT1_Km_OR4_5 + s1_trans_sO0/OFUT1_Km_OR4_5 + s1_TGN_sO0/OFUT1_Km_OR4_5 + s1_Sec_sO0/OFUT1_Km_OR4_5)*OFUT1_Km_OR4_5);  // modifiers: s1_Sec_OFUT1
  Sec_reOR4_6: s1_Sec_sO6 => s1_Sec_sO15; OFUT1_kf_OR4_6*s1_Sec_OFUT1*s1_Sec_sO6/((1 + s1_cis_sO0/OFUT1_Km_OR4_6 + s1_medial_sO0/OFUT1_Km_OR4_6 + s1_trans_sO0/OFUT1_Km_OR4_6 + s1_TGN_sO0/OFUT1_Km_OR4_6 + s1_Sec_sO0/OFUT1_Km_OR4_6)*OFUT1_Km_OR4_6);  // modifiers: s1_Sec_OFUT1
  Sec_reOR4_7: s1_Sec_sO7 => s1_Sec_sO16; OFUT1_kf_OR4_7*s1_Sec_OFUT1*s1_Sec_sO7/((1 + s1_cis_sO0/OFUT1_Km_OR4_7 + s1_medial_sO0/OFUT1_Km_OR4_7 + s1_trans_sO0/OFUT1_Km_OR4_7 + s1_TGN_sO0/OFUT1_Km_OR4_7 + s1_Sec_sO0/OFUT1_Km_OR4_7)*OFUT1_Km_OR4_7);  // modifiers: s1_Sec_OFUT1
  Sec_reOR4_8: s1_Sec_sO8 => s1_Sec_sO17; OFUT1_kf_OR4_8*s1_Sec_OFUT1*s1_Sec_sO8/((1 + s1_cis_sO0/OFUT1_Km_OR4_8 + s1_medial_sO0/OFUT1_Km_OR4_8 + s1_trans_sO0/OFUT1_Km_OR4_8 + s1_TGN_sO0/OFUT1_Km_OR4_8 + s1_Sec_sO0/OFUT1_Km_OR4_8)*OFUT1_Km_OR4_8);  // modifiers: s1_Sec_OFUT1
  Sec_reOR5_0: s1_Sec_sO9 => s1_Sec_sO18; Fringe_kf_OR5_0*s1_Sec_Fringe*s1_Sec_sO9/((1 + s1_cis_sO3/Fringe_Km_OR5_0 + s1_medial_sO3/Fringe_Km_OR5_0 + s1_trans_sO3/Fringe_Km_OR5_0 + s1_TGN_sO3/Fringe_Km_OR5_0 + s1_Sec_sO3/Fringe_Km_OR5_0)*Fringe_Km_OR5_0);  // modifiers: s1_Sec_Fringe
  Sec_reOR5_1: s1_Sec_sO10 => s1_Sec_sO19; Fringe_kf_OR5_1*s1_Sec_Fringe*s1_Sec_sO10/((1 + s1_cis_sO3/Fringe_Km_OR5_1 + s1_medial_sO3/Fringe_Km_OR5_1 + s1_trans_sO3/Fringe_Km_OR5_1 + s1_TGN_sO3/Fringe_Km_OR5_1 + s1_Sec_sO3/Fringe_Km_OR5_1)*Fringe_Km_OR5_1);  // modifiers: s1_Sec_Fringe
  Sec_reOR5_2: s1_Sec_sO11 => s1_Sec_sO20; Fringe_kf_OR5_2*s1_Sec_Fringe*s1_Sec_sO11/((1 + s1_cis_sO3/Fringe_Km_OR5_2 + s1_medial_sO3/Fringe_Km_OR5_2 + s1_trans_sO3/Fringe_Km_OR5_2 + s1_TGN_sO3/Fringe_Km_OR5_2 + s1_Sec_sO3/Fringe_Km_OR5_2)*Fringe_Km_OR5_2);  // modifiers: s1_Sec_Fringe
  Sec_reOR5_3: s1_Sec_sO12 => s1_Sec_sO21; Fringe_kf_OR5_3*s1_Sec_Fringe*s1_Sec_sO12/((1 + s1_cis_sO3/Fringe_Km_OR5_3 + s1_medial_sO3/Fringe_Km_OR5_3 + s1_trans_sO3/Fringe_Km_OR5_3 + s1_TGN_sO3/Fringe_Km_OR5_3 + s1_Sec_sO3/Fringe_Km_OR5_3)*Fringe_Km_OR5_3);  // modifiers: s1_Sec_Fringe
  Sec_reOR5_4: s1_Sec_sO13 => s1_Sec_sO22; Fringe_kf_OR5_4*s1_Sec_Fringe*s1_Sec_sO13/((1 + s1_cis_sO3/Fringe_Km_OR5_4 + s1_medial_sO3/Fringe_Km_OR5_4 + s1_trans_sO3/Fringe_Km_OR5_4 + s1_TGN_sO3/Fringe_Km_OR5_4 + s1_Sec_sO3/Fringe_Km_OR5_4)*Fringe_Km_OR5_4);  // modifiers: s1_Sec_Fringe
  Sec_reOR5_5: s1_Sec_sO14 => s1_Sec_sO23; Fringe_kf_OR5_5*s1_Sec_Fringe*s1_Sec_sO14/((1 + s1_cis_sO3/Fringe_Km_OR5_5 + s1_medial_sO3/Fringe_Km_OR5_5 + s1_trans_sO3/Fringe_Km_OR5_5 + s1_TGN_sO3/Fringe_Km_OR5_5 + s1_Sec_sO3/Fringe_Km_OR5_5)*Fringe_Km_OR5_5);  // modifiers: s1_Sec_Fringe
  Sec_reOR5_6: s1_Sec_sO15 => s1_Sec_sO24; Fringe_kf_OR5_6*s1_Sec_Fringe*s1_Sec_sO15/((1 + s1_cis_sO3/Fringe_Km_OR5_6 + s1_medial_sO3/Fringe_Km_OR5_6 + s1_trans_sO3/Fringe_Km_OR5_6 + s1_TGN_sO3/Fringe_Km_OR5_6 + s1_Sec_sO3/Fringe_Km_OR5_6)*Fringe_Km_OR5_6);  // modifiers: s1_Sec_Fringe
  Sec_reOR5_7: s1_Sec_sO16 => s1_Sec_sO25; Fringe_kf_OR5_7*s1_Sec_Fringe*s1_Sec_sO16/((1 + s1_cis_sO3/Fringe_Km_OR5_7 + s1_medial_sO3/Fringe_Km_OR5_7 + s1_trans_sO3/Fringe_Km_OR5_7 + s1_TGN_sO3/Fringe_Km_OR5_7 + s1_Sec_sO3/Fringe_Km_OR5_7)*Fringe_Km_OR5_7);  // modifiers: s1_Sec_Fringe
  cis_transportO0: s1_cis_sO0 => s1_medial_sO0; cis_transport_O0*s1_cis_sO0;
  cis_transportO3: s1_cis_sO3 => s1_medial_sO3; cis_transport_O3*s1_cis_sO3;
  cis_transportO1: s1_cis_sO1 => s1_medial_sO1; cis_transport_O1*s1_cis_sO1;
  cis_transportO4: s1_cis_sO4 => s1_medial_sO4; cis_transport_O4*s1_cis_sO4;
  cis_transportO2: s1_cis_sO2 => s1_medial_sO2; cis_transport_O2*s1_cis_sO2;
  cis_transportO5: s1_cis_sO5 => s1_medial_sO5; cis_transport_O5*s1_cis_sO5;
  cis_transportO9: s1_cis_sO9 => s1_medial_sO9; cis_transport_O9*s1_cis_sO9;
  cis_transportO12: s1_cis_sO12 => s1_medial_sO12; cis_transport_O12*s1_cis_sO12;
  cis_transportO10: s1_cis_sO10 => s1_medial_sO10; cis_transport_O10*s1_cis_sO10;
  cis_transportO13: s1_cis_sO13 => s1_medial_sO13; cis_transport_O13*s1_cis_sO13;
  cis_transportO11: s1_cis_sO11 => s1_medial_sO11; cis_transport_O11*s1_cis_sO11;
  cis_transportO14: s1_cis_sO14 => s1_medial_sO14; cis_transport_O14*s1_cis_sO14;
  cis_transportO18: s1_cis_sO18 => s1_medial_sO18; cis_transport_O18*s1_cis_sO18;
  cis_transportO21: s1_cis_sO21 => s1_medial_sO21; cis_transport_O21*s1_cis_sO21;
  cis_transportO19: s1_cis_sO19 => s1_medial_sO19; cis_transport_O19*s1_cis_sO19;
  cis_transportO22: s1_cis_sO22 => s1_medial_sO22; cis_transport_O22*s1_cis_sO22;
  cis_transportO20: s1_cis_sO20 => s1_medial_sO20; cis_transport_O20*s1_cis_sO20;
  cis_transportO23: s1_cis_sO23 => s1_medial_sO23; cis_transport_O23*s1_cis_sO23;
  cis_transportO6: s1_cis_sO6 => s1_medial_sO6; cis_transport_O6*s1_cis_sO6;
  cis_transportO7: s1_cis_sO7 => s1_medial_sO7; cis_transport_O7*s1_cis_sO7;
  cis_transportO8: s1_cis_sO8 => s1_medial_sO8; cis_transport_O8*s1_cis_sO8;
  cis_transportO15: s1_cis_sO15 => s1_medial_sO15; cis_transport_O15*s1_cis_sO15;
  cis_transportO16: s1_cis_sO16 => s1_medial_sO16; cis_transport_O16*s1_cis_sO16;
  cis_transportO17: s1_cis_sO17 => s1_medial_sO17; cis_transport_O17*s1_cis_sO17;
  cis_transportO24: s1_cis_sO24 => s1_medial_sO24; cis_transport_O24*s1_cis_sO24;
  cis_transportO25: s1_cis_sO25 => s1_medial_sO25; cis_transport_O25*s1_cis_sO25;
  medial_transportO0: s1_medial_sO0 => s1_trans_sO0; medial_transport_O0*s1_medial_sO0;
  medial_transportO3: s1_medial_sO3 => s1_trans_sO3; medial_transport_O3*s1_medial_sO3;
  medial_transportO1: s1_medial_sO1 => s1_trans_sO1; medial_transport_O1*s1_medial_sO1;
  medial_transportO4: s1_medial_sO4 => s1_trans_sO4; medial_transport_O4*s1_medial_sO4;
  medial_transportO2: s1_medial_sO2 => s1_trans_sO2; medial_transport_O2*s1_medial_sO2;
  medial_transportO5: s1_medial_sO5 => s1_trans_sO5; medial_transport_O5*s1_medial_sO5;
  medial_transportO9: s1_medial_sO9 => s1_trans_sO9; medial_transport_O9*s1_medial_sO9;
  medial_transportO12: s1_medial_sO12 => s1_trans_sO12; medial_transport_O12*s1_medial_sO12;
  medial_transportO10: s1_medial_sO10 => s1_trans_sO10; medial_transport_O10*s1_medial_sO10;
  medial_transportO13: s1_medial_sO13 => s1_trans_sO13; medial_transport_O13*s1_medial_sO13;
  medial_transportO11: s1_medial_sO11 => s1_trans_sO11; medial_transport_O11*s1_medial_sO11;
  medial_transportO14: s1_medial_sO14 => s1_trans_sO14; medial_transport_O14*s1_medial_sO14;
  medial_transportO18: s1_medial_sO18 => s1_trans_sO18; medial_transport_O18*s1_medial_sO18;
  medial_transportO21: s1_medial_sO21 => s1_trans_sO21; medial_transport_O21*s1_medial_sO21;
  medial_transportO19: s1_medial_sO19 => s1_trans_sO19; medial_transport_O19*s1_medial_sO19;
  medial_transportO22: s1_medial_sO22 => s1_trans_sO22; medial_transport_O22*s1_medial_sO22;
  medial_transportO20: s1_medial_sO20 => s1_trans_sO20; medial_transport_O20*s1_medial_sO20;
  medial_transportO23: s1_medial_sO23 => s1_trans_sO23; medial_transport_O23*s1_medial_sO23;
  medial_transportO6: s1_medial_sO6 => s1_trans_sO6; medial_transport_O6*s1_medial_sO6;
  medial_transportO7: s1_medial_sO7 => s1_trans_sO7; medial_transport_O7*s1_medial_sO7;
  medial_transportO8: s1_medial_sO8 => s1_trans_sO8; medial_transport_O8*s1_medial_sO8;
  medial_transportO15: s1_medial_sO15 => s1_trans_sO15; medial_transport_O15*s1_medial_sO15;
  medial_transportO16: s1_medial_sO16 => s1_trans_sO16; medial_transport_O16*s1_medial_sO16;
  medial_transportO17: s1_medial_sO17 => s1_trans_sO17; medial_transport_O17*s1_medial_sO17;
  medial_transportO24: s1_medial_sO24 => s1_trans_sO24; medial_transport_O24*s1_medial_sO24;
  medial_transportO25: s1_medial_sO25 => s1_trans_sO25; medial_transport_O25*s1_medial_sO25;
  trans_transportO0: s1_trans_sO0 => s1_TGN_sO0; trans_transport_O0*s1_trans_sO0;
  trans_transportO3: s1_trans_sO3 => s1_TGN_sO3; trans_transport_O3*s1_trans_sO3;
  trans_transportO1: s1_trans_sO1 => s1_TGN_sO1; trans_transport_O1*s1_trans_sO1;
  trans_transportO4: s1_trans_sO4 => s1_TGN_sO4; trans_transport_O4*s1_trans_sO4;
  trans_transportO2: s1_trans_sO2 => s1_TGN_sO2; trans_transport_O2*s1_trans_sO2;
  trans_transportO5: s1_trans_sO5 => s1_TGN_sO5; trans_transport_O5*s1_trans_sO5;
  trans_transportO9: s1_trans_sO9 => s1_TGN_sO9; trans_transport_O9*s1_trans_sO9;
  trans_transportO12: s1_trans_sO12 => s1_TGN_sO12; trans_transport_O12*s1_trans_sO12;
  trans_transportO10: s1_trans_sO10 => s1_TGN_sO10; trans_transport_O10*s1_trans_sO10;
  trans_transportO13: s1_trans_sO13 => s1_TGN_sO13; trans_transport_O13*s1_trans_sO13;
  trans_transportO11: s1_trans_sO11 => s1_TGN_sO11; trans_transport_O11*s1_trans_sO11;
  trans_transportO14: s1_trans_sO14 => s1_TGN_sO14; trans_transport_O14*s1_trans_sO14;
  trans_transportO18: s1_trans_sO18 => s1_TGN_sO18; trans_transport_O18*s1_trans_sO18;
  trans_transportO21: s1_trans_sO21 => s1_TGN_sO21; trans_transport_O21*s1_trans_sO21;
  trans_transportO19: s1_trans_sO19 => s1_TGN_sO19; trans_transport_O19*s1_trans_sO19;
  trans_transportO22: s1_trans_sO22 => s1_TGN_sO22; trans_transport_O22*s1_trans_sO22;
  trans_transportO20: s1_trans_sO20 => s1_TGN_sO20; trans_transport_O20*s1_trans_sO20;
  trans_transportO23: s1_trans_sO23 => s1_TGN_sO23; trans_transport_O23*s1_trans_sO23;
  trans_transportO6: s1_trans_sO6 => s1_TGN_sO6; trans_transport_O6*s1_trans_sO6;
  trans_transportO7: s1_trans_sO7 => s1_TGN_sO7; trans_transport_O7*s1_trans_sO7;
  trans_transportO8: s1_trans_sO8 => s1_TGN_sO8; trans_transport_O8*s1_trans_sO8;
  trans_transportO15: s1_trans_sO15 => s1_TGN_sO15; trans_transport_O15*s1_trans_sO15;
  trans_transportO16: s1_trans_sO16 => s1_TGN_sO16; trans_transport_O16*s1_trans_sO16;
  trans_transportO17: s1_trans_sO17 => s1_TGN_sO17; trans_transport_O17*s1_trans_sO17;
  trans_transportO24: s1_trans_sO24 => s1_TGN_sO24; trans_transport_O24*s1_trans_sO24;
  trans_transportO25: s1_trans_sO25 => s1_TGN_sO25; trans_transport_O25*s1_trans_sO25;
  TGN_transportO0: s1_TGN_sO0 => s1_Sec_sO0; TGN_transport_O0*s1_TGN_sO0;
  TGN_transportO3: s1_TGN_sO3 => s1_Sec_sO3; TGN_transport_O3*s1_TGN_sO3;
  TGN_transportO1: s1_TGN_sO1 => s1_Sec_sO1; TGN_transport_O1*s1_TGN_sO1;
  TGN_transportO4: s1_TGN_sO4 => s1_Sec_sO4; TGN_transport_O4*s1_TGN_sO4;
  TGN_transportO2: s1_TGN_sO2 => s1_Sec_sO2; TGN_transport_O2*s1_TGN_sO2;
  TGN_transportO5: s1_TGN_sO5 => s1_Sec_sO5; TGN_transport_O5*s1_TGN_sO5;
  TGN_transportO9: s1_TGN_sO9 => s1_Sec_sO9; TGN_transport_O9*s1_TGN_sO9;
  TGN_transportO12: s1_TGN_sO12 => s1_Sec_sO12; TGN_transport_O12*s1_TGN_sO12;
  TGN_transportO10: s1_TGN_sO10 => s1_Sec_sO10; TGN_transport_O10*s1_TGN_sO10;
  TGN_transportO13: s1_TGN_sO13 => s1_Sec_sO13; TGN_transport_O13*s1_TGN_sO13;
  TGN_transportO11: s1_TGN_sO11 => s1_Sec_sO11; TGN_transport_O11*s1_TGN_sO11;
  TGN_transportO14: s1_TGN_sO14 => s1_Sec_sO14; TGN_transport_O14*s1_TGN_sO14;
  TGN_transportO18: s1_TGN_sO18 => s1_Sec_sO18; TGN_transport_O18*s1_TGN_sO18;
  TGN_transportO21: s1_TGN_sO21 => s1_Sec_sO21; TGN_transport_O21*s1_TGN_sO21;
  TGN_transportO19: s1_TGN_sO19 => s1_Sec_sO19; TGN_transport_O19*s1_TGN_sO19;
  TGN_transportO22: s1_TGN_sO22 => s1_Sec_sO22; TGN_transport_O22*s1_TGN_sO22;
  TGN_transportO20: s1_TGN_sO20 => s1_Sec_sO20; TGN_transport_O20*s1_TGN_sO20;
  TGN_transportO23: s1_TGN_sO23 => s1_Sec_sO23; TGN_transport_O23*s1_TGN_sO23;
  TGN_transportO6: s1_TGN_sO6 => s1_Sec_sO6; TGN_transport_O6*s1_TGN_sO6;
  TGN_transportO7: s1_TGN_sO7 => s1_Sec_sO7; TGN_transport_O7*s1_TGN_sO7;
  TGN_transportO8: s1_TGN_sO8 => s1_Sec_sO8; TGN_transport_O8*s1_TGN_sO8;
  TGN_transportO15: s1_TGN_sO15 => s1_Sec_sO15; TGN_transport_O15*s1_TGN_sO15;
  TGN_transportO16: s1_TGN_sO16 => s1_Sec_sO16; TGN_transport_O16*s1_TGN_sO16;
  TGN_transportO17: s1_TGN_sO17 => s1_Sec_sO17; TGN_transport_O17*s1_TGN_sO17;
  TGN_transportO24: s1_TGN_sO24 => s1_Sec_sO24; TGN_transport_O24*s1_TGN_sO24;
  TGN_transportO25: s1_TGN_sO25 => s1_Sec_sO25; TGN_transport_O25*s1_TGN_sO25;
  r1_1: s1_Sec_sO0 -> s41; s1_Sec_sO0*transport_Notch_s1_Sec_sO0;
  r1_2: s1_Sec_sO3 -> s41; s1_Sec_sO3*transport_Notch_s1_Sec_sO3;
  r1_3: s1_Sec_sO1 -> s41; s1_Sec_sO1*transport_Notch_s1_Sec_sO1;
  r1_4: s1_Sec_sO4 -> s41; s1_Sec_sO4*transport_Notch_s1_Sec_sO4;
  r1_5: s1_Sec_sO2 -> s41; s1_Sec_sO2*transport_Notch_s1_Sec_sO2;
  r1_6: s1_Sec_sO5 -> s41; s1_Sec_sO5*transport_Notch_s1_Sec_sO5;
  r1_7: s1_Sec_sO9 -> s41; s1_Sec_sO9*transport_Notch_s1_Sec_sO9;
  r1_8: s1_Sec_sO12 -> s41; s1_Sec_sO12*transport_Notch_s1_Sec_sO12;
  r1_9: s1_Sec_sO10 -> s41; s1_Sec_sO10*transport_Notch_s1_Sec_sO10;
  r1_10: s1_Sec_sO13 -> s41; s1_Sec_sO13*transport_Notch_s1_Sec_sO13;
  r1_11: s1_Sec_sO11 -> s41; s1_Sec_sO11*transport_Notch_s1_Sec_sO11;
  r1_12: s1_Sec_sO14 -> s41; s1_Sec_sO14*transport_Notch_s1_Sec_sO14;
  r1_13: s1_Sec_sO18 -> s41; s1_Sec_sO18*transport_Notch_s1_Sec_sO18;
  r1_14: s1_Sec_sO21 -> s41; s1_Sec_sO21*transport_Notch_s1_Sec_sO21;
  r1_15: s1_Sec_sO19 -> s41; s1_Sec_sO19*transport_Notch_s1_Sec_sO19;
  r1_16: s1_Sec_sO22 -> s41; s1_Sec_sO22*transport_Notch_s1_Sec_sO22;
  r1_17: s1_Sec_sO20 -> s41; s1_Sec_sO20*transport_Notch_s1_Sec_sO20;
  r1_18: s1_Sec_sO23 -> s41; s1_Sec_sO23*transport_Notch_s1_Sec_sO23;
  r1_19: s1_Sec_sO6 -> s41; s1_Sec_sO6*transport_Notch_s1_Sec_sO6;
  r1_20: s1_Sec_sO7 -> s41; s1_Sec_sO7*transport_Notch_s1_Sec_sO7;
  r1_21: s1_Sec_sO8 -> s41; s1_Sec_sO8*transport_Notch_s1_Sec_sO8;
  r1_22: s1_Sec_sO15 -> s41; s1_Sec_sO15*transport_Notch_s1_Sec_sO15;
  r1_23: s1_Sec_sO16 -> s41; s1_Sec_sO16*transport_Notch_s1_Sec_sO16;
  r1_24: s1_Sec_sO17 -> s41; s1_Sec_sO17*transport_Notch_s1_Sec_sO17;
  r1_25: s1_Sec_sO24 -> s41; s1_Sec_sO24*transport_Notch_s1_Sec_sO24;
  r1_26: s1_Sec_sO25 -> s41; s1_Sec_sO25*transport_Notch_s1_Sec_sO25;
  s_gly0: s1 => s1_cis_sO0; s1;

  // Unit definitions:
  unit volume = litre;
  unit substance = mole;
  unit area = metre^2;
  unit minute = 60 second;
  unit micro_mole = 1e-6 mole;
  unit per_minute = 1 / (60 second);
  unit micro_molar = 1e-6 mole / litre;
end
