// SBML level 3 version 1

model testmodel()
  // model units - substance: micro_mole, time: minute, volume: litre, extent: micro_mole

  // Compartments:
  compartment cis = 1 litre;
  compartment medial = 1 litre;
  compartment trans = 1 litre;
  compartment TGN = 1 litre;
  compartment Sec = 1 litre;

  // Species:
  species cis_OFUT1 in cis = 1;
  species cis_Fringe in cis = 1;
  species cis_UDP_Fuc in cis = 1;
  species cis_UDP in cis = 1;
  species cis_UDP_GlcNAc in cis = 1;
  species cis_sO0 in cis = 1; cis_sO0 is "cis_;Notch_:8/;Notch_:9/;Notch_:12";
  species cis_sO9 in cis = 0; cis_sO9 is "cis_Fa;Notch_:8/;Notch_:9/;Notch_:12";
  species cis_sO1 in cis = 0; cis_sO1 is "cis_;Notch_:8/;Notch_:9/Fa;Notch_:12";
  species cis_sO10 in cis = 0; cis_sO10 is "cis_Fa;Notch_:8/;Notch_:9/Fa;Notch_:12";
  species cis_sO2 in cis = 0; cis_sO2 is "cis_;Notch_:8/;Notch_:9/GNb3Fa;Notch_:12";
  species cis_sO11 in cis = 0; cis_sO11 is "cis_Fa;Notch_:8/;Notch_:9/GNb3Fa;Notch_:12";
  species cis_sO3 in cis = 0; cis_sO3 is "cis_;Notch_:8/Fa;Notch_:9/;Notch_:12";
  species cis_sO12 in cis = 0; cis_sO12 is "cis_Fa;Notch_:8/Fa;Notch_:9/;Notch_:12";
  species cis_sO4 in cis = 0; cis_sO4 is "cis_;Notch_:8/Fa;Notch_:9/Fa;Notch_:12";
  species cis_sO13 in cis = 0; cis_sO13 is "cis_Fa;Notch_:8/Fa;Notch_:9/Fa;Notch_:12";
  species cis_sO5 in cis = 0; cis_sO5 is "cis_;Notch_:8/Fa;Notch_:9/GNb3Fa;Notch_:12";
  species cis_sO14 in cis = 0; cis_sO14 is "cis_Fa;Notch_:8/Fa;Notch_:9/GNb3Fa;Notch_:12";
  species cis_sO6 in cis = 0; cis_sO6 is "cis_;Notch_:8/GNb3Fa;Notch_:9/;Notch_:12";
  species cis_sO15 in cis = 0; cis_sO15 is "cis_Fa;Notch_:8/GNb3Fa;Notch_:9/;Notch_:12";
  species cis_sO7 in cis = 0; cis_sO7 is "cis_;Notch_:8/GNb3Fa;Notch_:9/Fa;Notch_:12";
  species cis_sO16 in cis = 0; cis_sO16 is "cis_Fa;Notch_:8/GNb3Fa;Notch_:9/Fa;Notch_:12";
  species cis_sO8 in cis = 0; cis_sO8 is "cis_;Notch_:8/GNb3Fa;Notch_:9/GNb3Fa;Notch_:12";
  species cis_sO17 in cis = 0; cis_sO17 is "cis_Fa;Notch_:8/GNb3Fa;Notch_:9/GNb3Fa;Notch_:12";
  species cis_sO18 in cis = 0; cis_sO18 is "cis_GNb3Fa;Notch_:8/;Notch_:9/;Notch_:12";
  species cis_sO19 in cis = 0; cis_sO19 is "cis_GNb3Fa;Notch_:8/;Notch_:9/Fa;Notch_:12";
  species cis_sO20 in cis = 0; cis_sO20 is "cis_GNb3Fa;Notch_:8/;Notch_:9/GNb3Fa;Notch_:12";
  species cis_sO21 in cis = 0; cis_sO21 is "cis_GNb3Fa;Notch_:8/Fa;Notch_:9/;Notch_:12";
  species cis_sO22 in cis = 0; cis_sO22 is "cis_GNb3Fa;Notch_:8/Fa;Notch_:9/Fa;Notch_:12";
  species cis_sO23 in cis = 0; cis_sO23 is "cis_GNb3Fa;Notch_:8/Fa;Notch_:9/GNb3Fa;Notch_:12";
  species cis_sO24 in cis = 0; cis_sO24 is "cis_GNb3Fa;Notch_:8/GNb3Fa;Notch_:9/;Notch_:12";
  species cis_sO25 in cis = 0; cis_sO25 is "cis_GNb3Fa;Notch_:8/GNb3Fa;Notch_:9/Fa;Notch_:12";
  species medial_OFUT1 in medial = 1;
  species medial_Fringe in medial = 1;
  species medial_UDP_Fuc in medial = 1;
  species medial_UDP in medial = 1;
  species medial_UDP_GlcNAc in medial = 1;
  species medial_sO0 in medial = 0; medial_sO0 is "medial_;Notch_:8/;Notch_:9/;Notch_:12";
  species medial_sO9 in medial = 0; medial_sO9 is "medial_Fa;Notch_:8/;Notch_:9/;Notch_:12";
  species medial_sO1 in medial = 0; medial_sO1 is "medial_;Notch_:8/;Notch_:9/Fa;Notch_:12";
  species medial_sO10 in medial = 0; medial_sO10 is "medial_Fa;Notch_:8/;Notch_:9/Fa;Notch_:12";
  species medial_sO2 in medial = 0; medial_sO2 is "medial_;Notch_:8/;Notch_:9/GNb3Fa;Notch_:12";
  species medial_sO11 in medial = 0; medial_sO11 is "medial_Fa;Notch_:8/;Notch_:9/GNb3Fa;Notch_:12";
  species medial_sO3 in medial = 0; medial_sO3 is "medial_;Notch_:8/Fa;Notch_:9/;Notch_:12";
  species medial_sO12 in medial = 0; medial_sO12 is "medial_Fa;Notch_:8/Fa;Notch_:9/;Notch_:12";
  species medial_sO4 in medial = 0; medial_sO4 is "medial_;Notch_:8/Fa;Notch_:9/Fa;Notch_:12";
  species medial_sO13 in medial = 0; medial_sO13 is "medial_Fa;Notch_:8/Fa;Notch_:9/Fa;Notch_:12";
  species medial_sO5 in medial = 0; medial_sO5 is "medial_;Notch_:8/Fa;Notch_:9/GNb3Fa;Notch_:12";
  species medial_sO14 in medial = 0; medial_sO14 is "medial_Fa;Notch_:8/Fa;Notch_:9/GNb3Fa;Notch_:12";
  species medial_sO6 in medial = 0; medial_sO6 is "medial_;Notch_:8/GNb3Fa;Notch_:9/;Notch_:12";
  species medial_sO15 in medial = 0; medial_sO15 is "medial_Fa;Notch_:8/GNb3Fa;Notch_:9/;Notch_:12";
  species medial_sO7 in medial = 0; medial_sO7 is "medial_;Notch_:8/GNb3Fa;Notch_:9/Fa;Notch_:12";
  species medial_sO16 in medial = 0; medial_sO16 is "medial_Fa;Notch_:8/GNb3Fa;Notch_:9/Fa;Notch_:12";
  species medial_sO8 in medial = 0; medial_sO8 is "medial_;Notch_:8/GNb3Fa;Notch_:9/GNb3Fa;Notch_:12";
  species medial_sO17 in medial = 0; medial_sO17 is "medial_Fa;Notch_:8/GNb3Fa;Notch_:9/GNb3Fa;Notch_:12";
  species medial_sO18 in medial = 0; medial_sO18 is "medial_GNb3Fa;Notch_:8/;Notch_:9/;Notch_:12";
  species medial_sO19 in medial = 0; medial_sO19 is "medial_GNb3Fa;Notch_:8/;Notch_:9/Fa;Notch_:12";
  species medial_sO20 in medial = 0; medial_sO20 is "medial_GNb3Fa;Notch_:8/;Notch_:9/GNb3Fa;Notch_:12";
  species medial_sO21 in medial = 0; medial_sO21 is "medial_GNb3Fa;Notch_:8/Fa;Notch_:9/;Notch_:12";
  species medial_sO22 in medial = 0; medial_sO22 is "medial_GNb3Fa;Notch_:8/Fa;Notch_:9/Fa;Notch_:12";
  species medial_sO23 in medial = 0; medial_sO23 is "medial_GNb3Fa;Notch_:8/Fa;Notch_:9/GNb3Fa;Notch_:12";
  species medial_sO24 in medial = 0; medial_sO24 is "medial_GNb3Fa;Notch_:8/GNb3Fa;Notch_:9/;Notch_:12";
  species medial_sO25 in medial = 0; medial_sO25 is "medial_GNb3Fa;Notch_:8/GNb3Fa;Notch_:9/Fa;Notch_:12";
  species trans_OFUT1 in trans = 1;
  species trans_Fringe in trans = 1;
  species trans_UDP_Fuc in trans = 1;
  species trans_UDP in trans = 1;
  species trans_UDP_GlcNAc in trans = 1;
  species trans_sO0 in trans = 0; trans_sO0 is "trans_;Notch_:8/;Notch_:9/;Notch_:12";
  species trans_sO9 in trans = 0; trans_sO9 is "trans_Fa;Notch_:8/;Notch_:9/;Notch_:12";
  species trans_sO1 in trans = 0; trans_sO1 is "trans_;Notch_:8/;Notch_:9/Fa;Notch_:12";
  species trans_sO10 in trans = 0; trans_sO10 is "trans_Fa;Notch_:8/;Notch_:9/Fa;Notch_:12";
  species trans_sO2 in trans = 0; trans_sO2 is "trans_;Notch_:8/;Notch_:9/GNb3Fa;Notch_:12";
  species trans_sO11 in trans = 0; trans_sO11 is "trans_Fa;Notch_:8/;Notch_:9/GNb3Fa;Notch_:12";
  species trans_sO3 in trans = 0; trans_sO3 is "trans_;Notch_:8/Fa;Notch_:9/;Notch_:12";
  species trans_sO12 in trans = 0; trans_sO12 is "trans_Fa;Notch_:8/Fa;Notch_:9/;Notch_:12";
  species trans_sO4 in trans = 0; trans_sO4 is "trans_;Notch_:8/Fa;Notch_:9/Fa;Notch_:12";
  species trans_sO13 in trans = 0; trans_sO13 is "trans_Fa;Notch_:8/Fa;Notch_:9/Fa;Notch_:12";
  species trans_sO5 in trans = 0; trans_sO5 is "trans_;Notch_:8/Fa;Notch_:9/GNb3Fa;Notch_:12";
  species trans_sO14 in trans = 0; trans_sO14 is "trans_Fa;Notch_:8/Fa;Notch_:9/GNb3Fa;Notch_:12";
  species trans_sO6 in trans = 0; trans_sO6 is "trans_;Notch_:8/GNb3Fa;Notch_:9/;Notch_:12";
  species trans_sO15 in trans = 0; trans_sO15 is "trans_Fa;Notch_:8/GNb3Fa;Notch_:9/;Notch_:12";
  species trans_sO7 in trans = 0; trans_sO7 is "trans_;Notch_:8/GNb3Fa;Notch_:9/Fa;Notch_:12";
  species trans_sO16 in trans = 0; trans_sO16 is "trans_Fa;Notch_:8/GNb3Fa;Notch_:9/Fa;Notch_:12";
  species trans_sO8 in trans = 0; trans_sO8 is "trans_;Notch_:8/GNb3Fa;Notch_:9/GNb3Fa;Notch_:12";
  species trans_sO17 in trans = 0; trans_sO17 is "trans_Fa;Notch_:8/GNb3Fa;Notch_:9/GNb3Fa;Notch_:12";
  species trans_sO18 in trans = 0; trans_sO18 is "trans_GNb3Fa;Notch_:8/;Notch_:9/;Notch_:12";
  species trans_sO19 in trans = 0; trans_sO19 is "trans_GNb3Fa;Notch_:8/;Notch_:9/Fa;Notch_:12";
  species trans_sO20 in trans = 0; trans_sO20 is "trans_GNb3Fa;Notch_:8/;Notch_:9/GNb3Fa;Notch_:12";
  species trans_sO21 in trans = 0; trans_sO21 is "trans_GNb3Fa;Notch_:8/Fa;Notch_:9/;Notch_:12";
  species trans_sO22 in trans = 0; trans_sO22 is "trans_GNb3Fa;Notch_:8/Fa;Notch_:9/Fa;Notch_:12";
  species trans_sO23 in trans = 0; trans_sO23 is "trans_GNb3Fa;Notch_:8/Fa;Notch_:9/GNb3Fa;Notch_:12";
  species trans_sO24 in trans = 0; trans_sO24 is "trans_GNb3Fa;Notch_:8/GNb3Fa;Notch_:9/;Notch_:12";
  species trans_sO25 in trans = 0; trans_sO25 is "trans_GNb3Fa;Notch_:8/GNb3Fa;Notch_:9/Fa;Notch_:12";
  species TGN_OFUT1 in TGN = 1;
  species TGN_Fringe in TGN = 1;
  species TGN_UDP_Fuc in TGN = 1;
  species TGN_UDP in TGN = 1;
  species TGN_UDP_GlcNAc in TGN = 1;
  species TGN_sO0 in TGN = 0; TGN_sO0 is "TGN_;Notch_:8/;Notch_:9/;Notch_:12";
  species TGN_sO9 in TGN = 0; TGN_sO9 is "TGN_Fa;Notch_:8/;Notch_:9/;Notch_:12";
  species TGN_sO1 in TGN = 0; TGN_sO1 is "TGN_;Notch_:8/;Notch_:9/Fa;Notch_:12";
  species TGN_sO10 in TGN = 0; TGN_sO10 is "TGN_Fa;Notch_:8/;Notch_:9/Fa;Notch_:12";
  species TGN_sO2 in TGN = 0; TGN_sO2 is "TGN_;Notch_:8/;Notch_:9/GNb3Fa;Notch_:12";
  species TGN_sO11 in TGN = 0; TGN_sO11 is "TGN_Fa;Notch_:8/;Notch_:9/GNb3Fa;Notch_:12";
  species TGN_sO3 in TGN = 0; TGN_sO3 is "TGN_;Notch_:8/Fa;Notch_:9/;Notch_:12";
  species TGN_sO12 in TGN = 0; TGN_sO12 is "TGN_Fa;Notch_:8/Fa;Notch_:9/;Notch_:12";
  species TGN_sO4 in TGN = 0; TGN_sO4 is "TGN_;Notch_:8/Fa;Notch_:9/Fa;Notch_:12";
  species TGN_sO13 in TGN = 0; TGN_sO13 is "TGN_Fa;Notch_:8/Fa;Notch_:9/Fa;Notch_:12";
  species TGN_sO5 in TGN = 0; TGN_sO5 is "TGN_;Notch_:8/Fa;Notch_:9/GNb3Fa;Notch_:12";
  species TGN_sO14 in TGN = 0; TGN_sO14 is "TGN_Fa;Notch_:8/Fa;Notch_:9/GNb3Fa;Notch_:12";
  species TGN_sO6 in TGN = 0; TGN_sO6 is "TGN_;Notch_:8/GNb3Fa;Notch_:9/;Notch_:12";
  species TGN_sO15 in TGN = 0; TGN_sO15 is "TGN_Fa;Notch_:8/GNb3Fa;Notch_:9/;Notch_:12";
  species TGN_sO7 in TGN = 0; TGN_sO7 is "TGN_;Notch_:8/GNb3Fa;Notch_:9/Fa;Notch_:12";
  species TGN_sO16 in TGN = 0; TGN_sO16 is "TGN_Fa;Notch_:8/GNb3Fa;Notch_:9/Fa;Notch_:12";
  species TGN_sO8 in TGN = 0; TGN_sO8 is "TGN_;Notch_:8/GNb3Fa;Notch_:9/GNb3Fa;Notch_:12";
  species TGN_sO17 in TGN = 0; TGN_sO17 is "TGN_Fa;Notch_:8/GNb3Fa;Notch_:9/GNb3Fa;Notch_:12";
  species TGN_sO18 in TGN = 0; TGN_sO18 is "TGN_GNb3Fa;Notch_:8/;Notch_:9/;Notch_:12";
  species TGN_sO19 in TGN = 0; TGN_sO19 is "TGN_GNb3Fa;Notch_:8/;Notch_:9/Fa;Notch_:12";
  species TGN_sO20 in TGN = 0; TGN_sO20 is "TGN_GNb3Fa;Notch_:8/;Notch_:9/GNb3Fa;Notch_:12";
  species TGN_sO21 in TGN = 0; TGN_sO21 is "TGN_GNb3Fa;Notch_:8/Fa;Notch_:9/;Notch_:12";
  species TGN_sO22 in TGN = 0; TGN_sO22 is "TGN_GNb3Fa;Notch_:8/Fa;Notch_:9/Fa;Notch_:12";
  species TGN_sO23 in TGN = 0; TGN_sO23 is "TGN_GNb3Fa;Notch_:8/Fa;Notch_:9/GNb3Fa;Notch_:12";
  species TGN_sO24 in TGN = 0; TGN_sO24 is "TGN_GNb3Fa;Notch_:8/GNb3Fa;Notch_:9/;Notch_:12";
  species TGN_sO25 in TGN = 0; TGN_sO25 is "TGN_GNb3Fa;Notch_:8/GNb3Fa;Notch_:9/Fa;Notch_:12";
  species Sec_OFUT1 in Sec = 1;
  species Sec_Fringe in Sec = 1;
  species Sec_UDP_Fuc in Sec = 1;
  species Sec_UDP in Sec = 1;
  species Sec_UDP_GlcNAc in Sec = 1;
  species Sec_sO0 in Sec = 0; Sec_sO0 is "Sec_;Notch_:8/;Notch_:9/;Notch_:12";
  species Sec_sO9 in Sec = 0; Sec_sO9 is "Sec_Fa;Notch_:8/;Notch_:9/;Notch_:12";
  species Sec_sO1 in Sec = 0; Sec_sO1 is "Sec_;Notch_:8/;Notch_:9/Fa;Notch_:12";
  species Sec_sO10 in Sec = 0; Sec_sO10 is "Sec_Fa;Notch_:8/;Notch_:9/Fa;Notch_:12";
  species Sec_sO2 in Sec = 0; Sec_sO2 is "Sec_;Notch_:8/;Notch_:9/GNb3Fa;Notch_:12";
  species Sec_sO11 in Sec = 0; Sec_sO11 is "Sec_Fa;Notch_:8/;Notch_:9/GNb3Fa;Notch_:12";
  species Sec_sO3 in Sec = 0; Sec_sO3 is "Sec_;Notch_:8/Fa;Notch_:9/;Notch_:12";
  species Sec_sO12 in Sec = 0; Sec_sO12 is "Sec_Fa;Notch_:8/Fa;Notch_:9/;Notch_:12";
  species Sec_sO4 in Sec = 0; Sec_sO4 is "Sec_;Notch_:8/Fa;Notch_:9/Fa;Notch_:12";
  species Sec_sO13 in Sec = 0; Sec_sO13 is "Sec_Fa;Notch_:8/Fa;Notch_:9/Fa;Notch_:12";
  species Sec_sO5 in Sec = 0; Sec_sO5 is "Sec_;Notch_:8/Fa;Notch_:9/GNb3Fa;Notch_:12";
  species Sec_sO14 in Sec = 0; Sec_sO14 is "Sec_Fa;Notch_:8/Fa;Notch_:9/GNb3Fa;Notch_:12";
  species Sec_sO6 in Sec = 0; Sec_sO6 is "Sec_;Notch_:8/GNb3Fa;Notch_:9/;Notch_:12";
  species Sec_sO15 in Sec = 0; Sec_sO15 is "Sec_Fa;Notch_:8/GNb3Fa;Notch_:9/;Notch_:12";
  species Sec_sO7 in Sec = 0; Sec_sO7 is "Sec_;Notch_:8/GNb3Fa;Notch_:9/Fa;Notch_:12";
  species Sec_sO16 in Sec = 0; Sec_sO16 is "Sec_Fa;Notch_:8/GNb3Fa;Notch_:9/Fa;Notch_:12";
  species Sec_sO8 in Sec = 0; Sec_sO8 is "Sec_;Notch_:8/GNb3Fa;Notch_:9/GNb3Fa;Notch_:12";
  species Sec_sO17 in Sec = 0; Sec_sO17 is "Sec_Fa;Notch_:8/GNb3Fa;Notch_:9/GNb3Fa;Notch_:12";
  species Sec_sO18 in Sec = 0; Sec_sO18 is "Sec_GNb3Fa;Notch_:8/;Notch_:9/;Notch_:12";
  species Sec_sO19 in Sec = 0; Sec_sO19 is "Sec_GNb3Fa;Notch_:8/;Notch_:9/Fa;Notch_:12";
  species Sec_sO20 in Sec = 0; Sec_sO20 is "Sec_GNb3Fa;Notch_:8/;Notch_:9/GNb3Fa;Notch_:12";
  species Sec_sO21 in Sec = 0; Sec_sO21 is "Sec_GNb3Fa;Notch_:8/Fa;Notch_:9/;Notch_:12";
  species Sec_sO22 in Sec = 0; Sec_sO22 is "Sec_GNb3Fa;Notch_:8/Fa;Notch_:9/Fa;Notch_:12";
  species Sec_sO23 in Sec = 0; Sec_sO23 is "Sec_GNb3Fa;Notch_:8/Fa;Notch_:9/GNb3Fa;Notch_:12";
  species Sec_sO24 in Sec = 0; Sec_sO24 is "Sec_GNb3Fa;Notch_:8/GNb3Fa;Notch_:9/;Notch_:12";
  species Sec_sO25 in Sec = 0; Sec_sO25 is "Sec_GNb3Fa;Notch_:8/GNb3Fa;Notch_:9/Fa;Notch_:12";

  // Parameters:
  OFUT1_kf_OR0_0 = 1 per_minute;
  OFUT1_Km_OR0_0 = 1 micro_molar;
  OFUT1_Kmd_UDP_Fuc = 1 micro_molar;
  OFUT1_kf_OR0_1 = 1 per_minute;
  OFUT1_Km_OR0_1 = 1 micro_molar;
  OFUT1_kf_OR0_2 = 1 per_minute;
  OFUT1_Km_OR0_2 = 1 micro_molar;
  OFUT1_kf_OR0_3 = 1 per_minute;
  OFUT1_Km_OR0_3 = 1 micro_molar;
  OFUT1_kf_OR0_4 = 1 per_minute;
  OFUT1_Km_OR0_4 = 1 micro_molar;
  OFUT1_kf_OR0_5 = 1 per_minute;
  OFUT1_Km_OR0_5 = 1 micro_molar;
  OFUT1_kf_OR0_6 = 1 per_minute;
  OFUT1_Km_OR0_6 = 1 micro_molar;
  OFUT1_kf_OR0_7 = 1 per_minute;
  OFUT1_Km_OR0_7 = 1 micro_molar;
  OFUT1_kf_OR0_8 = 1 per_minute;
  OFUT1_Km_OR0_8 = 1 micro_molar;
  Fringe_kf_OR1_0 = 1 per_minute;
  Fringe_Km_OR1_0 = 1 micro_molar;
  Fringe_Kmd_UDP_GlcNAc = 1 micro_molar;
  Fringe_kf_OR1_1 = 1 per_minute;
  Fringe_Km_OR1_1 = 1 micro_molar;
  Fringe_kf_OR1_2 = 1 per_minute;
  Fringe_Km_OR1_2 = 1 micro_molar;
  Fringe_kf_OR1_3 = 1 per_minute;
  Fringe_Km_OR1_3 = 1 micro_molar;
  Fringe_kf_OR1_4 = 1 per_minute;
  Fringe_Km_OR1_4 = 1 micro_molar;
  Fringe_kf_OR1_5 = 1 per_minute;
  Fringe_Km_OR1_5 = 1 micro_molar;
  Fringe_kf_OR1_6 = 1 per_minute;
  Fringe_Km_OR1_6 = 1 micro_molar;
  Fringe_kf_OR1_7 = 1 per_minute;
  Fringe_Km_OR1_7 = 1 micro_molar;
  OFUT1_kf_OR2_0 = 1 per_minute;
  OFUT1_Km_OR2_0 = 1 micro_molar;
  OFUT1_kf_OR2_1 = 1 per_minute;
  OFUT1_Km_OR2_1 = 1 micro_molar;
  OFUT1_kf_OR2_2 = 1 per_minute;
  OFUT1_Km_OR2_2 = 1 micro_molar;
  OFUT1_kf_OR2_3 = 1 per_minute;
  OFUT1_Km_OR2_3 = 1 micro_molar;
  OFUT1_kf_OR2_4 = 1 per_minute;
  OFUT1_Km_OR2_4 = 1 micro_molar;
  OFUT1_kf_OR2_5 = 1 per_minute;
  OFUT1_Km_OR2_5 = 1 micro_molar;
  OFUT1_kf_OR2_6 = 1 per_minute;
  OFUT1_Km_OR2_6 = 1 micro_molar;
  OFUT1_kf_OR2_7 = 1 per_minute;
  OFUT1_Km_OR2_7 = 1 micro_molar;
  OFUT1_kf_OR2_8 = 1 per_minute;
  OFUT1_Km_OR2_8 = 1 micro_molar;
  Fringe_kf_OR3_0 = 1 per_minute;
  Fringe_Km_OR3_0 = 1 micro_molar;
  Fringe_kf_OR3_1 = 1 per_minute;
  Fringe_Km_OR3_1 = 1 micro_molar;
  Fringe_kf_OR3_2 = 1 per_minute;
  Fringe_Km_OR3_2 = 1 micro_molar;
  Fringe_kf_OR3_3 = 1 per_minute;
  Fringe_Km_OR3_3 = 1 micro_molar;
  Fringe_kf_OR3_4 = 1 per_minute;
  Fringe_Km_OR3_4 = 1 micro_molar;
  Fringe_kf_OR3_5 = 1 per_minute;
  Fringe_Km_OR3_5 = 1 micro_molar;
  Fringe_kf_OR3_6 = 1 per_minute;
  Fringe_Km_OR3_6 = 1 micro_molar;
  Fringe_kf_OR3_7 = 1 per_minute;
  Fringe_Km_OR3_7 = 1 micro_molar;
  OFUT1_kf_OR4_0 = 1 per_minute;
  OFUT1_Km_OR4_0 = 1 micro_molar;
  OFUT1_kf_OR4_1 = 1 per_minute;
  OFUT1_Km_OR4_1 = 1 micro_molar;
  OFUT1_kf_OR4_2 = 1 per_minute;
  OFUT1_Km_OR4_2 = 1 micro_molar;
  OFUT1_kf_OR4_3 = 1 per_minute;
  OFUT1_Km_OR4_3 = 1 micro_molar;
  OFUT1_kf_OR4_4 = 1 per_minute;
  OFUT1_Km_OR4_4 = 1 micro_molar;
  OFUT1_kf_OR4_5 = 1 per_minute;
  OFUT1_Km_OR4_5 = 1 micro_molar;
  OFUT1_kf_OR4_6 = 1 per_minute;
  OFUT1_Km_OR4_6 = 1 micro_molar;
  OFUT1_kf_OR4_7 = 1 per_minute;
  OFUT1_Km_OR4_7 = 1 micro_molar;
  OFUT1_kf_OR4_8 = 1 per_minute;
  OFUT1_Km_OR4_8 = 1 micro_molar;
  Fringe_kf_OR5_0 = 1 per_minute;
  Fringe_Km_OR5_0 = 1 micro_molar;
  Fringe_kf_OR5_1 = 1 per_minute;
  Fringe_Km_OR5_1 = 1 micro_molar;
  Fringe_kf_OR5_2 = 1 per_minute;
  Fringe_Km_OR5_2 = 1 micro_molar;
  Fringe_kf_OR5_3 = 1 per_minute;
  Fringe_Km_OR5_3 = 1 micro_molar;
  Fringe_kf_OR5_4 = 1 per_minute;
  Fringe_Km_OR5_4 = 1 micro_molar;
  Fringe_kf_OR5_5 = 1 per_minute;
  Fringe_Km_OR5_5 = 1 micro_molar;
  Fringe_kf_OR5_6 = 1 per_minute;
  Fringe_Km_OR5_6 = 1 micro_molar;
  Fringe_kf_OR5_7 = 1 per_minute;
  Fringe_Km_OR5_7 = 1 micro_molar;
  cis_transport_O0 = 0.18 per_minute;
  cis_transport_O9 = 0.18 per_minute;
  cis_transport_O1 = 0.18 per_minute;
  cis_transport_O10 = 0.18 per_minute;
  cis_transport_O2 = 0.18 per_minute;
  cis_transport_O11 = 0.18 per_minute;
  cis_transport_O3 = 0.18 per_minute;
  cis_transport_O12 = 0.18 per_minute;
  cis_transport_O4 = 0.18 per_minute;
  cis_transport_O13 = 0.18 per_minute;
  cis_transport_O5 = 0.18 per_minute;
  cis_transport_O14 = 0.18 per_minute;
  cis_transport_O6 = 0.18 per_minute;
  cis_transport_O15 = 0.18 per_minute;
  cis_transport_O7 = 0.18 per_minute;
  cis_transport_O16 = 0.18 per_minute;
  cis_transport_O8 = 0.18 per_minute;
  cis_transport_O17 = 0.18 per_minute;
  cis_transport_O18 = 0.18 per_minute;
  cis_transport_O19 = 0.18 per_minute;
  cis_transport_O20 = 0.18 per_minute;
  cis_transport_O21 = 0.18 per_minute;
  cis_transport_O22 = 0.18 per_minute;
  cis_transport_O23 = 0.18 per_minute;
  cis_transport_O24 = 0.18 per_minute;
  cis_transport_O25 = 0.18 per_minute;
  medial_transport_O0 = 0.18 per_minute;
  medial_transport_O9 = 0.18 per_minute;
  medial_transport_O1 = 0.18 per_minute;
  medial_transport_O10 = 0.18 per_minute;
  medial_transport_O2 = 0.18 per_minute;
  medial_transport_O11 = 0.18 per_minute;
  medial_transport_O3 = 0.18 per_minute;
  medial_transport_O12 = 0.18 per_minute;
  medial_transport_O4 = 0.18 per_minute;
  medial_transport_O13 = 0.18 per_minute;
  medial_transport_O5 = 0.18 per_minute;
  medial_transport_O14 = 0.18 per_minute;
  medial_transport_O6 = 0.18 per_minute;
  medial_transport_O15 = 0.18 per_minute;
  medial_transport_O7 = 0.18 per_minute;
  medial_transport_O16 = 0.18 per_minute;
  medial_transport_O8 = 0.18 per_minute;
  medial_transport_O17 = 0.18 per_minute;
  medial_transport_O18 = 0.18 per_minute;
  medial_transport_O19 = 0.18 per_minute;
  medial_transport_O20 = 0.18 per_minute;
  medial_transport_O21 = 0.18 per_minute;
  medial_transport_O22 = 0.18 per_minute;
  medial_transport_O23 = 0.18 per_minute;
  medial_transport_O24 = 0.18 per_minute;
  medial_transport_O25 = 0.18 per_minute;
  trans_transport_O0 = 0.18 per_minute;
  trans_transport_O9 = 0.18 per_minute;
  trans_transport_O1 = 0.18 per_minute;
  trans_transport_O10 = 0.18 per_minute;
  trans_transport_O2 = 0.18 per_minute;
  trans_transport_O11 = 0.18 per_minute;
  trans_transport_O3 = 0.18 per_minute;
  trans_transport_O12 = 0.18 per_minute;
  trans_transport_O4 = 0.18 per_minute;
  trans_transport_O13 = 0.18 per_minute;
  trans_transport_O5 = 0.18 per_minute;
  trans_transport_O14 = 0.18 per_minute;
  trans_transport_O6 = 0.18 per_minute;
  trans_transport_O15 = 0.18 per_minute;
  trans_transport_O7 = 0.18 per_minute;
  trans_transport_O16 = 0.18 per_minute;
  trans_transport_O8 = 0.18 per_minute;
  trans_transport_O17 = 0.18 per_minute;
  trans_transport_O18 = 0.18 per_minute;
  trans_transport_O19 = 0.18 per_minute;
  trans_transport_O20 = 0.18 per_minute;
  trans_transport_O21 = 0.18 per_minute;
  trans_transport_O22 = 0.18 per_minute;
  trans_transport_O23 = 0.18 per_minute;
  trans_transport_O24 = 0.18 per_minute;
  trans_transport_O25 = 0.18 per_minute;
  TGN_transport_O0 = 0.18 per_minute;
  TGN_transport_O9 = 0.18 per_minute;
  TGN_transport_O1 = 0.18 per_minute;
  TGN_transport_O10 = 0.18 per_minute;
  TGN_transport_O2 = 0.18 per_minute;
  TGN_transport_O11 = 0.18 per_minute;
  TGN_transport_O3 = 0.18 per_minute;
  TGN_transport_O12 = 0.18 per_minute;
  TGN_transport_O4 = 0.18 per_minute;
  TGN_transport_O13 = 0.18 per_minute;
  TGN_transport_O5 = 0.18 per_minute;
  TGN_transport_O14 = 0.18 per_minute;
  TGN_transport_O6 = 0.18 per_minute;
  TGN_transport_O15 = 0.18 per_minute;
  TGN_transport_O7 = 0.18 per_minute;
  TGN_transport_O16 = 0.18 per_minute;
  TGN_transport_O8 = 0.18 per_minute;
  TGN_transport_O17 = 0.18 per_minute;
  TGN_transport_O18 = 0.18 per_minute;
  TGN_transport_O19 = 0.18 per_minute;
  TGN_transport_O20 = 0.18 per_minute;
  TGN_transport_O21 = 0.18 per_minute;
  TGN_transport_O22 = 0.18 per_minute;
  TGN_transport_O23 = 0.18 per_minute;
  TGN_transport_O24 = 0.18 per_minute;
  TGN_transport_O25 = 0.18 per_minute;

  // Reactions:
  cis_reOR0_0: cis_sO0 + cis_UDP_Fuc => cis_sO9 + cis_UDP; OFUT1_kf_OR0_0*cis_OFUT1*cis_sO0*cis_UDP_Fuc/(OFUT1_Km_OR0_0*OFUT1_Kmd_UDP_Fuc*(1 + cis_UDP_Fuc/OFUT1_Kmd_UDP_Fuc)*(1 + cis_sO0/OFUT1_Km_OR0_0));  // modifiers: cis_OFUT1
  cis_reOR0_1: cis_sO1 + cis_UDP_Fuc => cis_sO10 + cis_UDP; OFUT1_kf_OR0_1*cis_OFUT1*cis_sO1*cis_UDP_Fuc/(OFUT1_Km_OR0_1*OFUT1_Kmd_UDP_Fuc*(1 + cis_UDP_Fuc/OFUT1_Kmd_UDP_Fuc)*(1 + cis_sO0/OFUT1_Km_OR0_1));  // modifiers: cis_OFUT1
  cis_reOR0_2: cis_sO2 + cis_UDP_Fuc => cis_sO11 + cis_UDP; OFUT1_kf_OR0_2*cis_OFUT1*cis_sO2*cis_UDP_Fuc/(OFUT1_Km_OR0_2*OFUT1_Kmd_UDP_Fuc*(1 + cis_UDP_Fuc/OFUT1_Kmd_UDP_Fuc)*(1 + cis_sO0/OFUT1_Km_OR0_2));  // modifiers: cis_OFUT1
  cis_reOR0_3: cis_sO3 + cis_UDP_Fuc => cis_sO12 + cis_UDP; OFUT1_kf_OR0_3*cis_OFUT1*cis_sO3*cis_UDP_Fuc/(OFUT1_Km_OR0_3*OFUT1_Kmd_UDP_Fuc*(1 + cis_UDP_Fuc/OFUT1_Kmd_UDP_Fuc)*(1 + cis_sO0/OFUT1_Km_OR0_3));  // modifiers: cis_OFUT1
  cis_reOR0_4: cis_sO4 + cis_UDP_Fuc => cis_sO13 + cis_UDP; OFUT1_kf_OR0_4*cis_OFUT1*cis_sO4*cis_UDP_Fuc/(OFUT1_Km_OR0_4*OFUT1_Kmd_UDP_Fuc*(1 + cis_UDP_Fuc/OFUT1_Kmd_UDP_Fuc)*(1 + cis_sO0/OFUT1_Km_OR0_4));  // modifiers: cis_OFUT1
  cis_reOR0_5: cis_sO5 + cis_UDP_Fuc => cis_sO14 + cis_UDP; OFUT1_kf_OR0_5*cis_OFUT1*cis_sO5*cis_UDP_Fuc/(OFUT1_Km_OR0_5*OFUT1_Kmd_UDP_Fuc*(1 + cis_UDP_Fuc/OFUT1_Kmd_UDP_Fuc)*(1 + cis_sO0/OFUT1_Km_OR0_5));  // modifiers: cis_OFUT1
  cis_reOR0_6: cis_sO6 + cis_UDP_Fuc => cis_sO15 + cis_UDP; OFUT1_kf_OR0_6*cis_OFUT1*cis_sO6*cis_UDP_Fuc/(OFUT1_Km_OR0_6*OFUT1_Kmd_UDP_Fuc*(1 + cis_UDP_Fuc/OFUT1_Kmd_UDP_Fuc)*(1 + cis_sO0/OFUT1_Km_OR0_6));  // modifiers: cis_OFUT1
  cis_reOR0_7: cis_sO7 + cis_UDP_Fuc => cis_sO16 + cis_UDP; OFUT1_kf_OR0_7*cis_OFUT1*cis_sO7*cis_UDP_Fuc/(OFUT1_Km_OR0_7*OFUT1_Kmd_UDP_Fuc*(1 + cis_UDP_Fuc/OFUT1_Kmd_UDP_Fuc)*(1 + cis_sO0/OFUT1_Km_OR0_7));  // modifiers: cis_OFUT1
  cis_reOR0_8: cis_sO8 + cis_UDP_Fuc => cis_sO17 + cis_UDP; OFUT1_kf_OR0_8*cis_OFUT1*cis_sO8*cis_UDP_Fuc/(OFUT1_Km_OR0_8*OFUT1_Kmd_UDP_Fuc*(1 + cis_UDP_Fuc/OFUT1_Kmd_UDP_Fuc)*(1 + cis_sO0/OFUT1_Km_OR0_8));  // modifiers: cis_OFUT1
  cis_reOR1_0: cis_sO9 + cis_UDP_GlcNAc => cis_sO18 + cis_UDP; Fringe_kf_OR1_0*cis_Fringe*cis_sO9*cis_UDP_GlcNAc/(Fringe_Km_OR1_0*Fringe_Kmd_UDP_GlcNAc*(1 + cis_UDP_GlcNAc/Fringe_Kmd_UDP_GlcNAc)*(1 + cis_sO9/Fringe_Km_OR1_0));  // modifiers: cis_Fringe
  cis_reOR1_1: cis_sO10 + cis_UDP_GlcNAc => cis_sO19 + cis_UDP; Fringe_kf_OR1_1*cis_Fringe*cis_sO10*cis_UDP_GlcNAc/(Fringe_Km_OR1_1*Fringe_Kmd_UDP_GlcNAc*(1 + cis_UDP_GlcNAc/Fringe_Kmd_UDP_GlcNAc)*(1 + cis_sO9/Fringe_Km_OR1_1));  // modifiers: cis_Fringe
  cis_reOR1_2: cis_sO11 + cis_UDP_GlcNAc => cis_sO20 + cis_UDP; Fringe_kf_OR1_2*cis_Fringe*cis_sO11*cis_UDP_GlcNAc/(Fringe_Km_OR1_2*Fringe_Kmd_UDP_GlcNAc*(1 + cis_UDP_GlcNAc/Fringe_Kmd_UDP_GlcNAc)*(1 + cis_sO9/Fringe_Km_OR1_2));  // modifiers: cis_Fringe
  cis_reOR1_3: cis_sO12 + cis_UDP_GlcNAc => cis_sO21 + cis_UDP; Fringe_kf_OR1_3*cis_Fringe*cis_sO12*cis_UDP_GlcNAc/(Fringe_Km_OR1_3*Fringe_Kmd_UDP_GlcNAc*(1 + cis_UDP_GlcNAc/Fringe_Kmd_UDP_GlcNAc)*(1 + cis_sO9/Fringe_Km_OR1_3));  // modifiers: cis_Fringe
  cis_reOR1_4: cis_sO13 + cis_UDP_GlcNAc => cis_sO22 + cis_UDP; Fringe_kf_OR1_4*cis_Fringe*cis_sO13*cis_UDP_GlcNAc/(Fringe_Km_OR1_4*Fringe_Kmd_UDP_GlcNAc*(1 + cis_UDP_GlcNAc/Fringe_Kmd_UDP_GlcNAc)*(1 + cis_sO9/Fringe_Km_OR1_4));  // modifiers: cis_Fringe
  cis_reOR1_5: cis_sO14 + cis_UDP_GlcNAc => cis_sO23 + cis_UDP; Fringe_kf_OR1_5*cis_Fringe*cis_sO14*cis_UDP_GlcNAc/(Fringe_Km_OR1_5*Fringe_Kmd_UDP_GlcNAc*(1 + cis_UDP_GlcNAc/Fringe_Kmd_UDP_GlcNAc)*(1 + cis_sO9/Fringe_Km_OR1_5));  // modifiers: cis_Fringe
  cis_reOR1_6: cis_sO15 + cis_UDP_GlcNAc => cis_sO24 + cis_UDP; Fringe_kf_OR1_6*cis_Fringe*cis_sO15*cis_UDP_GlcNAc/(Fringe_Km_OR1_6*Fringe_Kmd_UDP_GlcNAc*(1 + cis_UDP_GlcNAc/Fringe_Kmd_UDP_GlcNAc)*(1 + cis_sO9/Fringe_Km_OR1_6));  // modifiers: cis_Fringe
  cis_reOR1_7: cis_sO16 + cis_UDP_GlcNAc => cis_sO25 + cis_UDP; Fringe_kf_OR1_7*cis_Fringe*cis_sO16*cis_UDP_GlcNAc/(Fringe_Km_OR1_7*Fringe_Kmd_UDP_GlcNAc*(1 + cis_UDP_GlcNAc/Fringe_Kmd_UDP_GlcNAc)*(1 + cis_sO9/Fringe_Km_OR1_7));  // modifiers: cis_Fringe
  cis_reOR2_0: cis_sO0 + cis_UDP_Fuc => cis_sO3 + cis_UDP; OFUT1_kf_OR2_0*cis_OFUT1*cis_sO0*cis_UDP_Fuc/(OFUT1_Km_OR2_0*OFUT1_Kmd_UDP_Fuc*(1 + cis_UDP_Fuc/OFUT1_Kmd_UDP_Fuc)*(1 + cis_sO0/OFUT1_Km_OR2_0));  // modifiers: cis_OFUT1
  cis_reOR2_1: cis_sO1 + cis_UDP_Fuc => cis_sO4 + cis_UDP; OFUT1_kf_OR2_1*cis_OFUT1*cis_sO1*cis_UDP_Fuc/(OFUT1_Km_OR2_1*OFUT1_Kmd_UDP_Fuc*(1 + cis_UDP_Fuc/OFUT1_Kmd_UDP_Fuc)*(1 + cis_sO0/OFUT1_Km_OR2_1));  // modifiers: cis_OFUT1
  cis_reOR2_2: cis_sO2 + cis_UDP_Fuc => cis_sO5 + cis_UDP; OFUT1_kf_OR2_2*cis_OFUT1*cis_sO2*cis_UDP_Fuc/(OFUT1_Km_OR2_2*OFUT1_Kmd_UDP_Fuc*(1 + cis_UDP_Fuc/OFUT1_Kmd_UDP_Fuc)*(1 + cis_sO0/OFUT1_Km_OR2_2));  // modifiers: cis_OFUT1
  cis_reOR2_3: cis_sO9 + cis_UDP_Fuc => cis_sO12 + cis_UDP; OFUT1_kf_OR2_3*cis_OFUT1*cis_sO9*cis_UDP_Fuc/(OFUT1_Km_OR2_3*OFUT1_Kmd_UDP_Fuc*(1 + cis_UDP_Fuc/OFUT1_Kmd_UDP_Fuc)*(1 + cis_sO0/OFUT1_Km_OR2_3));  // modifiers: cis_OFUT1
  cis_reOR2_4: cis_sO10 + cis_UDP_Fuc => cis_sO13 + cis_UDP; OFUT1_kf_OR2_4*cis_OFUT1*cis_sO10*cis_UDP_Fuc/(OFUT1_Km_OR2_4*OFUT1_Kmd_UDP_Fuc*(1 + cis_UDP_Fuc/OFUT1_Kmd_UDP_Fuc)*(1 + cis_sO0/OFUT1_Km_OR2_4));  // modifiers: cis_OFUT1
  cis_reOR2_5: cis_sO11 + cis_UDP_Fuc => cis_sO14 + cis_UDP; OFUT1_kf_OR2_5*cis_OFUT1*cis_sO11*cis_UDP_Fuc/(OFUT1_Km_OR2_5*OFUT1_Kmd_UDP_Fuc*(1 + cis_UDP_Fuc/OFUT1_Kmd_UDP_Fuc)*(1 + cis_sO0/OFUT1_Km_OR2_5));  // modifiers: cis_OFUT1
  cis_reOR2_6: cis_sO18 + cis_UDP_Fuc => cis_sO21 + cis_UDP; OFUT1_kf_OR2_6*cis_OFUT1*cis_sO18*cis_UDP_Fuc/(OFUT1_Km_OR2_6*OFUT1_Kmd_UDP_Fuc*(1 + cis_UDP_Fuc/OFUT1_Kmd_UDP_Fuc)*(1 + cis_sO0/OFUT1_Km_OR2_6));  // modifiers: cis_OFUT1
  cis_reOR2_7: cis_sO19 + cis_UDP_Fuc => cis_sO22 + cis_UDP; OFUT1_kf_OR2_7*cis_OFUT1*cis_sO19*cis_UDP_Fuc/(OFUT1_Km_OR2_7*OFUT1_Kmd_UDP_Fuc*(1 + cis_UDP_Fuc/OFUT1_Kmd_UDP_Fuc)*(1 + cis_sO0/OFUT1_Km_OR2_7));  // modifiers: cis_OFUT1
  cis_reOR2_8: cis_sO20 + cis_UDP_Fuc => cis_sO23 + cis_UDP; OFUT1_kf_OR2_8*cis_OFUT1*cis_sO20*cis_UDP_Fuc/(OFUT1_Km_OR2_8*OFUT1_Kmd_UDP_Fuc*(1 + cis_UDP_Fuc/OFUT1_Kmd_UDP_Fuc)*(1 + cis_sO0/OFUT1_Km_OR2_8));  // modifiers: cis_OFUT1
  cis_reOR3_0: cis_sO3 + cis_UDP_GlcNAc => cis_sO6 + cis_UDP; Fringe_kf_OR3_0*cis_Fringe*cis_sO3*cis_UDP_GlcNAc/(Fringe_Km_OR3_0*Fringe_Kmd_UDP_GlcNAc*(1 + cis_UDP_GlcNAc/Fringe_Kmd_UDP_GlcNAc)*(1 + cis_sO9/Fringe_Km_OR3_0));  // modifiers: cis_Fringe
  cis_reOR3_1: cis_sO4 + cis_UDP_GlcNAc => cis_sO7 + cis_UDP; Fringe_kf_OR3_1*cis_Fringe*cis_sO4*cis_UDP_GlcNAc/(Fringe_Km_OR3_1*Fringe_Kmd_UDP_GlcNAc*(1 + cis_UDP_GlcNAc/Fringe_Kmd_UDP_GlcNAc)*(1 + cis_sO9/Fringe_Km_OR3_1));  // modifiers: cis_Fringe
  cis_reOR3_2: cis_sO5 + cis_UDP_GlcNAc => cis_sO8 + cis_UDP; Fringe_kf_OR3_2*cis_Fringe*cis_sO5*cis_UDP_GlcNAc/(Fringe_Km_OR3_2*Fringe_Kmd_UDP_GlcNAc*(1 + cis_UDP_GlcNAc/Fringe_Kmd_UDP_GlcNAc)*(1 + cis_sO9/Fringe_Km_OR3_2));  // modifiers: cis_Fringe
  cis_reOR3_3: cis_sO12 + cis_UDP_GlcNAc => cis_sO15 + cis_UDP; Fringe_kf_OR3_3*cis_Fringe*cis_sO12*cis_UDP_GlcNAc/(Fringe_Km_OR3_3*Fringe_Kmd_UDP_GlcNAc*(1 + cis_UDP_GlcNAc/Fringe_Kmd_UDP_GlcNAc)*(1 + cis_sO9/Fringe_Km_OR3_3));  // modifiers: cis_Fringe
  cis_reOR3_4: cis_sO13 + cis_UDP_GlcNAc => cis_sO16 + cis_UDP; Fringe_kf_OR3_4*cis_Fringe*cis_sO13*cis_UDP_GlcNAc/(Fringe_Km_OR3_4*Fringe_Kmd_UDP_GlcNAc*(1 + cis_UDP_GlcNAc/Fringe_Kmd_UDP_GlcNAc)*(1 + cis_sO9/Fringe_Km_OR3_4));  // modifiers: cis_Fringe
  cis_reOR3_5: cis_sO14 + cis_UDP_GlcNAc => cis_sO17 + cis_UDP; Fringe_kf_OR3_5*cis_Fringe*cis_sO14*cis_UDP_GlcNAc/(Fringe_Km_OR3_5*Fringe_Kmd_UDP_GlcNAc*(1 + cis_UDP_GlcNAc/Fringe_Kmd_UDP_GlcNAc)*(1 + cis_sO9/Fringe_Km_OR3_5));  // modifiers: cis_Fringe
  cis_reOR3_6: cis_sO21 + cis_UDP_GlcNAc => cis_sO24 + cis_UDP; Fringe_kf_OR3_6*cis_Fringe*cis_sO21*cis_UDP_GlcNAc/(Fringe_Km_OR3_6*Fringe_Kmd_UDP_GlcNAc*(1 + cis_UDP_GlcNAc/Fringe_Kmd_UDP_GlcNAc)*(1 + cis_sO9/Fringe_Km_OR3_6));  // modifiers: cis_Fringe
  cis_reOR3_7: cis_sO22 + cis_UDP_GlcNAc => cis_sO25 + cis_UDP; Fringe_kf_OR3_7*cis_Fringe*cis_sO22*cis_UDP_GlcNAc/(Fringe_Km_OR3_7*Fringe_Kmd_UDP_GlcNAc*(1 + cis_UDP_GlcNAc/Fringe_Kmd_UDP_GlcNAc)*(1 + cis_sO9/Fringe_Km_OR3_7));  // modifiers: cis_Fringe
  cis_reOR4_0: cis_sO0 + cis_UDP_Fuc => cis_sO1 + cis_UDP; OFUT1_kf_OR4_0*cis_OFUT1*cis_sO0*cis_UDP_Fuc/(OFUT1_Km_OR4_0*OFUT1_Kmd_UDP_Fuc*(1 + cis_UDP_Fuc/OFUT1_Kmd_UDP_Fuc)*(1 + cis_sO0/OFUT1_Km_OR4_0));  // modifiers: cis_OFUT1
  cis_reOR4_1: cis_sO3 + cis_UDP_Fuc => cis_sO4 + cis_UDP; OFUT1_kf_OR4_1*cis_OFUT1*cis_sO3*cis_UDP_Fuc/(OFUT1_Km_OR4_1*OFUT1_Kmd_UDP_Fuc*(1 + cis_UDP_Fuc/OFUT1_Kmd_UDP_Fuc)*(1 + cis_sO0/OFUT1_Km_OR4_1));  // modifiers: cis_OFUT1
  cis_reOR4_2: cis_sO6 + cis_UDP_Fuc => cis_sO7 + cis_UDP; OFUT1_kf_OR4_2*cis_OFUT1*cis_sO6*cis_UDP_Fuc/(OFUT1_Km_OR4_2*OFUT1_Kmd_UDP_Fuc*(1 + cis_UDP_Fuc/OFUT1_Kmd_UDP_Fuc)*(1 + cis_sO0/OFUT1_Km_OR4_2));  // modifiers: cis_OFUT1
  cis_reOR4_3: cis_sO9 + cis_UDP_Fuc => cis_sO10 + cis_UDP; OFUT1_kf_OR4_3*cis_OFUT1*cis_sO9*cis_UDP_Fuc/(OFUT1_Km_OR4_3*OFUT1_Kmd_UDP_Fuc*(1 + cis_UDP_Fuc/OFUT1_Kmd_UDP_Fuc)*(1 + cis_sO0/OFUT1_Km_OR4_3));  // modifiers: cis_OFUT1
  cis_reOR4_4: cis_sO12 + cis_UDP_Fuc => cis_sO13 + cis_UDP; OFUT1_kf_OR4_4*cis_OFUT1*cis_sO12*cis_UDP_Fuc/(OFUT1_Km_OR4_4*OFUT1_Kmd_UDP_Fuc*(1 + cis_UDP_Fuc/OFUT1_Kmd_UDP_Fuc)*(1 + cis_sO0/OFUT1_Km_OR4_4));  // modifiers: cis_OFUT1
  cis_reOR4_5: cis_sO15 + cis_UDP_Fuc => cis_sO16 + cis_UDP; OFUT1_kf_OR4_5*cis_OFUT1*cis_sO15*cis_UDP_Fuc/(OFUT1_Km_OR4_5*OFUT1_Kmd_UDP_Fuc*(1 + cis_UDP_Fuc/OFUT1_Kmd_UDP_Fuc)*(1 + cis_sO0/OFUT1_Km_OR4_5));  // modifiers: cis_OFUT1
  cis_reOR4_6: cis_sO18 + cis_UDP_Fuc => cis_sO19 + cis_UDP; OFUT1_kf_OR4_6*cis_OFUT1*cis_sO18*cis_UDP_Fuc/(OFUT1_Km_OR4_6*OFUT1_Kmd_UDP_Fuc*(1 + cis_UDP_Fuc/OFUT1_Kmd_UDP_Fuc)*(1 + cis_sO0/OFUT1_Km_OR4_6));  // modifiers: cis_OFUT1
  cis_reOR4_7: cis_sO21 + cis_UDP_Fuc => cis_sO22 + cis_UDP; OFUT1_kf_OR4_7*cis_OFUT1*cis_sO21*cis_UDP_Fuc/(OFUT1_Km_OR4_7*OFUT1_Kmd_UDP_Fuc*(1 + cis_UDP_Fuc/OFUT1_Kmd_UDP_Fuc)*(1 + cis_sO0/OFUT1_Km_OR4_7));  // modifiers: cis_OFUT1
  cis_reOR4_8: cis_sO24 + cis_UDP_Fuc => cis_sO25 + cis_UDP; OFUT1_kf_OR4_8*cis_OFUT1*cis_sO24*cis_UDP_Fuc/(OFUT1_Km_OR4_8*OFUT1_Kmd_UDP_Fuc*(1 + cis_UDP_Fuc/OFUT1_Kmd_UDP_Fuc)*(1 + cis_sO0/OFUT1_Km_OR4_8));  // modifiers: cis_OFUT1
  cis_reOR5_0: cis_sO1 + cis_UDP_GlcNAc => cis_sO2 + cis_UDP; Fringe_kf_OR5_0*cis_Fringe*cis_sO1*cis_UDP_GlcNAc/(Fringe_Km_OR5_0*Fringe_Kmd_UDP_GlcNAc*(1 + cis_UDP_GlcNAc/Fringe_Kmd_UDP_GlcNAc)*(1 + cis_sO9/Fringe_Km_OR5_0));  // modifiers: cis_Fringe
  cis_reOR5_1: cis_sO4 + cis_UDP_GlcNAc => cis_sO5 + cis_UDP; Fringe_kf_OR5_1*cis_Fringe*cis_sO4*cis_UDP_GlcNAc/(Fringe_Km_OR5_1*Fringe_Kmd_UDP_GlcNAc*(1 + cis_UDP_GlcNAc/Fringe_Kmd_UDP_GlcNAc)*(1 + cis_sO9/Fringe_Km_OR5_1));  // modifiers: cis_Fringe
  cis_reOR5_2: cis_sO7 + cis_UDP_GlcNAc => cis_sO8 + cis_UDP; Fringe_kf_OR5_2*cis_Fringe*cis_sO7*cis_UDP_GlcNAc/(Fringe_Km_OR5_2*Fringe_Kmd_UDP_GlcNAc*(1 + cis_UDP_GlcNAc/Fringe_Kmd_UDP_GlcNAc)*(1 + cis_sO9/Fringe_Km_OR5_2));  // modifiers: cis_Fringe
  cis_reOR5_3: cis_sO10 + cis_UDP_GlcNAc => cis_sO11 + cis_UDP; Fringe_kf_OR5_3*cis_Fringe*cis_sO10*cis_UDP_GlcNAc/(Fringe_Km_OR5_3*Fringe_Kmd_UDP_GlcNAc*(1 + cis_UDP_GlcNAc/Fringe_Kmd_UDP_GlcNAc)*(1 + cis_sO9/Fringe_Km_OR5_3));  // modifiers: cis_Fringe
  cis_reOR5_4: cis_sO13 + cis_UDP_GlcNAc => cis_sO14 + cis_UDP; Fringe_kf_OR5_4*cis_Fringe*cis_sO13*cis_UDP_GlcNAc/(Fringe_Km_OR5_4*Fringe_Kmd_UDP_GlcNAc*(1 + cis_UDP_GlcNAc/Fringe_Kmd_UDP_GlcNAc)*(1 + cis_sO9/Fringe_Km_OR5_4));  // modifiers: cis_Fringe
  cis_reOR5_5: cis_sO16 + cis_UDP_GlcNAc => cis_sO17 + cis_UDP; Fringe_kf_OR5_5*cis_Fringe*cis_sO16*cis_UDP_GlcNAc/(Fringe_Km_OR5_5*Fringe_Kmd_UDP_GlcNAc*(1 + cis_UDP_GlcNAc/Fringe_Kmd_UDP_GlcNAc)*(1 + cis_sO9/Fringe_Km_OR5_5));  // modifiers: cis_Fringe
  cis_reOR5_6: cis_sO19 + cis_UDP_GlcNAc => cis_sO20 + cis_UDP; Fringe_kf_OR5_6*cis_Fringe*cis_sO19*cis_UDP_GlcNAc/(Fringe_Km_OR5_6*Fringe_Kmd_UDP_GlcNAc*(1 + cis_UDP_GlcNAc/Fringe_Kmd_UDP_GlcNAc)*(1 + cis_sO9/Fringe_Km_OR5_6));  // modifiers: cis_Fringe
  cis_reOR5_7: cis_sO22 + cis_UDP_GlcNAc => cis_sO23 + cis_UDP; Fringe_kf_OR5_7*cis_Fringe*cis_sO22*cis_UDP_GlcNAc/(Fringe_Km_OR5_7*Fringe_Kmd_UDP_GlcNAc*(1 + cis_UDP_GlcNAc/Fringe_Kmd_UDP_GlcNAc)*(1 + cis_sO9/Fringe_Km_OR5_7));  // modifiers: cis_Fringe
  medial_reOR0_0: medial_sO0 + medial_UDP_Fuc => medial_sO9 + medial_UDP; OFUT1_kf_OR0_0*medial_OFUT1*medial_sO0*medial_UDP_Fuc/(OFUT1_Km_OR0_0*OFUT1_Kmd_UDP_Fuc*(1 + medial_UDP_Fuc/OFUT1_Kmd_UDP_Fuc)*(1 + cis_sO0/OFUT1_Km_OR0_0 + medial_sO0/OFUT1_Km_OR0_0));  // modifiers: medial_OFUT1
  medial_reOR0_1: medial_sO1 + medial_UDP_Fuc => medial_sO10 + medial_UDP; OFUT1_kf_OR0_1*medial_OFUT1*medial_sO1*medial_UDP_Fuc/(OFUT1_Km_OR0_1*OFUT1_Kmd_UDP_Fuc*(1 + medial_UDP_Fuc/OFUT1_Kmd_UDP_Fuc)*(1 + cis_sO0/OFUT1_Km_OR0_1 + medial_sO0/OFUT1_Km_OR0_1));  // modifiers: medial_OFUT1
  medial_reOR0_2: medial_sO2 + medial_UDP_Fuc => medial_sO11 + medial_UDP; OFUT1_kf_OR0_2*medial_OFUT1*medial_sO2*medial_UDP_Fuc/(OFUT1_Km_OR0_2*OFUT1_Kmd_UDP_Fuc*(1 + medial_UDP_Fuc/OFUT1_Kmd_UDP_Fuc)*(1 + cis_sO0/OFUT1_Km_OR0_2 + medial_sO0/OFUT1_Km_OR0_2));  // modifiers: medial_OFUT1
  medial_reOR0_3: medial_sO3 + medial_UDP_Fuc => medial_sO12 + medial_UDP; OFUT1_kf_OR0_3*medial_OFUT1*medial_sO3*medial_UDP_Fuc/(OFUT1_Km_OR0_3*OFUT1_Kmd_UDP_Fuc*(1 + medial_UDP_Fuc/OFUT1_Kmd_UDP_Fuc)*(1 + cis_sO0/OFUT1_Km_OR0_3 + medial_sO0/OFUT1_Km_OR0_3));  // modifiers: medial_OFUT1
  medial_reOR0_4: medial_sO4 + medial_UDP_Fuc => medial_sO13 + medial_UDP; OFUT1_kf_OR0_4*medial_OFUT1*medial_sO4*medial_UDP_Fuc/(OFUT1_Km_OR0_4*OFUT1_Kmd_UDP_Fuc*(1 + medial_UDP_Fuc/OFUT1_Kmd_UDP_Fuc)*(1 + cis_sO0/OFUT1_Km_OR0_4 + medial_sO0/OFUT1_Km_OR0_4));  // modifiers: medial_OFUT1
  medial_reOR0_5: medial_sO5 + medial_UDP_Fuc => medial_sO14 + medial_UDP; OFUT1_kf_OR0_5*medial_OFUT1*medial_sO5*medial_UDP_Fuc/(OFUT1_Km_OR0_5*OFUT1_Kmd_UDP_Fuc*(1 + medial_UDP_Fuc/OFUT1_Kmd_UDP_Fuc)*(1 + cis_sO0/OFUT1_Km_OR0_5 + medial_sO0/OFUT1_Km_OR0_5));  // modifiers: medial_OFUT1
  medial_reOR0_6: medial_sO6 + medial_UDP_Fuc => medial_sO15 + medial_UDP; OFUT1_kf_OR0_6*medial_OFUT1*medial_sO6*medial_UDP_Fuc/(OFUT1_Km_OR0_6*OFUT1_Kmd_UDP_Fuc*(1 + medial_UDP_Fuc/OFUT1_Kmd_UDP_Fuc)*(1 + cis_sO0/OFUT1_Km_OR0_6 + medial_sO0/OFUT1_Km_OR0_6));  // modifiers: medial_OFUT1
  medial_reOR0_7: medial_sO7 + medial_UDP_Fuc => medial_sO16 + medial_UDP; OFUT1_kf_OR0_7*medial_OFUT1*medial_sO7*medial_UDP_Fuc/(OFUT1_Km_OR0_7*OFUT1_Kmd_UDP_Fuc*(1 + medial_UDP_Fuc/OFUT1_Kmd_UDP_Fuc)*(1 + cis_sO0/OFUT1_Km_OR0_7 + medial_sO0/OFUT1_Km_OR0_7));  // modifiers: medial_OFUT1
  medial_reOR0_8: medial_sO8 + medial_UDP_Fuc => medial_sO17 + medial_UDP; OFUT1_kf_OR0_8*medial_OFUT1*medial_sO8*medial_UDP_Fuc/(OFUT1_Km_OR0_8*OFUT1_Kmd_UDP_Fuc*(1 + medial_UDP_Fuc/OFUT1_Kmd_UDP_Fuc)*(1 + cis_sO0/OFUT1_Km_OR0_8 + medial_sO0/OFUT1_Km_OR0_8));  // modifiers: medial_OFUT1
  medial_reOR1_0: medial_sO9 + medial_UDP_GlcNAc => medial_sO18 + medial_UDP; Fringe_kf_OR1_0*medial_Fringe*medial_sO9*medial_UDP_GlcNAc/(Fringe_Km_OR1_0*Fringe_Kmd_UDP_GlcNAc*(1 + medial_UDP_GlcNAc/Fringe_Kmd_UDP_GlcNAc)*(1 + cis_sO9/Fringe_Km_OR1_0 + medial_sO9/Fringe_Km_OR1_0));  // modifiers: medial_Fringe
  medial_reOR1_1: medial_sO10 + medial_UDP_GlcNAc => medial_sO19 + medial_UDP; Fringe_kf_OR1_1*medial_Fringe*medial_sO10*medial_UDP_GlcNAc/(Fringe_Km_OR1_1*Fringe_Kmd_UDP_GlcNAc*(1 + medial_UDP_GlcNAc/Fringe_Kmd_UDP_GlcNAc)*(1 + cis_sO9/Fringe_Km_OR1_1 + medial_sO9/Fringe_Km_OR1_1));  // modifiers: medial_Fringe
  medial_reOR1_2: medial_sO11 + medial_UDP_GlcNAc => medial_sO20 + medial_UDP; Fringe_kf_OR1_2*medial_Fringe*medial_sO11*medial_UDP_GlcNAc/(Fringe_Km_OR1_2*Fringe_Kmd_UDP_GlcNAc*(1 + medial_UDP_GlcNAc/Fringe_Kmd_UDP_GlcNAc)*(1 + cis_sO9/Fringe_Km_OR1_2 + medial_sO9/Fringe_Km_OR1_2));  // modifiers: medial_Fringe
  medial_reOR1_3: medial_sO12 + medial_UDP_GlcNAc => medial_sO21 + medial_UDP; Fringe_kf_OR1_3*medial_Fringe*medial_sO12*medial_UDP_GlcNAc/(Fringe_Km_OR1_3*Fringe_Kmd_UDP_GlcNAc*(1 + medial_UDP_GlcNAc/Fringe_Kmd_UDP_GlcNAc)*(1 + cis_sO9/Fringe_Km_OR1_3 + medial_sO9/Fringe_Km_OR1_3));  // modifiers: medial_Fringe
  medial_reOR1_4: medial_sO13 + medial_UDP_GlcNAc => medial_sO22 + medial_UDP; Fringe_kf_OR1_4*medial_Fringe*medial_sO13*medial_UDP_GlcNAc/(Fringe_Km_OR1_4*Fringe_Kmd_UDP_GlcNAc*(1 + medial_UDP_GlcNAc/Fringe_Kmd_UDP_GlcNAc)*(1 + cis_sO9/Fringe_Km_OR1_4 + medial_sO9/Fringe_Km_OR1_4));  // modifiers: medial_Fringe
  medial_reOR1_5: medial_sO14 + medial_UDP_GlcNAc => medial_sO23 + medial_UDP; Fringe_kf_OR1_5*medial_Fringe*medial_sO14*medial_UDP_GlcNAc/(Fringe_Km_OR1_5*Fringe_Kmd_UDP_GlcNAc*(1 + medial_UDP_GlcNAc/Fringe_Kmd_UDP_GlcNAc)*(1 + cis_sO9/Fringe_Km_OR1_5 + medial_sO9/Fringe_Km_OR1_5));  // modifiers: medial_Fringe
  medial_reOR1_6: medial_sO15 + medial_UDP_GlcNAc => medial_sO24 + medial_UDP; Fringe_kf_OR1_6*medial_Fringe*medial_sO15*medial_UDP_GlcNAc/(Fringe_Km_OR1_6*Fringe_Kmd_UDP_GlcNAc*(1 + medial_UDP_GlcNAc/Fringe_Kmd_UDP_GlcNAc)*(1 + cis_sO9/Fringe_Km_OR1_6 + medial_sO9/Fringe_Km_OR1_6));  // modifiers: medial_Fringe
  medial_reOR1_7: medial_sO16 + medial_UDP_GlcNAc => medial_sO25 + medial_UDP; Fringe_kf_OR1_7*medial_Fringe*medial_sO16*medial_UDP_GlcNAc/(Fringe_Km_OR1_7*Fringe_Kmd_UDP_GlcNAc*(1 + medial_UDP_GlcNAc/Fringe_Kmd_UDP_GlcNAc)*(1 + cis_sO9/Fringe_Km_OR1_7 + medial_sO9/Fringe_Km_OR1_7));  // modifiers: medial_Fringe
  medial_reOR2_0: medial_sO0 + medial_UDP_Fuc => medial_sO3 + medial_UDP; OFUT1_kf_OR2_0*medial_OFUT1*medial_sO0*medial_UDP_Fuc/(OFUT1_Km_OR2_0*OFUT1_Kmd_UDP_Fuc*(1 + medial_UDP_Fuc/OFUT1_Kmd_UDP_Fuc)*(1 + cis_sO0/OFUT1_Km_OR2_0 + medial_sO0/OFUT1_Km_OR2_0));  // modifiers: medial_OFUT1
  medial_reOR2_1: medial_sO1 + medial_UDP_Fuc => medial_sO4 + medial_UDP; OFUT1_kf_OR2_1*medial_OFUT1*medial_sO1*medial_UDP_Fuc/(OFUT1_Km_OR2_1*OFUT1_Kmd_UDP_Fuc*(1 + medial_UDP_Fuc/OFUT1_Kmd_UDP_Fuc)*(1 + cis_sO0/OFUT1_Km_OR2_1 + medial_sO0/OFUT1_Km_OR2_1));  // modifiers: medial_OFUT1
  medial_reOR2_2: medial_sO2 + medial_UDP_Fuc => medial_sO5 + medial_UDP; OFUT1_kf_OR2_2*medial_OFUT1*medial_sO2*medial_UDP_Fuc/(OFUT1_Km_OR2_2*OFUT1_Kmd_UDP_Fuc*(1 + medial_UDP_Fuc/OFUT1_Kmd_UDP_Fuc)*(1 + cis_sO0/OFUT1_Km_OR2_2 + medial_sO0/OFUT1_Km_OR2_2));  // modifiers: medial_OFUT1
  medial_reOR2_3: medial_sO9 + medial_UDP_Fuc => medial_sO12 + medial_UDP; OFUT1_kf_OR2_3*medial_OFUT1*medial_sO9*medial_UDP_Fuc/(OFUT1_Km_OR2_3*OFUT1_Kmd_UDP_Fuc*(1 + medial_UDP_Fuc/OFUT1_Kmd_UDP_Fuc)*(1 + cis_sO0/OFUT1_Km_OR2_3 + medial_sO0/OFUT1_Km_OR2_3));  // modifiers: medial_OFUT1
  medial_reOR2_4: medial_sO10 + medial_UDP_Fuc => medial_sO13 + medial_UDP; OFUT1_kf_OR2_4*medial_OFUT1*medial_sO10*medial_UDP_Fuc/(OFUT1_Km_OR2_4*OFUT1_Kmd_UDP_Fuc*(1 + medial_UDP_Fuc/OFUT1_Kmd_UDP_Fuc)*(1 + cis_sO0/OFUT1_Km_OR2_4 + medial_sO0/OFUT1_Km_OR2_4));  // modifiers: medial_OFUT1
  medial_reOR2_5: medial_sO11 + medial_UDP_Fuc => medial_sO14 + medial_UDP; OFUT1_kf_OR2_5*medial_OFUT1*medial_sO11*medial_UDP_Fuc/(OFUT1_Km_OR2_5*OFUT1_Kmd_UDP_Fuc*(1 + medial_UDP_Fuc/OFUT1_Kmd_UDP_Fuc)*(1 + cis_sO0/OFUT1_Km_OR2_5 + medial_sO0/OFUT1_Km_OR2_5));  // modifiers: medial_OFUT1
  medial_reOR2_6: medial_sO18 + medial_UDP_Fuc => medial_sO21 + medial_UDP; OFUT1_kf_OR2_6*medial_OFUT1*medial_sO18*medial_UDP_Fuc/(OFUT1_Km_OR2_6*OFUT1_Kmd_UDP_Fuc*(1 + medial_UDP_Fuc/OFUT1_Kmd_UDP_Fuc)*(1 + cis_sO0/OFUT1_Km_OR2_6 + medial_sO0/OFUT1_Km_OR2_6));  // modifiers: medial_OFUT1
  medial_reOR2_7: medial_sO19 + medial_UDP_Fuc => medial_sO22 + medial_UDP; OFUT1_kf_OR2_7*medial_OFUT1*medial_sO19*medial_UDP_Fuc/(OFUT1_Km_OR2_7*OFUT1_Kmd_UDP_Fuc*(1 + medial_UDP_Fuc/OFUT1_Kmd_UDP_Fuc)*(1 + cis_sO0/OFUT1_Km_OR2_7 + medial_sO0/OFUT1_Km_OR2_7));  // modifiers: medial_OFUT1
  medial_reOR2_8: medial_sO20 + medial_UDP_Fuc => medial_sO23 + medial_UDP; OFUT1_kf_OR2_8*medial_OFUT1*medial_sO20*medial_UDP_Fuc/(OFUT1_Km_OR2_8*OFUT1_Kmd_UDP_Fuc*(1 + medial_UDP_Fuc/OFUT1_Kmd_UDP_Fuc)*(1 + cis_sO0/OFUT1_Km_OR2_8 + medial_sO0/OFUT1_Km_OR2_8));  // modifiers: medial_OFUT1
  medial_reOR3_0: medial_sO3 + medial_UDP_GlcNAc => medial_sO6 + medial_UDP; Fringe_kf_OR3_0*medial_Fringe*medial_sO3*medial_UDP_GlcNAc/(Fringe_Km_OR3_0*Fringe_Kmd_UDP_GlcNAc*(1 + medial_UDP_GlcNAc/Fringe_Kmd_UDP_GlcNAc)*(1 + cis_sO9/Fringe_Km_OR3_0 + medial_sO9/Fringe_Km_OR3_0));  // modifiers: medial_Fringe
  medial_reOR3_1: medial_sO4 + medial_UDP_GlcNAc => medial_sO7 + medial_UDP; Fringe_kf_OR3_1*medial_Fringe*medial_sO4*medial_UDP_GlcNAc/(Fringe_Km_OR3_1*Fringe_Kmd_UDP_GlcNAc*(1 + medial_UDP_GlcNAc/Fringe_Kmd_UDP_GlcNAc)*(1 + cis_sO9/Fringe_Km_OR3_1 + medial_sO9/Fringe_Km_OR3_1));  // modifiers: medial_Fringe
  medial_reOR3_2: medial_sO5 + medial_UDP_GlcNAc => medial_sO8 + medial_UDP; Fringe_kf_OR3_2*medial_Fringe*medial_sO5*medial_UDP_GlcNAc/(Fringe_Km_OR3_2*Fringe_Kmd_UDP_GlcNAc*(1 + medial_UDP_GlcNAc/Fringe_Kmd_UDP_GlcNAc)*(1 + cis_sO9/Fringe_Km_OR3_2 + medial_sO9/Fringe_Km_OR3_2));  // modifiers: medial_Fringe
  medial_reOR3_3: medial_sO12 + medial_UDP_GlcNAc => medial_sO15 + medial_UDP; Fringe_kf_OR3_3*medial_Fringe*medial_sO12*medial_UDP_GlcNAc/(Fringe_Km_OR3_3*Fringe_Kmd_UDP_GlcNAc*(1 + medial_UDP_GlcNAc/Fringe_Kmd_UDP_GlcNAc)*(1 + cis_sO9/Fringe_Km_OR3_3 + medial_sO9/Fringe_Km_OR3_3));  // modifiers: medial_Fringe
  medial_reOR3_4: medial_sO13 + medial_UDP_GlcNAc => medial_sO16 + medial_UDP; Fringe_kf_OR3_4*medial_Fringe*medial_sO13*medial_UDP_GlcNAc/(Fringe_Km_OR3_4*Fringe_Kmd_UDP_GlcNAc*(1 + medial_UDP_GlcNAc/Fringe_Kmd_UDP_GlcNAc)*(1 + cis_sO9/Fringe_Km_OR3_4 + medial_sO9/Fringe_Km_OR3_4));  // modifiers: medial_Fringe
  medial_reOR3_5: medial_sO14 + medial_UDP_GlcNAc => medial_sO17 + medial_UDP; Fringe_kf_OR3_5*medial_Fringe*medial_sO14*medial_UDP_GlcNAc/(Fringe_Km_OR3_5*Fringe_Kmd_UDP_GlcNAc*(1 + medial_UDP_GlcNAc/Fringe_Kmd_UDP_GlcNAc)*(1 + cis_sO9/Fringe_Km_OR3_5 + medial_sO9/Fringe_Km_OR3_5));  // modifiers: medial_Fringe
  medial_reOR3_6: medial_sO21 + medial_UDP_GlcNAc => medial_sO24 + medial_UDP; Fringe_kf_OR3_6*medial_Fringe*medial_sO21*medial_UDP_GlcNAc/(Fringe_Km_OR3_6*Fringe_Kmd_UDP_GlcNAc*(1 + medial_UDP_GlcNAc/Fringe_Kmd_UDP_GlcNAc)*(1 + cis_sO9/Fringe_Km_OR3_6 + medial_sO9/Fringe_Km_OR3_6));  // modifiers: medial_Fringe
  medial_reOR3_7: medial_sO22 + medial_UDP_GlcNAc => medial_sO25 + medial_UDP; Fringe_kf_OR3_7*medial_Fringe*medial_sO22*medial_UDP_GlcNAc/(Fringe_Km_OR3_7*Fringe_Kmd_UDP_GlcNAc*(1 + medial_UDP_GlcNAc/Fringe_Kmd_UDP_GlcNAc)*(1 + cis_sO9/Fringe_Km_OR3_7 + medial_sO9/Fringe_Km_OR3_7));  // modifiers: medial_Fringe
  medial_reOR4_0: medial_sO0 + medial_UDP_Fuc => medial_sO1 + medial_UDP; OFUT1_kf_OR4_0*medial_OFUT1*medial_sO0*medial_UDP_Fuc/(OFUT1_Km_OR4_0*OFUT1_Kmd_UDP_Fuc*(1 + medial_UDP_Fuc/OFUT1_Kmd_UDP_Fuc)*(1 + cis_sO0/OFUT1_Km_OR4_0 + medial_sO0/OFUT1_Km_OR4_0));  // modifiers: medial_OFUT1
  medial_reOR4_1: medial_sO3 + medial_UDP_Fuc => medial_sO4 + medial_UDP; OFUT1_kf_OR4_1*medial_OFUT1*medial_sO3*medial_UDP_Fuc/(OFUT1_Km_OR4_1*OFUT1_Kmd_UDP_Fuc*(1 + medial_UDP_Fuc/OFUT1_Kmd_UDP_Fuc)*(1 + cis_sO0/OFUT1_Km_OR4_1 + medial_sO0/OFUT1_Km_OR4_1));  // modifiers: medial_OFUT1
  medial_reOR4_2: medial_sO6 + medial_UDP_Fuc => medial_sO7 + medial_UDP; OFUT1_kf_OR4_2*medial_OFUT1*medial_sO6*medial_UDP_Fuc/(OFUT1_Km_OR4_2*OFUT1_Kmd_UDP_Fuc*(1 + medial_UDP_Fuc/OFUT1_Kmd_UDP_Fuc)*(1 + cis_sO0/OFUT1_Km_OR4_2 + medial_sO0/OFUT1_Km_OR4_2));  // modifiers: medial_OFUT1
  medial_reOR4_3: medial_sO9 + medial_UDP_Fuc => medial_sO10 + medial_UDP; OFUT1_kf_OR4_3*medial_OFUT1*medial_sO9*medial_UDP_Fuc/(OFUT1_Km_OR4_3*OFUT1_Kmd_UDP_Fuc*(1 + medial_UDP_Fuc/OFUT1_Kmd_UDP_Fuc)*(1 + cis_sO0/OFUT1_Km_OR4_3 + medial_sO0/OFUT1_Km_OR4_3));  // modifiers: medial_OFUT1
  medial_reOR4_4: medial_sO12 + medial_UDP_Fuc => medial_sO13 + medial_UDP; OFUT1_kf_OR4_4*medial_OFUT1*medial_sO12*medial_UDP_Fuc/(OFUT1_Km_OR4_4*OFUT1_Kmd_UDP_Fuc*(1 + medial_UDP_Fuc/OFUT1_Kmd_UDP_Fuc)*(1 + cis_sO0/OFUT1_Km_OR4_4 + medial_sO0/OFUT1_Km_OR4_4));  // modifiers: medial_OFUT1
  medial_reOR4_5: medial_sO15 + medial_UDP_Fuc => medial_sO16 + medial_UDP; OFUT1_kf_OR4_5*medial_OFUT1*medial_sO15*medial_UDP_Fuc/(OFUT1_Km_OR4_5*OFUT1_Kmd_UDP_Fuc*(1 + medial_UDP_Fuc/OFUT1_Kmd_UDP_Fuc)*(1 + cis_sO0/OFUT1_Km_OR4_5 + medial_sO0/OFUT1_Km_OR4_5));  // modifiers: medial_OFUT1
  medial_reOR4_6: medial_sO18 + medial_UDP_Fuc => medial_sO19 + medial_UDP; OFUT1_kf_OR4_6*medial_OFUT1*medial_sO18*medial_UDP_Fuc/(OFUT1_Km_OR4_6*OFUT1_Kmd_UDP_Fuc*(1 + medial_UDP_Fuc/OFUT1_Kmd_UDP_Fuc)*(1 + cis_sO0/OFUT1_Km_OR4_6 + medial_sO0/OFUT1_Km_OR4_6));  // modifiers: medial_OFUT1
  medial_reOR4_7: medial_sO21 + medial_UDP_Fuc => medial_sO22 + medial_UDP; OFUT1_kf_OR4_7*medial_OFUT1*medial_sO21*medial_UDP_Fuc/(OFUT1_Km_OR4_7*OFUT1_Kmd_UDP_Fuc*(1 + medial_UDP_Fuc/OFUT1_Kmd_UDP_Fuc)*(1 + cis_sO0/OFUT1_Km_OR4_7 + medial_sO0/OFUT1_Km_OR4_7));  // modifiers: medial_OFUT1
  medial_reOR4_8: medial_sO24 + medial_UDP_Fuc => medial_sO25 + medial_UDP; OFUT1_kf_OR4_8*medial_OFUT1*medial_sO24*medial_UDP_Fuc/(OFUT1_Km_OR4_8*OFUT1_Kmd_UDP_Fuc*(1 + medial_UDP_Fuc/OFUT1_Kmd_UDP_Fuc)*(1 + cis_sO0/OFUT1_Km_OR4_8 + medial_sO0/OFUT1_Km_OR4_8));  // modifiers: medial_OFUT1
  medial_reOR5_0: medial_sO1 + medial_UDP_GlcNAc => medial_sO2 + medial_UDP; Fringe_kf_OR5_0*medial_Fringe*medial_sO1*medial_UDP_GlcNAc/(Fringe_Km_OR5_0*Fringe_Kmd_UDP_GlcNAc*(1 + medial_UDP_GlcNAc/Fringe_Kmd_UDP_GlcNAc)*(1 + cis_sO9/Fringe_Km_OR5_0 + medial_sO9/Fringe_Km_OR5_0));  // modifiers: medial_Fringe
  medial_reOR5_1: medial_sO4 + medial_UDP_GlcNAc => medial_sO5 + medial_UDP; Fringe_kf_OR5_1*medial_Fringe*medial_sO4*medial_UDP_GlcNAc/(Fringe_Km_OR5_1*Fringe_Kmd_UDP_GlcNAc*(1 + medial_UDP_GlcNAc/Fringe_Kmd_UDP_GlcNAc)*(1 + cis_sO9/Fringe_Km_OR5_1 + medial_sO9/Fringe_Km_OR5_1));  // modifiers: medial_Fringe
  medial_reOR5_2: medial_sO7 + medial_UDP_GlcNAc => medial_sO8 + medial_UDP; Fringe_kf_OR5_2*medial_Fringe*medial_sO7*medial_UDP_GlcNAc/(Fringe_Km_OR5_2*Fringe_Kmd_UDP_GlcNAc*(1 + medial_UDP_GlcNAc/Fringe_Kmd_UDP_GlcNAc)*(1 + cis_sO9/Fringe_Km_OR5_2 + medial_sO9/Fringe_Km_OR5_2));  // modifiers: medial_Fringe
  medial_reOR5_3: medial_sO10 + medial_UDP_GlcNAc => medial_sO11 + medial_UDP; Fringe_kf_OR5_3*medial_Fringe*medial_sO10*medial_UDP_GlcNAc/(Fringe_Km_OR5_3*Fringe_Kmd_UDP_GlcNAc*(1 + medial_UDP_GlcNAc/Fringe_Kmd_UDP_GlcNAc)*(1 + cis_sO9/Fringe_Km_OR5_3 + medial_sO9/Fringe_Km_OR5_3));  // modifiers: medial_Fringe
  medial_reOR5_4: medial_sO13 + medial_UDP_GlcNAc => medial_sO14 + medial_UDP; Fringe_kf_OR5_4*medial_Fringe*medial_sO13*medial_UDP_GlcNAc/(Fringe_Km_OR5_4*Fringe_Kmd_UDP_GlcNAc*(1 + medial_UDP_GlcNAc/Fringe_Kmd_UDP_GlcNAc)*(1 + cis_sO9/Fringe_Km_OR5_4 + medial_sO9/Fringe_Km_OR5_4));  // modifiers: medial_Fringe
  medial_reOR5_5: medial_sO16 + medial_UDP_GlcNAc => medial_sO17 + medial_UDP; Fringe_kf_OR5_5*medial_Fringe*medial_sO16*medial_UDP_GlcNAc/(Fringe_Km_OR5_5*Fringe_Kmd_UDP_GlcNAc*(1 + medial_UDP_GlcNAc/Fringe_Kmd_UDP_GlcNAc)*(1 + cis_sO9/Fringe_Km_OR5_5 + medial_sO9/Fringe_Km_OR5_5));  // modifiers: medial_Fringe
  medial_reOR5_6: medial_sO19 + medial_UDP_GlcNAc => medial_sO20 + medial_UDP; Fringe_kf_OR5_6*medial_Fringe*medial_sO19*medial_UDP_GlcNAc/(Fringe_Km_OR5_6*Fringe_Kmd_UDP_GlcNAc*(1 + medial_UDP_GlcNAc/Fringe_Kmd_UDP_GlcNAc)*(1 + cis_sO9/Fringe_Km_OR5_6 + medial_sO9/Fringe_Km_OR5_6));  // modifiers: medial_Fringe
  medial_reOR5_7: medial_sO22 + medial_UDP_GlcNAc => medial_sO23 + medial_UDP; Fringe_kf_OR5_7*medial_Fringe*medial_sO22*medial_UDP_GlcNAc/(Fringe_Km_OR5_7*Fringe_Kmd_UDP_GlcNAc*(1 + medial_UDP_GlcNAc/Fringe_Kmd_UDP_GlcNAc)*(1 + cis_sO9/Fringe_Km_OR5_7 + medial_sO9/Fringe_Km_OR5_7));  // modifiers: medial_Fringe
  trans_reOR0_0: trans_sO0 + trans_UDP_Fuc => trans_sO9 + trans_UDP; OFUT1_kf_OR0_0*trans_OFUT1*trans_sO0*trans_UDP_Fuc/(OFUT1_Km_OR0_0*OFUT1_Kmd_UDP_Fuc*(1 + trans_UDP_Fuc/OFUT1_Kmd_UDP_Fuc)*(1 + cis_sO0/OFUT1_Km_OR0_0 + medial_sO0/OFUT1_Km_OR0_0 + trans_sO0/OFUT1_Km_OR0_0));  // modifiers: trans_OFUT1
  trans_reOR0_1: trans_sO1 + trans_UDP_Fuc => trans_sO10 + trans_UDP; OFUT1_kf_OR0_1*trans_OFUT1*trans_sO1*trans_UDP_Fuc/(OFUT1_Km_OR0_1*OFUT1_Kmd_UDP_Fuc*(1 + trans_UDP_Fuc/OFUT1_Kmd_UDP_Fuc)*(1 + cis_sO0/OFUT1_Km_OR0_1 + medial_sO0/OFUT1_Km_OR0_1 + trans_sO0/OFUT1_Km_OR0_1));  // modifiers: trans_OFUT1
  trans_reOR0_2: trans_sO2 + trans_UDP_Fuc => trans_sO11 + trans_UDP; OFUT1_kf_OR0_2*trans_OFUT1*trans_sO2*trans_UDP_Fuc/(OFUT1_Km_OR0_2*OFUT1_Kmd_UDP_Fuc*(1 + trans_UDP_Fuc/OFUT1_Kmd_UDP_Fuc)*(1 + cis_sO0/OFUT1_Km_OR0_2 + medial_sO0/OFUT1_Km_OR0_2 + trans_sO0/OFUT1_Km_OR0_2));  // modifiers: trans_OFUT1
  trans_reOR0_3: trans_sO3 + trans_UDP_Fuc => trans_sO12 + trans_UDP; OFUT1_kf_OR0_3*trans_OFUT1*trans_sO3*trans_UDP_Fuc/(OFUT1_Km_OR0_3*OFUT1_Kmd_UDP_Fuc*(1 + trans_UDP_Fuc/OFUT1_Kmd_UDP_Fuc)*(1 + cis_sO0/OFUT1_Km_OR0_3 + medial_sO0/OFUT1_Km_OR0_3 + trans_sO0/OFUT1_Km_OR0_3));  // modifiers: trans_OFUT1
  trans_reOR0_4: trans_sO4 + trans_UDP_Fuc => trans_sO13 + trans_UDP; OFUT1_kf_OR0_4*trans_OFUT1*trans_sO4*trans_UDP_Fuc/(OFUT1_Km_OR0_4*OFUT1_Kmd_UDP_Fuc*(1 + trans_UDP_Fuc/OFUT1_Kmd_UDP_Fuc)*(1 + cis_sO0/OFUT1_Km_OR0_4 + medial_sO0/OFUT1_Km_OR0_4 + trans_sO0/OFUT1_Km_OR0_4));  // modifiers: trans_OFUT1
  trans_reOR0_5: trans_sO5 + trans_UDP_Fuc => trans_sO14 + trans_UDP; OFUT1_kf_OR0_5*trans_OFUT1*trans_sO5*trans_UDP_Fuc/(OFUT1_Km_OR0_5*OFUT1_Kmd_UDP_Fuc*(1 + trans_UDP_Fuc/OFUT1_Kmd_UDP_Fuc)*(1 + cis_sO0/OFUT1_Km_OR0_5 + medial_sO0/OFUT1_Km_OR0_5 + trans_sO0/OFUT1_Km_OR0_5));  // modifiers: trans_OFUT1
  trans_reOR0_6: trans_sO6 + trans_UDP_Fuc => trans_sO15 + trans_UDP; OFUT1_kf_OR0_6*trans_OFUT1*trans_sO6*trans_UDP_Fuc/(OFUT1_Km_OR0_6*OFUT1_Kmd_UDP_Fuc*(1 + trans_UDP_Fuc/OFUT1_Kmd_UDP_Fuc)*(1 + cis_sO0/OFUT1_Km_OR0_6 + medial_sO0/OFUT1_Km_OR0_6 + trans_sO0/OFUT1_Km_OR0_6));  // modifiers: trans_OFUT1
  trans_reOR0_7: trans_sO7 + trans_UDP_Fuc => trans_sO16 + trans_UDP; OFUT1_kf_OR0_7*trans_OFUT1*trans_sO7*trans_UDP_Fuc/(OFUT1_Km_OR0_7*OFUT1_Kmd_UDP_Fuc*(1 + trans_UDP_Fuc/OFUT1_Kmd_UDP_Fuc)*(1 + cis_sO0/OFUT1_Km_OR0_7 + medial_sO0/OFUT1_Km_OR0_7 + trans_sO0/OFUT1_Km_OR0_7));  // modifiers: trans_OFUT1
  trans_reOR0_8: trans_sO8 + trans_UDP_Fuc => trans_sO17 + trans_UDP; OFUT1_kf_OR0_8*trans_OFUT1*trans_sO8*trans_UDP_Fuc/(OFUT1_Km_OR0_8*OFUT1_Kmd_UDP_Fuc*(1 + trans_UDP_Fuc/OFUT1_Kmd_UDP_Fuc)*(1 + cis_sO0/OFUT1_Km_OR0_8 + medial_sO0/OFUT1_Km_OR0_8 + trans_sO0/OFUT1_Km_OR0_8));  // modifiers: trans_OFUT1
  trans_reOR1_0: trans_sO9 + trans_UDP_GlcNAc => trans_sO18 + trans_UDP; Fringe_kf_OR1_0*trans_Fringe*trans_sO9*trans_UDP_GlcNAc/(Fringe_Km_OR1_0*Fringe_Kmd_UDP_GlcNAc*(1 + trans_UDP_GlcNAc/Fringe_Kmd_UDP_GlcNAc)*(1 + cis_sO9/Fringe_Km_OR1_0 + medial_sO9/Fringe_Km_OR1_0 + trans_sO9/Fringe_Km_OR1_0));  // modifiers: trans_Fringe
  trans_reOR1_1: trans_sO10 + trans_UDP_GlcNAc => trans_sO19 + trans_UDP; Fringe_kf_OR1_1*trans_Fringe*trans_sO10*trans_UDP_GlcNAc/(Fringe_Km_OR1_1*Fringe_Kmd_UDP_GlcNAc*(1 + trans_UDP_GlcNAc/Fringe_Kmd_UDP_GlcNAc)*(1 + cis_sO9/Fringe_Km_OR1_1 + medial_sO9/Fringe_Km_OR1_1 + trans_sO9/Fringe_Km_OR1_1));  // modifiers: trans_Fringe
  trans_reOR1_2: trans_sO11 + trans_UDP_GlcNAc => trans_sO20 + trans_UDP; Fringe_kf_OR1_2*trans_Fringe*trans_sO11*trans_UDP_GlcNAc/(Fringe_Km_OR1_2*Fringe_Kmd_UDP_GlcNAc*(1 + trans_UDP_GlcNAc/Fringe_Kmd_UDP_GlcNAc)*(1 + cis_sO9/Fringe_Km_OR1_2 + medial_sO9/Fringe_Km_OR1_2 + trans_sO9/Fringe_Km_OR1_2));  // modifiers: trans_Fringe
  trans_reOR1_3: trans_sO12 + trans_UDP_GlcNAc => trans_sO21 + trans_UDP; Fringe_kf_OR1_3*trans_Fringe*trans_sO12*trans_UDP_GlcNAc/(Fringe_Km_OR1_3*Fringe_Kmd_UDP_GlcNAc*(1 + trans_UDP_GlcNAc/Fringe_Kmd_UDP_GlcNAc)*(1 + cis_sO9/Fringe_Km_OR1_3 + medial_sO9/Fringe_Km_OR1_3 + trans_sO9/Fringe_Km_OR1_3));  // modifiers: trans_Fringe
  trans_reOR1_4: trans_sO13 + trans_UDP_GlcNAc => trans_sO22 + trans_UDP; Fringe_kf_OR1_4*trans_Fringe*trans_sO13*trans_UDP_GlcNAc/(Fringe_Km_OR1_4*Fringe_Kmd_UDP_GlcNAc*(1 + trans_UDP_GlcNAc/Fringe_Kmd_UDP_GlcNAc)*(1 + cis_sO9/Fringe_Km_OR1_4 + medial_sO9/Fringe_Km_OR1_4 + trans_sO9/Fringe_Km_OR1_4));  // modifiers: trans_Fringe
  trans_reOR1_5: trans_sO14 + trans_UDP_GlcNAc => trans_sO23 + trans_UDP; Fringe_kf_OR1_5*trans_Fringe*trans_sO14*trans_UDP_GlcNAc/(Fringe_Km_OR1_5*Fringe_Kmd_UDP_GlcNAc*(1 + trans_UDP_GlcNAc/Fringe_Kmd_UDP_GlcNAc)*(1 + cis_sO9/Fringe_Km_OR1_5 + medial_sO9/Fringe_Km_OR1_5 + trans_sO9/Fringe_Km_OR1_5));  // modifiers: trans_Fringe
  trans_reOR1_6: trans_sO15 + trans_UDP_GlcNAc => trans_sO24 + trans_UDP; Fringe_kf_OR1_6*trans_Fringe*trans_sO15*trans_UDP_GlcNAc/(Fringe_Km_OR1_6*Fringe_Kmd_UDP_GlcNAc*(1 + trans_UDP_GlcNAc/Fringe_Kmd_UDP_GlcNAc)*(1 + cis_sO9/Fringe_Km_OR1_6 + medial_sO9/Fringe_Km_OR1_6 + trans_sO9/Fringe_Km_OR1_6));  // modifiers: trans_Fringe
  trans_reOR1_7: trans_sO16 + trans_UDP_GlcNAc => trans_sO25 + trans_UDP; Fringe_kf_OR1_7*trans_Fringe*trans_sO16*trans_UDP_GlcNAc/(Fringe_Km_OR1_7*Fringe_Kmd_UDP_GlcNAc*(1 + trans_UDP_GlcNAc/Fringe_Kmd_UDP_GlcNAc)*(1 + cis_sO9/Fringe_Km_OR1_7 + medial_sO9/Fringe_Km_OR1_7 + trans_sO9/Fringe_Km_OR1_7));  // modifiers: trans_Fringe
  trans_reOR2_0: trans_sO0 + trans_UDP_Fuc => trans_sO3 + trans_UDP; OFUT1_kf_OR2_0*trans_OFUT1*trans_sO0*trans_UDP_Fuc/(OFUT1_Km_OR2_0*OFUT1_Kmd_UDP_Fuc*(1 + trans_UDP_Fuc/OFUT1_Kmd_UDP_Fuc)*(1 + cis_sO0/OFUT1_Km_OR2_0 + medial_sO0/OFUT1_Km_OR2_0 + trans_sO0/OFUT1_Km_OR2_0));  // modifiers: trans_OFUT1
  trans_reOR2_1: trans_sO1 + trans_UDP_Fuc => trans_sO4 + trans_UDP; OFUT1_kf_OR2_1*trans_OFUT1*trans_sO1*trans_UDP_Fuc/(OFUT1_Km_OR2_1*OFUT1_Kmd_UDP_Fuc*(1 + trans_UDP_Fuc/OFUT1_Kmd_UDP_Fuc)*(1 + cis_sO0/OFUT1_Km_OR2_1 + medial_sO0/OFUT1_Km_OR2_1 + trans_sO0/OFUT1_Km_OR2_1));  // modifiers: trans_OFUT1
  trans_reOR2_2: trans_sO2 + trans_UDP_Fuc => trans_sO5 + trans_UDP; OFUT1_kf_OR2_2*trans_OFUT1*trans_sO2*trans_UDP_Fuc/(OFUT1_Km_OR2_2*OFUT1_Kmd_UDP_Fuc*(1 + trans_UDP_Fuc/OFUT1_Kmd_UDP_Fuc)*(1 + cis_sO0/OFUT1_Km_OR2_2 + medial_sO0/OFUT1_Km_OR2_2 + trans_sO0/OFUT1_Km_OR2_2));  // modifiers: trans_OFUT1
  trans_reOR2_3: trans_sO9 + trans_UDP_Fuc => trans_sO12 + trans_UDP; OFUT1_kf_OR2_3*trans_OFUT1*trans_sO9*trans_UDP_Fuc/(OFUT1_Km_OR2_3*OFUT1_Kmd_UDP_Fuc*(1 + trans_UDP_Fuc/OFUT1_Kmd_UDP_Fuc)*(1 + cis_sO0/OFUT1_Km_OR2_3 + medial_sO0/OFUT1_Km_OR2_3 + trans_sO0/OFUT1_Km_OR2_3));  // modifiers: trans_OFUT1
  trans_reOR2_4: trans_sO10 + trans_UDP_Fuc => trans_sO13 + trans_UDP; OFUT1_kf_OR2_4*trans_OFUT1*trans_sO10*trans_UDP_Fuc/(OFUT1_Km_OR2_4*OFUT1_Kmd_UDP_Fuc*(1 + trans_UDP_Fuc/OFUT1_Kmd_UDP_Fuc)*(1 + cis_sO0/OFUT1_Km_OR2_4 + medial_sO0/OFUT1_Km_OR2_4 + trans_sO0/OFUT1_Km_OR2_4));  // modifiers: trans_OFUT1
  trans_reOR2_5: trans_sO11 + trans_UDP_Fuc => trans_sO14 + trans_UDP; OFUT1_kf_OR2_5*trans_OFUT1*trans_sO11*trans_UDP_Fuc/(OFUT1_Km_OR2_5*OFUT1_Kmd_UDP_Fuc*(1 + trans_UDP_Fuc/OFUT1_Kmd_UDP_Fuc)*(1 + cis_sO0/OFUT1_Km_OR2_5 + medial_sO0/OFUT1_Km_OR2_5 + trans_sO0/OFUT1_Km_OR2_5));  // modifiers: trans_OFUT1
  trans_reOR2_6: trans_sO18 + trans_UDP_Fuc => trans_sO21 + trans_UDP; OFUT1_kf_OR2_6*trans_OFUT1*trans_sO18*trans_UDP_Fuc/(OFUT1_Km_OR2_6*OFUT1_Kmd_UDP_Fuc*(1 + trans_UDP_Fuc/OFUT1_Kmd_UDP_Fuc)*(1 + cis_sO0/OFUT1_Km_OR2_6 + medial_sO0/OFUT1_Km_OR2_6 + trans_sO0/OFUT1_Km_OR2_6));  // modifiers: trans_OFUT1
  trans_reOR2_7: trans_sO19 + trans_UDP_Fuc => trans_sO22 + trans_UDP; OFUT1_kf_OR2_7*trans_OFUT1*trans_sO19*trans_UDP_Fuc/(OFUT1_Km_OR2_7*OFUT1_Kmd_UDP_Fuc*(1 + trans_UDP_Fuc/OFUT1_Kmd_UDP_Fuc)*(1 + cis_sO0/OFUT1_Km_OR2_7 + medial_sO0/OFUT1_Km_OR2_7 + trans_sO0/OFUT1_Km_OR2_7));  // modifiers: trans_OFUT1
  trans_reOR2_8: trans_sO20 + trans_UDP_Fuc => trans_sO23 + trans_UDP; OFUT1_kf_OR2_8*trans_OFUT1*trans_sO20*trans_UDP_Fuc/(OFUT1_Km_OR2_8*OFUT1_Kmd_UDP_Fuc*(1 + trans_UDP_Fuc/OFUT1_Kmd_UDP_Fuc)*(1 + cis_sO0/OFUT1_Km_OR2_8 + medial_sO0/OFUT1_Km_OR2_8 + trans_sO0/OFUT1_Km_OR2_8));  // modifiers: trans_OFUT1
  trans_reOR3_0: trans_sO3 + trans_UDP_GlcNAc => trans_sO6 + trans_UDP; Fringe_kf_OR3_0*trans_Fringe*trans_sO3*trans_UDP_GlcNAc/(Fringe_Km_OR3_0*Fringe_Kmd_UDP_GlcNAc*(1 + trans_UDP_GlcNAc/Fringe_Kmd_UDP_GlcNAc)*(1 + cis_sO9/Fringe_Km_OR3_0 + medial_sO9/Fringe_Km_OR3_0 + trans_sO9/Fringe_Km_OR3_0));  // modifiers: trans_Fringe
  trans_reOR3_1: trans_sO4 + trans_UDP_GlcNAc => trans_sO7 + trans_UDP; Fringe_kf_OR3_1*trans_Fringe*trans_sO4*trans_UDP_GlcNAc/(Fringe_Km_OR3_1*Fringe_Kmd_UDP_GlcNAc*(1 + trans_UDP_GlcNAc/Fringe_Kmd_UDP_GlcNAc)*(1 + cis_sO9/Fringe_Km_OR3_1 + medial_sO9/Fringe_Km_OR3_1 + trans_sO9/Fringe_Km_OR3_1));  // modifiers: trans_Fringe
  trans_reOR3_2: trans_sO5 + trans_UDP_GlcNAc => trans_sO8 + trans_UDP; Fringe_kf_OR3_2*trans_Fringe*trans_sO5*trans_UDP_GlcNAc/(Fringe_Km_OR3_2*Fringe_Kmd_UDP_GlcNAc*(1 + trans_UDP_GlcNAc/Fringe_Kmd_UDP_GlcNAc)*(1 + cis_sO9/Fringe_Km_OR3_2 + medial_sO9/Fringe_Km_OR3_2 + trans_sO9/Fringe_Km_OR3_2));  // modifiers: trans_Fringe
  trans_reOR3_3: trans_sO12 + trans_UDP_GlcNAc => trans_sO15 + trans_UDP; Fringe_kf_OR3_3*trans_Fringe*trans_sO12*trans_UDP_GlcNAc/(Fringe_Km_OR3_3*Fringe_Kmd_UDP_GlcNAc*(1 + trans_UDP_GlcNAc/Fringe_Kmd_UDP_GlcNAc)*(1 + cis_sO9/Fringe_Km_OR3_3 + medial_sO9/Fringe_Km_OR3_3 + trans_sO9/Fringe_Km_OR3_3));  // modifiers: trans_Fringe
  trans_reOR3_4: trans_sO13 + trans_UDP_GlcNAc => trans_sO16 + trans_UDP; Fringe_kf_OR3_4*trans_Fringe*trans_sO13*trans_UDP_GlcNAc/(Fringe_Km_OR3_4*Fringe_Kmd_UDP_GlcNAc*(1 + trans_UDP_GlcNAc/Fringe_Kmd_UDP_GlcNAc)*(1 + cis_sO9/Fringe_Km_OR3_4 + medial_sO9/Fringe_Km_OR3_4 + trans_sO9/Fringe_Km_OR3_4));  // modifiers: trans_Fringe
  trans_reOR3_5: trans_sO14 + trans_UDP_GlcNAc => trans_sO17 + trans_UDP; Fringe_kf_OR3_5*trans_Fringe*trans_sO14*trans_UDP_GlcNAc/(Fringe_Km_OR3_5*Fringe_Kmd_UDP_GlcNAc*(1 + trans_UDP_GlcNAc/Fringe_Kmd_UDP_GlcNAc)*(1 + cis_sO9/Fringe_Km_OR3_5 + medial_sO9/Fringe_Km_OR3_5 + trans_sO9/Fringe_Km_OR3_5));  // modifiers: trans_Fringe
  trans_reOR3_6: trans_sO21 + trans_UDP_GlcNAc => trans_sO24 + trans_UDP; Fringe_kf_OR3_6*trans_Fringe*trans_sO21*trans_UDP_GlcNAc/(Fringe_Km_OR3_6*Fringe_Kmd_UDP_GlcNAc*(1 + trans_UDP_GlcNAc/Fringe_Kmd_UDP_GlcNAc)*(1 + cis_sO9/Fringe_Km_OR3_6 + medial_sO9/Fringe_Km_OR3_6 + trans_sO9/Fringe_Km_OR3_6));  // modifiers: trans_Fringe
  trans_reOR3_7: trans_sO22 + trans_UDP_GlcNAc => trans_sO25 + trans_UDP; Fringe_kf_OR3_7*trans_Fringe*trans_sO22*trans_UDP_GlcNAc/(Fringe_Km_OR3_7*Fringe_Kmd_UDP_GlcNAc*(1 + trans_UDP_GlcNAc/Fringe_Kmd_UDP_GlcNAc)*(1 + cis_sO9/Fringe_Km_OR3_7 + medial_sO9/Fringe_Km_OR3_7 + trans_sO9/Fringe_Km_OR3_7));  // modifiers: trans_Fringe
  trans_reOR4_0: trans_sO0 + trans_UDP_Fuc => trans_sO1 + trans_UDP; OFUT1_kf_OR4_0*trans_OFUT1*trans_sO0*trans_UDP_Fuc/(OFUT1_Km_OR4_0*OFUT1_Kmd_UDP_Fuc*(1 + trans_UDP_Fuc/OFUT1_Kmd_UDP_Fuc)*(1 + cis_sO0/OFUT1_Km_OR4_0 + medial_sO0/OFUT1_Km_OR4_0 + trans_sO0/OFUT1_Km_OR4_0));  // modifiers: trans_OFUT1
  trans_reOR4_1: trans_sO3 + trans_UDP_Fuc => trans_sO4 + trans_UDP; OFUT1_kf_OR4_1*trans_OFUT1*trans_sO3*trans_UDP_Fuc/(OFUT1_Km_OR4_1*OFUT1_Kmd_UDP_Fuc*(1 + trans_UDP_Fuc/OFUT1_Kmd_UDP_Fuc)*(1 + cis_sO0/OFUT1_Km_OR4_1 + medial_sO0/OFUT1_Km_OR4_1 + trans_sO0/OFUT1_Km_OR4_1));  // modifiers: trans_OFUT1
  trans_reOR4_2: trans_sO6 + trans_UDP_Fuc => trans_sO7 + trans_UDP; OFUT1_kf_OR4_2*trans_OFUT1*trans_sO6*trans_UDP_Fuc/(OFUT1_Km_OR4_2*OFUT1_Kmd_UDP_Fuc*(1 + trans_UDP_Fuc/OFUT1_Kmd_UDP_Fuc)*(1 + cis_sO0/OFUT1_Km_OR4_2 + medial_sO0/OFUT1_Km_OR4_2 + trans_sO0/OFUT1_Km_OR4_2));  // modifiers: trans_OFUT1
  trans_reOR4_3: trans_sO9 + trans_UDP_Fuc => trans_sO10 + trans_UDP; OFUT1_kf_OR4_3*trans_OFUT1*trans_sO9*trans_UDP_Fuc/(OFUT1_Km_OR4_3*OFUT1_Kmd_UDP_Fuc*(1 + trans_UDP_Fuc/OFUT1_Kmd_UDP_Fuc)*(1 + cis_sO0/OFUT1_Km_OR4_3 + medial_sO0/OFUT1_Km_OR4_3 + trans_sO0/OFUT1_Km_OR4_3));  // modifiers: trans_OFUT1
  trans_reOR4_4: trans_sO12 + trans_UDP_Fuc => trans_sO13 + trans_UDP; OFUT1_kf_OR4_4*trans_OFUT1*trans_sO12*trans_UDP_Fuc/(OFUT1_Km_OR4_4*OFUT1_Kmd_UDP_Fuc*(1 + trans_UDP_Fuc/OFUT1_Kmd_UDP_Fuc)*(1 + cis_sO0/OFUT1_Km_OR4_4 + medial_sO0/OFUT1_Km_OR4_4 + trans_sO0/OFUT1_Km_OR4_4));  // modifiers: trans_OFUT1
  trans_reOR4_5: trans_sO15 + trans_UDP_Fuc => trans_sO16 + trans_UDP; OFUT1_kf_OR4_5*trans_OFUT1*trans_sO15*trans_UDP_Fuc/(OFUT1_Km_OR4_5*OFUT1_Kmd_UDP_Fuc*(1 + trans_UDP_Fuc/OFUT1_Kmd_UDP_Fuc)*(1 + cis_sO0/OFUT1_Km_OR4_5 + medial_sO0/OFUT1_Km_OR4_5 + trans_sO0/OFUT1_Km_OR4_5));  // modifiers: trans_OFUT1
  trans_reOR4_6: trans_sO18 + trans_UDP_Fuc => trans_sO19 + trans_UDP; OFUT1_kf_OR4_6*trans_OFUT1*trans_sO18*trans_UDP_Fuc/(OFUT1_Km_OR4_6*OFUT1_Kmd_UDP_Fuc*(1 + trans_UDP_Fuc/OFUT1_Kmd_UDP_Fuc)*(1 + cis_sO0/OFUT1_Km_OR4_6 + medial_sO0/OFUT1_Km_OR4_6 + trans_sO0/OFUT1_Km_OR4_6));  // modifiers: trans_OFUT1
  trans_reOR4_7: trans_sO21 + trans_UDP_Fuc => trans_sO22 + trans_UDP; OFUT1_kf_OR4_7*trans_OFUT1*trans_sO21*trans_UDP_Fuc/(OFUT1_Km_OR4_7*OFUT1_Kmd_UDP_Fuc*(1 + trans_UDP_Fuc/OFUT1_Kmd_UDP_Fuc)*(1 + cis_sO0/OFUT1_Km_OR4_7 + medial_sO0/OFUT1_Km_OR4_7 + trans_sO0/OFUT1_Km_OR4_7));  // modifiers: trans_OFUT1
  trans_reOR4_8: trans_sO24 + trans_UDP_Fuc => trans_sO25 + trans_UDP; OFUT1_kf_OR4_8*trans_OFUT1*trans_sO24*trans_UDP_Fuc/(OFUT1_Km_OR4_8*OFUT1_Kmd_UDP_Fuc*(1 + trans_UDP_Fuc/OFUT1_Kmd_UDP_Fuc)*(1 + cis_sO0/OFUT1_Km_OR4_8 + medial_sO0/OFUT1_Km_OR4_8 + trans_sO0/OFUT1_Km_OR4_8));  // modifiers: trans_OFUT1
  trans_reOR5_0: trans_sO1 + trans_UDP_GlcNAc => trans_sO2 + trans_UDP; Fringe_kf_OR5_0*trans_Fringe*trans_sO1*trans_UDP_GlcNAc/(Fringe_Km_OR5_0*Fringe_Kmd_UDP_GlcNAc*(1 + trans_UDP_GlcNAc/Fringe_Kmd_UDP_GlcNAc)*(1 + cis_sO9/Fringe_Km_OR5_0 + medial_sO9/Fringe_Km_OR5_0 + trans_sO9/Fringe_Km_OR5_0));  // modifiers: trans_Fringe
  trans_reOR5_1: trans_sO4 + trans_UDP_GlcNAc => trans_sO5 + trans_UDP; Fringe_kf_OR5_1*trans_Fringe*trans_sO4*trans_UDP_GlcNAc/(Fringe_Km_OR5_1*Fringe_Kmd_UDP_GlcNAc*(1 + trans_UDP_GlcNAc/Fringe_Kmd_UDP_GlcNAc)*(1 + cis_sO9/Fringe_Km_OR5_1 + medial_sO9/Fringe_Km_OR5_1 + trans_sO9/Fringe_Km_OR5_1));  // modifiers: trans_Fringe
  trans_reOR5_2: trans_sO7 + trans_UDP_GlcNAc => trans_sO8 + trans_UDP; Fringe_kf_OR5_2*trans_Fringe*trans_sO7*trans_UDP_GlcNAc/(Fringe_Km_OR5_2*Fringe_Kmd_UDP_GlcNAc*(1 + trans_UDP_GlcNAc/Fringe_Kmd_UDP_GlcNAc)*(1 + cis_sO9/Fringe_Km_OR5_2 + medial_sO9/Fringe_Km_OR5_2 + trans_sO9/Fringe_Km_OR5_2));  // modifiers: trans_Fringe
  trans_reOR5_3: trans_sO10 + trans_UDP_GlcNAc => trans_sO11 + trans_UDP; Fringe_kf_OR5_3*trans_Fringe*trans_sO10*trans_UDP_GlcNAc/(Fringe_Km_OR5_3*Fringe_Kmd_UDP_GlcNAc*(1 + trans_UDP_GlcNAc/Fringe_Kmd_UDP_GlcNAc)*(1 + cis_sO9/Fringe_Km_OR5_3 + medial_sO9/Fringe_Km_OR5_3 + trans_sO9/Fringe_Km_OR5_3));  // modifiers: trans_Fringe
  trans_reOR5_4: trans_sO13 + trans_UDP_GlcNAc => trans_sO14 + trans_UDP; Fringe_kf_OR5_4*trans_Fringe*trans_sO13*trans_UDP_GlcNAc/(Fringe_Km_OR5_4*Fringe_Kmd_UDP_GlcNAc*(1 + trans_UDP_GlcNAc/Fringe_Kmd_UDP_GlcNAc)*(1 + cis_sO9/Fringe_Km_OR5_4 + medial_sO9/Fringe_Km_OR5_4 + trans_sO9/Fringe_Km_OR5_4));  // modifiers: trans_Fringe
  trans_reOR5_5: trans_sO16 + trans_UDP_GlcNAc => trans_sO17 + trans_UDP; Fringe_kf_OR5_5*trans_Fringe*trans_sO16*trans_UDP_GlcNAc/(Fringe_Km_OR5_5*Fringe_Kmd_UDP_GlcNAc*(1 + trans_UDP_GlcNAc/Fringe_Kmd_UDP_GlcNAc)*(1 + cis_sO9/Fringe_Km_OR5_5 + medial_sO9/Fringe_Km_OR5_5 + trans_sO9/Fringe_Km_OR5_5));  // modifiers: trans_Fringe
  trans_reOR5_6: trans_sO19 + trans_UDP_GlcNAc => trans_sO20 + trans_UDP; Fringe_kf_OR5_6*trans_Fringe*trans_sO19*trans_UDP_GlcNAc/(Fringe_Km_OR5_6*Fringe_Kmd_UDP_GlcNAc*(1 + trans_UDP_GlcNAc/Fringe_Kmd_UDP_GlcNAc)*(1 + cis_sO9/Fringe_Km_OR5_6 + medial_sO9/Fringe_Km_OR5_6 + trans_sO9/Fringe_Km_OR5_6));  // modifiers: trans_Fringe
  trans_reOR5_7: trans_sO22 + trans_UDP_GlcNAc => trans_sO23 + trans_UDP; Fringe_kf_OR5_7*trans_Fringe*trans_sO22*trans_UDP_GlcNAc/(Fringe_Km_OR5_7*Fringe_Kmd_UDP_GlcNAc*(1 + trans_UDP_GlcNAc/Fringe_Kmd_UDP_GlcNAc)*(1 + cis_sO9/Fringe_Km_OR5_7 + medial_sO9/Fringe_Km_OR5_7 + trans_sO9/Fringe_Km_OR5_7));  // modifiers: trans_Fringe
  TGN_reOR0_0: TGN_sO0 + TGN_UDP_Fuc => TGN_sO9 + TGN_UDP; OFUT1_kf_OR0_0*TGN_OFUT1*TGN_sO0*TGN_UDP_Fuc/(OFUT1_Km_OR0_0*OFUT1_Kmd_UDP_Fuc*(1 + TGN_UDP_Fuc/OFUT1_Kmd_UDP_Fuc)*(1 + cis_sO0/OFUT1_Km_OR0_0 + medial_sO0/OFUT1_Km_OR0_0 + trans_sO0/OFUT1_Km_OR0_0 + TGN_sO0/OFUT1_Km_OR0_0));  // modifiers: TGN_OFUT1
  TGN_reOR0_1: TGN_sO1 + TGN_UDP_Fuc => TGN_sO10 + TGN_UDP; OFUT1_kf_OR0_1*TGN_OFUT1*TGN_sO1*TGN_UDP_Fuc/(OFUT1_Km_OR0_1*OFUT1_Kmd_UDP_Fuc*(1 + TGN_UDP_Fuc/OFUT1_Kmd_UDP_Fuc)*(1 + cis_sO0/OFUT1_Km_OR0_1 + medial_sO0/OFUT1_Km_OR0_1 + trans_sO0/OFUT1_Km_OR0_1 + TGN_sO0/OFUT1_Km_OR0_1));  // modifiers: TGN_OFUT1
  TGN_reOR0_2: TGN_sO2 + TGN_UDP_Fuc => TGN_sO11 + TGN_UDP; OFUT1_kf_OR0_2*TGN_OFUT1*TGN_sO2*TGN_UDP_Fuc/(OFUT1_Km_OR0_2*OFUT1_Kmd_UDP_Fuc*(1 + TGN_UDP_Fuc/OFUT1_Kmd_UDP_Fuc)*(1 + cis_sO0/OFUT1_Km_OR0_2 + medial_sO0/OFUT1_Km_OR0_2 + trans_sO0/OFUT1_Km_OR0_2 + TGN_sO0/OFUT1_Km_OR0_2));  // modifiers: TGN_OFUT1
  TGN_reOR0_3: TGN_sO3 + TGN_UDP_Fuc => TGN_sO12 + TGN_UDP; OFUT1_kf_OR0_3*TGN_OFUT1*TGN_sO3*TGN_UDP_Fuc/(OFUT1_Km_OR0_3*OFUT1_Kmd_UDP_Fuc*(1 + TGN_UDP_Fuc/OFUT1_Kmd_UDP_Fuc)*(1 + cis_sO0/OFUT1_Km_OR0_3 + medial_sO0/OFUT1_Km_OR0_3 + trans_sO0/OFUT1_Km_OR0_3 + TGN_sO0/OFUT1_Km_OR0_3));  // modifiers: TGN_OFUT1
  TGN_reOR0_4: TGN_sO4 + TGN_UDP_Fuc => TGN_sO13 + TGN_UDP; OFUT1_kf_OR0_4*TGN_OFUT1*TGN_sO4*TGN_UDP_Fuc/(OFUT1_Km_OR0_4*OFUT1_Kmd_UDP_Fuc*(1 + TGN_UDP_Fuc/OFUT1_Kmd_UDP_Fuc)*(1 + cis_sO0/OFUT1_Km_OR0_4 + medial_sO0/OFUT1_Km_OR0_4 + trans_sO0/OFUT1_Km_OR0_4 + TGN_sO0/OFUT1_Km_OR0_4));  // modifiers: TGN_OFUT1
  TGN_reOR0_5: TGN_sO5 + TGN_UDP_Fuc => TGN_sO14 + TGN_UDP; OFUT1_kf_OR0_5*TGN_OFUT1*TGN_sO5*TGN_UDP_Fuc/(OFUT1_Km_OR0_5*OFUT1_Kmd_UDP_Fuc*(1 + TGN_UDP_Fuc/OFUT1_Kmd_UDP_Fuc)*(1 + cis_sO0/OFUT1_Km_OR0_5 + medial_sO0/OFUT1_Km_OR0_5 + trans_sO0/OFUT1_Km_OR0_5 + TGN_sO0/OFUT1_Km_OR0_5));  // modifiers: TGN_OFUT1
  TGN_reOR0_6: TGN_sO6 + TGN_UDP_Fuc => TGN_sO15 + TGN_UDP; OFUT1_kf_OR0_6*TGN_OFUT1*TGN_sO6*TGN_UDP_Fuc/(OFUT1_Km_OR0_6*OFUT1_Kmd_UDP_Fuc*(1 + TGN_UDP_Fuc/OFUT1_Kmd_UDP_Fuc)*(1 + cis_sO0/OFUT1_Km_OR0_6 + medial_sO0/OFUT1_Km_OR0_6 + trans_sO0/OFUT1_Km_OR0_6 + TGN_sO0/OFUT1_Km_OR0_6));  // modifiers: TGN_OFUT1
  TGN_reOR0_7: TGN_sO7 + TGN_UDP_Fuc => TGN_sO16 + TGN_UDP; OFUT1_kf_OR0_7*TGN_OFUT1*TGN_sO7*TGN_UDP_Fuc/(OFUT1_Km_OR0_7*OFUT1_Kmd_UDP_Fuc*(1 + TGN_UDP_Fuc/OFUT1_Kmd_UDP_Fuc)*(1 + cis_sO0/OFUT1_Km_OR0_7 + medial_sO0/OFUT1_Km_OR0_7 + trans_sO0/OFUT1_Km_OR0_7 + TGN_sO0/OFUT1_Km_OR0_7));  // modifiers: TGN_OFUT1
  TGN_reOR0_8: TGN_sO8 + TGN_UDP_Fuc => TGN_sO17 + TGN_UDP; OFUT1_kf_OR0_8*TGN_OFUT1*TGN_sO8*TGN_UDP_Fuc/(OFUT1_Km_OR0_8*OFUT1_Kmd_UDP_Fuc*(1 + TGN_UDP_Fuc/OFUT1_Kmd_UDP_Fuc)*(1 + cis_sO0/OFUT1_Km_OR0_8 + medial_sO0/OFUT1_Km_OR0_8 + trans_sO0/OFUT1_Km_OR0_8 + TGN_sO0/OFUT1_Km_OR0_8));  // modifiers: TGN_OFUT1
  TGN_reOR1_0: TGN_sO9 + TGN_UDP_GlcNAc => TGN_sO18 + TGN_UDP; Fringe_kf_OR1_0*TGN_Fringe*TGN_sO9*TGN_UDP_GlcNAc/(Fringe_Km_OR1_0*Fringe_Kmd_UDP_GlcNAc*(1 + TGN_UDP_GlcNAc/Fringe_Kmd_UDP_GlcNAc)*(1 + cis_sO9/Fringe_Km_OR1_0 + medial_sO9/Fringe_Km_OR1_0 + trans_sO9/Fringe_Km_OR1_0 + TGN_sO9/Fringe_Km_OR1_0));  // modifiers: TGN_Fringe
  TGN_reOR1_1: TGN_sO10 + TGN_UDP_GlcNAc => TGN_sO19 + TGN_UDP; Fringe_kf_OR1_1*TGN_Fringe*TGN_sO10*TGN_UDP_GlcNAc/(Fringe_Km_OR1_1*Fringe_Kmd_UDP_GlcNAc*(1 + TGN_UDP_GlcNAc/Fringe_Kmd_UDP_GlcNAc)*(1 + cis_sO9/Fringe_Km_OR1_1 + medial_sO9/Fringe_Km_OR1_1 + trans_sO9/Fringe_Km_OR1_1 + TGN_sO9/Fringe_Km_OR1_1));  // modifiers: TGN_Fringe
  TGN_reOR1_2: TGN_sO11 + TGN_UDP_GlcNAc => TGN_sO20 + TGN_UDP; Fringe_kf_OR1_2*TGN_Fringe*TGN_sO11*TGN_UDP_GlcNAc/(Fringe_Km_OR1_2*Fringe_Kmd_UDP_GlcNAc*(1 + TGN_UDP_GlcNAc/Fringe_Kmd_UDP_GlcNAc)*(1 + cis_sO9/Fringe_Km_OR1_2 + medial_sO9/Fringe_Km_OR1_2 + trans_sO9/Fringe_Km_OR1_2 + TGN_sO9/Fringe_Km_OR1_2));  // modifiers: TGN_Fringe
  TGN_reOR1_3: TGN_sO12 + TGN_UDP_GlcNAc => TGN_sO21 + TGN_UDP; Fringe_kf_OR1_3*TGN_Fringe*TGN_sO12*TGN_UDP_GlcNAc/(Fringe_Km_OR1_3*Fringe_Kmd_UDP_GlcNAc*(1 + TGN_UDP_GlcNAc/Fringe_Kmd_UDP_GlcNAc)*(1 + cis_sO9/Fringe_Km_OR1_3 + medial_sO9/Fringe_Km_OR1_3 + trans_sO9/Fringe_Km_OR1_3 + TGN_sO9/Fringe_Km_OR1_3));  // modifiers: TGN_Fringe
  TGN_reOR1_4: TGN_sO13 + TGN_UDP_GlcNAc => TGN_sO22 + TGN_UDP; Fringe_kf_OR1_4*TGN_Fringe*TGN_sO13*TGN_UDP_GlcNAc/(Fringe_Km_OR1_4*Fringe_Kmd_UDP_GlcNAc*(1 + TGN_UDP_GlcNAc/Fringe_Kmd_UDP_GlcNAc)*(1 + cis_sO9/Fringe_Km_OR1_4 + medial_sO9/Fringe_Km_OR1_4 + trans_sO9/Fringe_Km_OR1_4 + TGN_sO9/Fringe_Km_OR1_4));  // modifiers: TGN_Fringe
  TGN_reOR1_5: TGN_sO14 + TGN_UDP_GlcNAc => TGN_sO23 + TGN_UDP; Fringe_kf_OR1_5*TGN_Fringe*TGN_sO14*TGN_UDP_GlcNAc/(Fringe_Km_OR1_5*Fringe_Kmd_UDP_GlcNAc*(1 + TGN_UDP_GlcNAc/Fringe_Kmd_UDP_GlcNAc)*(1 + cis_sO9/Fringe_Km_OR1_5 + medial_sO9/Fringe_Km_OR1_5 + trans_sO9/Fringe_Km_OR1_5 + TGN_sO9/Fringe_Km_OR1_5));  // modifiers: TGN_Fringe
  TGN_reOR1_6: TGN_sO15 + TGN_UDP_GlcNAc => TGN_sO24 + TGN_UDP; Fringe_kf_OR1_6*TGN_Fringe*TGN_sO15*TGN_UDP_GlcNAc/(Fringe_Km_OR1_6*Fringe_Kmd_UDP_GlcNAc*(1 + TGN_UDP_GlcNAc/Fringe_Kmd_UDP_GlcNAc)*(1 + cis_sO9/Fringe_Km_OR1_6 + medial_sO9/Fringe_Km_OR1_6 + trans_sO9/Fringe_Km_OR1_6 + TGN_sO9/Fringe_Km_OR1_6));  // modifiers: TGN_Fringe
  TGN_reOR1_7: TGN_sO16 + TGN_UDP_GlcNAc => TGN_sO25 + TGN_UDP; Fringe_kf_OR1_7*TGN_Fringe*TGN_sO16*TGN_UDP_GlcNAc/(Fringe_Km_OR1_7*Fringe_Kmd_UDP_GlcNAc*(1 + TGN_UDP_GlcNAc/Fringe_Kmd_UDP_GlcNAc)*(1 + cis_sO9/Fringe_Km_OR1_7 + medial_sO9/Fringe_Km_OR1_7 + trans_sO9/Fringe_Km_OR1_7 + TGN_sO9/Fringe_Km_OR1_7));  // modifiers: TGN_Fringe
  TGN_reOR2_0: TGN_sO0 + TGN_UDP_Fuc => TGN_sO3 + TGN_UDP; OFUT1_kf_OR2_0*TGN_OFUT1*TGN_sO0*TGN_UDP_Fuc/(OFUT1_Km_OR2_0*OFUT1_Kmd_UDP_Fuc*(1 + TGN_UDP_Fuc/OFUT1_Kmd_UDP_Fuc)*(1 + cis_sO0/OFUT1_Km_OR2_0 + medial_sO0/OFUT1_Km_OR2_0 + trans_sO0/OFUT1_Km_OR2_0 + TGN_sO0/OFUT1_Km_OR2_0));  // modifiers: TGN_OFUT1
  TGN_reOR2_1: TGN_sO1 + TGN_UDP_Fuc => TGN_sO4 + TGN_UDP; OFUT1_kf_OR2_1*TGN_OFUT1*TGN_sO1*TGN_UDP_Fuc/(OFUT1_Km_OR2_1*OFUT1_Kmd_UDP_Fuc*(1 + TGN_UDP_Fuc/OFUT1_Kmd_UDP_Fuc)*(1 + cis_sO0/OFUT1_Km_OR2_1 + medial_sO0/OFUT1_Km_OR2_1 + trans_sO0/OFUT1_Km_OR2_1 + TGN_sO0/OFUT1_Km_OR2_1));  // modifiers: TGN_OFUT1
  TGN_reOR2_2: TGN_sO2 + TGN_UDP_Fuc => TGN_sO5 + TGN_UDP; OFUT1_kf_OR2_2*TGN_OFUT1*TGN_sO2*TGN_UDP_Fuc/(OFUT1_Km_OR2_2*OFUT1_Kmd_UDP_Fuc*(1 + TGN_UDP_Fuc/OFUT1_Kmd_UDP_Fuc)*(1 + cis_sO0/OFUT1_Km_OR2_2 + medial_sO0/OFUT1_Km_OR2_2 + trans_sO0/OFUT1_Km_OR2_2 + TGN_sO0/OFUT1_Km_OR2_2));  // modifiers: TGN_OFUT1
  TGN_reOR2_3: TGN_sO9 + TGN_UDP_Fuc => TGN_sO12 + TGN_UDP; OFUT1_kf_OR2_3*TGN_OFUT1*TGN_sO9*TGN_UDP_Fuc/(OFUT1_Km_OR2_3*OFUT1_Kmd_UDP_Fuc*(1 + TGN_UDP_Fuc/OFUT1_Kmd_UDP_Fuc)*(1 + cis_sO0/OFUT1_Km_OR2_3 + medial_sO0/OFUT1_Km_OR2_3 + trans_sO0/OFUT1_Km_OR2_3 + TGN_sO0/OFUT1_Km_OR2_3));  // modifiers: TGN_OFUT1
  TGN_reOR2_4: TGN_sO10 + TGN_UDP_Fuc => TGN_sO13 + TGN_UDP; OFUT1_kf_OR2_4*TGN_OFUT1*TGN_sO10*TGN_UDP_Fuc/(OFUT1_Km_OR2_4*OFUT1_Kmd_UDP_Fuc*(1 + TGN_UDP_Fuc/OFUT1_Kmd_UDP_Fuc)*(1 + cis_sO0/OFUT1_Km_OR2_4 + medial_sO0/OFUT1_Km_OR2_4 + trans_sO0/OFUT1_Km_OR2_4 + TGN_sO0/OFUT1_Km_OR2_4));  // modifiers: TGN_OFUT1
  TGN_reOR2_5: TGN_sO11 + TGN_UDP_Fuc => TGN_sO14 + TGN_UDP; OFUT1_kf_OR2_5*TGN_OFUT1*TGN_sO11*TGN_UDP_Fuc/(OFUT1_Km_OR2_5*OFUT1_Kmd_UDP_Fuc*(1 + TGN_UDP_Fuc/OFUT1_Kmd_UDP_Fuc)*(1 + cis_sO0/OFUT1_Km_OR2_5 + medial_sO0/OFUT1_Km_OR2_5 + trans_sO0/OFUT1_Km_OR2_5 + TGN_sO0/OFUT1_Km_OR2_5));  // modifiers: TGN_OFUT1
  TGN_reOR2_6: TGN_sO18 + TGN_UDP_Fuc => TGN_sO21 + TGN_UDP; OFUT1_kf_OR2_6*TGN_OFUT1*TGN_sO18*TGN_UDP_Fuc/(OFUT1_Km_OR2_6*OFUT1_Kmd_UDP_Fuc*(1 + TGN_UDP_Fuc/OFUT1_Kmd_UDP_Fuc)*(1 + cis_sO0/OFUT1_Km_OR2_6 + medial_sO0/OFUT1_Km_OR2_6 + trans_sO0/OFUT1_Km_OR2_6 + TGN_sO0/OFUT1_Km_OR2_6));  // modifiers: TGN_OFUT1
  TGN_reOR2_7: TGN_sO19 + TGN_UDP_Fuc => TGN_sO22 + TGN_UDP; OFUT1_kf_OR2_7*TGN_OFUT1*TGN_sO19*TGN_UDP_Fuc/(OFUT1_Km_OR2_7*OFUT1_Kmd_UDP_Fuc*(1 + TGN_UDP_Fuc/OFUT1_Kmd_UDP_Fuc)*(1 + cis_sO0/OFUT1_Km_OR2_7 + medial_sO0/OFUT1_Km_OR2_7 + trans_sO0/OFUT1_Km_OR2_7 + TGN_sO0/OFUT1_Km_OR2_7));  // modifiers: TGN_OFUT1
  TGN_reOR2_8: TGN_sO20 + TGN_UDP_Fuc => TGN_sO23 + TGN_UDP; OFUT1_kf_OR2_8*TGN_OFUT1*TGN_sO20*TGN_UDP_Fuc/(OFUT1_Km_OR2_8*OFUT1_Kmd_UDP_Fuc*(1 + TGN_UDP_Fuc/OFUT1_Kmd_UDP_Fuc)*(1 + cis_sO0/OFUT1_Km_OR2_8 + medial_sO0/OFUT1_Km_OR2_8 + trans_sO0/OFUT1_Km_OR2_8 + TGN_sO0/OFUT1_Km_OR2_8));  // modifiers: TGN_OFUT1
  TGN_reOR3_0: TGN_sO3 + TGN_UDP_GlcNAc => TGN_sO6 + TGN_UDP; Fringe_kf_OR3_0*TGN_Fringe*TGN_sO3*TGN_UDP_GlcNAc/(Fringe_Km_OR3_0*Fringe_Kmd_UDP_GlcNAc*(1 + TGN_UDP_GlcNAc/Fringe_Kmd_UDP_GlcNAc)*(1 + cis_sO9/Fringe_Km_OR3_0 + medial_sO9/Fringe_Km_OR3_0 + trans_sO9/Fringe_Km_OR3_0 + TGN_sO9/Fringe_Km_OR3_0));  // modifiers: TGN_Fringe
  TGN_reOR3_1: TGN_sO4 + TGN_UDP_GlcNAc => TGN_sO7 + TGN_UDP; Fringe_kf_OR3_1*TGN_Fringe*TGN_sO4*TGN_UDP_GlcNAc/(Fringe_Km_OR3_1*Fringe_Kmd_UDP_GlcNAc*(1 + TGN_UDP_GlcNAc/Fringe_Kmd_UDP_GlcNAc)*(1 + cis_sO9/Fringe_Km_OR3_1 + medial_sO9/Fringe_Km_OR3_1 + trans_sO9/Fringe_Km_OR3_1 + TGN_sO9/Fringe_Km_OR3_1));  // modifiers: TGN_Fringe
  TGN_reOR3_2: TGN_sO5 + TGN_UDP_GlcNAc => TGN_sO8 + TGN_UDP; Fringe_kf_OR3_2*TGN_Fringe*TGN_sO5*TGN_UDP_GlcNAc/(Fringe_Km_OR3_2*Fringe_Kmd_UDP_GlcNAc*(1 + TGN_UDP_GlcNAc/Fringe_Kmd_UDP_GlcNAc)*(1 + cis_sO9/Fringe_Km_OR3_2 + medial_sO9/Fringe_Km_OR3_2 + trans_sO9/Fringe_Km_OR3_2 + TGN_sO9/Fringe_Km_OR3_2));  // modifiers: TGN_Fringe
  TGN_reOR3_3: TGN_sO12 + TGN_UDP_GlcNAc => TGN_sO15 + TGN_UDP; Fringe_kf_OR3_3*TGN_Fringe*TGN_sO12*TGN_UDP_GlcNAc/(Fringe_Km_OR3_3*Fringe_Kmd_UDP_GlcNAc*(1 + TGN_UDP_GlcNAc/Fringe_Kmd_UDP_GlcNAc)*(1 + cis_sO9/Fringe_Km_OR3_3 + medial_sO9/Fringe_Km_OR3_3 + trans_sO9/Fringe_Km_OR3_3 + TGN_sO9/Fringe_Km_OR3_3));  // modifiers: TGN_Fringe
  TGN_reOR3_4: TGN_sO13 + TGN_UDP_GlcNAc => TGN_sO16 + TGN_UDP; Fringe_kf_OR3_4*TGN_Fringe*TGN_sO13*TGN_UDP_GlcNAc/(Fringe_Km_OR3_4*Fringe_Kmd_UDP_GlcNAc*(1 + TGN_UDP_GlcNAc/Fringe_Kmd_UDP_GlcNAc)*(1 + cis_sO9/Fringe_Km_OR3_4 + medial_sO9/Fringe_Km_OR3_4 + trans_sO9/Fringe_Km_OR3_4 + TGN_sO9/Fringe_Km_OR3_4));  // modifiers: TGN_Fringe
  TGN_reOR3_5: TGN_sO14 + TGN_UDP_GlcNAc => TGN_sO17 + TGN_UDP; Fringe_kf_OR3_5*TGN_Fringe*TGN_sO14*TGN_UDP_GlcNAc/(Fringe_Km_OR3_5*Fringe_Kmd_UDP_GlcNAc*(1 + TGN_UDP_GlcNAc/Fringe_Kmd_UDP_GlcNAc)*(1 + cis_sO9/Fringe_Km_OR3_5 + medial_sO9/Fringe_Km_OR3_5 + trans_sO9/Fringe_Km_OR3_5 + TGN_sO9/Fringe_Km_OR3_5));  // modifiers: TGN_Fringe
  TGN_reOR3_6: TGN_sO21 + TGN_UDP_GlcNAc => TGN_sO24 + TGN_UDP; Fringe_kf_OR3_6*TGN_Fringe*TGN_sO21*TGN_UDP_GlcNAc/(Fringe_Km_OR3_6*Fringe_Kmd_UDP_GlcNAc*(1 + TGN_UDP_GlcNAc/Fringe_Kmd_UDP_GlcNAc)*(1 + cis_sO9/Fringe_Km_OR3_6 + medial_sO9/Fringe_Km_OR3_6 + trans_sO9/Fringe_Km_OR3_6 + TGN_sO9/Fringe_Km_OR3_6));  // modifiers: TGN_Fringe
  TGN_reOR3_7: TGN_sO22 + TGN_UDP_GlcNAc => TGN_sO25 + TGN_UDP; Fringe_kf_OR3_7*TGN_Fringe*TGN_sO22*TGN_UDP_GlcNAc/(Fringe_Km_OR3_7*Fringe_Kmd_UDP_GlcNAc*(1 + TGN_UDP_GlcNAc/Fringe_Kmd_UDP_GlcNAc)*(1 + cis_sO9/Fringe_Km_OR3_7 + medial_sO9/Fringe_Km_OR3_7 + trans_sO9/Fringe_Km_OR3_7 + TGN_sO9/Fringe_Km_OR3_7));  // modifiers: TGN_Fringe
  TGN_reOR4_0: TGN_sO0 + TGN_UDP_Fuc => TGN_sO1 + TGN_UDP; OFUT1_kf_OR4_0*TGN_OFUT1*TGN_sO0*TGN_UDP_Fuc/(OFUT1_Km_OR4_0*OFUT1_Kmd_UDP_Fuc*(1 + TGN_UDP_Fuc/OFUT1_Kmd_UDP_Fuc)*(1 + cis_sO0/OFUT1_Km_OR4_0 + medial_sO0/OFUT1_Km_OR4_0 + trans_sO0/OFUT1_Km_OR4_0 + TGN_sO0/OFUT1_Km_OR4_0));  // modifiers: TGN_OFUT1
  TGN_reOR4_1: TGN_sO3 + TGN_UDP_Fuc => TGN_sO4 + TGN_UDP; OFUT1_kf_OR4_1*TGN_OFUT1*TGN_sO3*TGN_UDP_Fuc/(OFUT1_Km_OR4_1*OFUT1_Kmd_UDP_Fuc*(1 + TGN_UDP_Fuc/OFUT1_Kmd_UDP_Fuc)*(1 + cis_sO0/OFUT1_Km_OR4_1 + medial_sO0/OFUT1_Km_OR4_1 + trans_sO0/OFUT1_Km_OR4_1 + TGN_sO0/OFUT1_Km_OR4_1));  // modifiers: TGN_OFUT1
  TGN_reOR4_2: TGN_sO6 + TGN_UDP_Fuc => TGN_sO7 + TGN_UDP; OFUT1_kf_OR4_2*TGN_OFUT1*TGN_sO6*TGN_UDP_Fuc/(OFUT1_Km_OR4_2*OFUT1_Kmd_UDP_Fuc*(1 + TGN_UDP_Fuc/OFUT1_Kmd_UDP_Fuc)*(1 + cis_sO0/OFUT1_Km_OR4_2 + medial_sO0/OFUT1_Km_OR4_2 + trans_sO0/OFUT1_Km_OR4_2 + TGN_sO0/OFUT1_Km_OR4_2));  // modifiers: TGN_OFUT1
  TGN_reOR4_3: TGN_sO9 + TGN_UDP_Fuc => TGN_sO10 + TGN_UDP; OFUT1_kf_OR4_3*TGN_OFUT1*TGN_sO9*TGN_UDP_Fuc/(OFUT1_Km_OR4_3*OFUT1_Kmd_UDP_Fuc*(1 + TGN_UDP_Fuc/OFUT1_Kmd_UDP_Fuc)*(1 + cis_sO0/OFUT1_Km_OR4_3 + medial_sO0/OFUT1_Km_OR4_3 + trans_sO0/OFUT1_Km_OR4_3 + TGN_sO0/OFUT1_Km_OR4_3));  // modifiers: TGN_OFUT1
  TGN_reOR4_4: TGN_sO12 + TGN_UDP_Fuc => TGN_sO13 + TGN_UDP; OFUT1_kf_OR4_4*TGN_OFUT1*TGN_sO12*TGN_UDP_Fuc/(OFUT1_Km_OR4_4*OFUT1_Kmd_UDP_Fuc*(1 + TGN_UDP_Fuc/OFUT1_Kmd_UDP_Fuc)*(1 + cis_sO0/OFUT1_Km_OR4_4 + medial_sO0/OFUT1_Km_OR4_4 + trans_sO0/OFUT1_Km_OR4_4 + TGN_sO0/OFUT1_Km_OR4_4));  // modifiers: TGN_OFUT1
  TGN_reOR4_5: TGN_sO15 + TGN_UDP_Fuc => TGN_sO16 + TGN_UDP; OFUT1_kf_OR4_5*TGN_OFUT1*TGN_sO15*TGN_UDP_Fuc/(OFUT1_Km_OR4_5*OFUT1_Kmd_UDP_Fuc*(1 + TGN_UDP_Fuc/OFUT1_Kmd_UDP_Fuc)*(1 + cis_sO0/OFUT1_Km_OR4_5 + medial_sO0/OFUT1_Km_OR4_5 + trans_sO0/OFUT1_Km_OR4_5 + TGN_sO0/OFUT1_Km_OR4_5));  // modifiers: TGN_OFUT1
  TGN_reOR4_6: TGN_sO18 + TGN_UDP_Fuc => TGN_sO19 + TGN_UDP; OFUT1_kf_OR4_6*TGN_OFUT1*TGN_sO18*TGN_UDP_Fuc/(OFUT1_Km_OR4_6*OFUT1_Kmd_UDP_Fuc*(1 + TGN_UDP_Fuc/OFUT1_Kmd_UDP_Fuc)*(1 + cis_sO0/OFUT1_Km_OR4_6 + medial_sO0/OFUT1_Km_OR4_6 + trans_sO0/OFUT1_Km_OR4_6 + TGN_sO0/OFUT1_Km_OR4_6));  // modifiers: TGN_OFUT1
  TGN_reOR4_7: TGN_sO21 + TGN_UDP_Fuc => TGN_sO22 + TGN_UDP; OFUT1_kf_OR4_7*TGN_OFUT1*TGN_sO21*TGN_UDP_Fuc/(OFUT1_Km_OR4_7*OFUT1_Kmd_UDP_Fuc*(1 + TGN_UDP_Fuc/OFUT1_Kmd_UDP_Fuc)*(1 + cis_sO0/OFUT1_Km_OR4_7 + medial_sO0/OFUT1_Km_OR4_7 + trans_sO0/OFUT1_Km_OR4_7 + TGN_sO0/OFUT1_Km_OR4_7));  // modifiers: TGN_OFUT1
  TGN_reOR4_8: TGN_sO24 + TGN_UDP_Fuc => TGN_sO25 + TGN_UDP; OFUT1_kf_OR4_8*TGN_OFUT1*TGN_sO24*TGN_UDP_Fuc/(OFUT1_Km_OR4_8*OFUT1_Kmd_UDP_Fuc*(1 + TGN_UDP_Fuc/OFUT1_Kmd_UDP_Fuc)*(1 + cis_sO0/OFUT1_Km_OR4_8 + medial_sO0/OFUT1_Km_OR4_8 + trans_sO0/OFUT1_Km_OR4_8 + TGN_sO0/OFUT1_Km_OR4_8));  // modifiers: TGN_OFUT1
  TGN_reOR5_0: TGN_sO1 + TGN_UDP_GlcNAc => TGN_sO2 + TGN_UDP; Fringe_kf_OR5_0*TGN_Fringe*TGN_sO1*TGN_UDP_GlcNAc/(Fringe_Km_OR5_0*Fringe_Kmd_UDP_GlcNAc*(1 + TGN_UDP_GlcNAc/Fringe_Kmd_UDP_GlcNAc)*(1 + cis_sO9/Fringe_Km_OR5_0 + medial_sO9/Fringe_Km_OR5_0 + trans_sO9/Fringe_Km_OR5_0 + TGN_sO9/Fringe_Km_OR5_0));  // modifiers: TGN_Fringe
  TGN_reOR5_1: TGN_sO4 + TGN_UDP_GlcNAc => TGN_sO5 + TGN_UDP; Fringe_kf_OR5_1*TGN_Fringe*TGN_sO4*TGN_UDP_GlcNAc/(Fringe_Km_OR5_1*Fringe_Kmd_UDP_GlcNAc*(1 + TGN_UDP_GlcNAc/Fringe_Kmd_UDP_GlcNAc)*(1 + cis_sO9/Fringe_Km_OR5_1 + medial_sO9/Fringe_Km_OR5_1 + trans_sO9/Fringe_Km_OR5_1 + TGN_sO9/Fringe_Km_OR5_1));  // modifiers: TGN_Fringe
  TGN_reOR5_2: TGN_sO7 + TGN_UDP_GlcNAc => TGN_sO8 + TGN_UDP; Fringe_kf_OR5_2*TGN_Fringe*TGN_sO7*TGN_UDP_GlcNAc/(Fringe_Km_OR5_2*Fringe_Kmd_UDP_GlcNAc*(1 + TGN_UDP_GlcNAc/Fringe_Kmd_UDP_GlcNAc)*(1 + cis_sO9/Fringe_Km_OR5_2 + medial_sO9/Fringe_Km_OR5_2 + trans_sO9/Fringe_Km_OR5_2 + TGN_sO9/Fringe_Km_OR5_2));  // modifiers: TGN_Fringe
  TGN_reOR5_3: TGN_sO10 + TGN_UDP_GlcNAc => TGN_sO11 + TGN_UDP; Fringe_kf_OR5_3*TGN_Fringe*TGN_sO10*TGN_UDP_GlcNAc/(Fringe_Km_OR5_3*Fringe_Kmd_UDP_GlcNAc*(1 + TGN_UDP_GlcNAc/Fringe_Kmd_UDP_GlcNAc)*(1 + cis_sO9/Fringe_Km_OR5_3 + medial_sO9/Fringe_Km_OR5_3 + trans_sO9/Fringe_Km_OR5_3 + TGN_sO9/Fringe_Km_OR5_3));  // modifiers: TGN_Fringe
  TGN_reOR5_4: TGN_sO13 + TGN_UDP_GlcNAc => TGN_sO14 + TGN_UDP; Fringe_kf_OR5_4*TGN_Fringe*TGN_sO13*TGN_UDP_GlcNAc/(Fringe_Km_OR5_4*Fringe_Kmd_UDP_GlcNAc*(1 + TGN_UDP_GlcNAc/Fringe_Kmd_UDP_GlcNAc)*(1 + cis_sO9/Fringe_Km_OR5_4 + medial_sO9/Fringe_Km_OR5_4 + trans_sO9/Fringe_Km_OR5_4 + TGN_sO9/Fringe_Km_OR5_4));  // modifiers: TGN_Fringe
  TGN_reOR5_5: TGN_sO16 + TGN_UDP_GlcNAc => TGN_sO17 + TGN_UDP; Fringe_kf_OR5_5*TGN_Fringe*TGN_sO16*TGN_UDP_GlcNAc/(Fringe_Km_OR5_5*Fringe_Kmd_UDP_GlcNAc*(1 + TGN_UDP_GlcNAc/Fringe_Kmd_UDP_GlcNAc)*(1 + cis_sO9/Fringe_Km_OR5_5 + medial_sO9/Fringe_Km_OR5_5 + trans_sO9/Fringe_Km_OR5_5 + TGN_sO9/Fringe_Km_OR5_5));  // modifiers: TGN_Fringe
  TGN_reOR5_6: TGN_sO19 + TGN_UDP_GlcNAc => TGN_sO20 + TGN_UDP; Fringe_kf_OR5_6*TGN_Fringe*TGN_sO19*TGN_UDP_GlcNAc/(Fringe_Km_OR5_6*Fringe_Kmd_UDP_GlcNAc*(1 + TGN_UDP_GlcNAc/Fringe_Kmd_UDP_GlcNAc)*(1 + cis_sO9/Fringe_Km_OR5_6 + medial_sO9/Fringe_Km_OR5_6 + trans_sO9/Fringe_Km_OR5_6 + TGN_sO9/Fringe_Km_OR5_6));  // modifiers: TGN_Fringe
  TGN_reOR5_7: TGN_sO22 + TGN_UDP_GlcNAc => TGN_sO23 + TGN_UDP; Fringe_kf_OR5_7*TGN_Fringe*TGN_sO22*TGN_UDP_GlcNAc/(Fringe_Km_OR5_7*Fringe_Kmd_UDP_GlcNAc*(1 + TGN_UDP_GlcNAc/Fringe_Kmd_UDP_GlcNAc)*(1 + cis_sO9/Fringe_Km_OR5_7 + medial_sO9/Fringe_Km_OR5_7 + trans_sO9/Fringe_Km_OR5_7 + TGN_sO9/Fringe_Km_OR5_7));  // modifiers: TGN_Fringe
  Sec_reOR0_0: Sec_sO0 + Sec_UDP_Fuc => Sec_sO9 + Sec_UDP; OFUT1_kf_OR0_0*Sec_OFUT1*Sec_sO0*Sec_UDP_Fuc/(OFUT1_Km_OR0_0*OFUT1_Kmd_UDP_Fuc*(1 + Sec_UDP_Fuc/OFUT1_Kmd_UDP_Fuc)*(1 + cis_sO0/OFUT1_Km_OR0_0 + medial_sO0/OFUT1_Km_OR0_0 + trans_sO0/OFUT1_Km_OR0_0 + TGN_sO0/OFUT1_Km_OR0_0 + Sec_sO0/OFUT1_Km_OR0_0));  // modifiers: Sec_OFUT1
  Sec_reOR0_1: Sec_sO1 + Sec_UDP_Fuc => Sec_sO10 + Sec_UDP; OFUT1_kf_OR0_1*Sec_OFUT1*Sec_sO1*Sec_UDP_Fuc/(OFUT1_Km_OR0_1*OFUT1_Kmd_UDP_Fuc*(1 + Sec_UDP_Fuc/OFUT1_Kmd_UDP_Fuc)*(1 + cis_sO0/OFUT1_Km_OR0_1 + medial_sO0/OFUT1_Km_OR0_1 + trans_sO0/OFUT1_Km_OR0_1 + TGN_sO0/OFUT1_Km_OR0_1 + Sec_sO0/OFUT1_Km_OR0_1));  // modifiers: Sec_OFUT1
  Sec_reOR0_2: Sec_sO2 + Sec_UDP_Fuc => Sec_sO11 + Sec_UDP; OFUT1_kf_OR0_2*Sec_OFUT1*Sec_sO2*Sec_UDP_Fuc/(OFUT1_Km_OR0_2*OFUT1_Kmd_UDP_Fuc*(1 + Sec_UDP_Fuc/OFUT1_Kmd_UDP_Fuc)*(1 + cis_sO0/OFUT1_Km_OR0_2 + medial_sO0/OFUT1_Km_OR0_2 + trans_sO0/OFUT1_Km_OR0_2 + TGN_sO0/OFUT1_Km_OR0_2 + Sec_sO0/OFUT1_Km_OR0_2));  // modifiers: Sec_OFUT1
  Sec_reOR0_3: Sec_sO3 + Sec_UDP_Fuc => Sec_sO12 + Sec_UDP; OFUT1_kf_OR0_3*Sec_OFUT1*Sec_sO3*Sec_UDP_Fuc/(OFUT1_Km_OR0_3*OFUT1_Kmd_UDP_Fuc*(1 + Sec_UDP_Fuc/OFUT1_Kmd_UDP_Fuc)*(1 + cis_sO0/OFUT1_Km_OR0_3 + medial_sO0/OFUT1_Km_OR0_3 + trans_sO0/OFUT1_Km_OR0_3 + TGN_sO0/OFUT1_Km_OR0_3 + Sec_sO0/OFUT1_Km_OR0_3));  // modifiers: Sec_OFUT1
  Sec_reOR0_4: Sec_sO4 + Sec_UDP_Fuc => Sec_sO13 + Sec_UDP; OFUT1_kf_OR0_4*Sec_OFUT1*Sec_sO4*Sec_UDP_Fuc/(OFUT1_Km_OR0_4*OFUT1_Kmd_UDP_Fuc*(1 + Sec_UDP_Fuc/OFUT1_Kmd_UDP_Fuc)*(1 + cis_sO0/OFUT1_Km_OR0_4 + medial_sO0/OFUT1_Km_OR0_4 + trans_sO0/OFUT1_Km_OR0_4 + TGN_sO0/OFUT1_Km_OR0_4 + Sec_sO0/OFUT1_Km_OR0_4));  // modifiers: Sec_OFUT1
  Sec_reOR0_5: Sec_sO5 + Sec_UDP_Fuc => Sec_sO14 + Sec_UDP; OFUT1_kf_OR0_5*Sec_OFUT1*Sec_sO5*Sec_UDP_Fuc/(OFUT1_Km_OR0_5*OFUT1_Kmd_UDP_Fuc*(1 + Sec_UDP_Fuc/OFUT1_Kmd_UDP_Fuc)*(1 + cis_sO0/OFUT1_Km_OR0_5 + medial_sO0/OFUT1_Km_OR0_5 + trans_sO0/OFUT1_Km_OR0_5 + TGN_sO0/OFUT1_Km_OR0_5 + Sec_sO0/OFUT1_Km_OR0_5));  // modifiers: Sec_OFUT1
  Sec_reOR0_6: Sec_sO6 + Sec_UDP_Fuc => Sec_sO15 + Sec_UDP; OFUT1_kf_OR0_6*Sec_OFUT1*Sec_sO6*Sec_UDP_Fuc/(OFUT1_Km_OR0_6*OFUT1_Kmd_UDP_Fuc*(1 + Sec_UDP_Fuc/OFUT1_Kmd_UDP_Fuc)*(1 + cis_sO0/OFUT1_Km_OR0_6 + medial_sO0/OFUT1_Km_OR0_6 + trans_sO0/OFUT1_Km_OR0_6 + TGN_sO0/OFUT1_Km_OR0_6 + Sec_sO0/OFUT1_Km_OR0_6));  // modifiers: Sec_OFUT1
  Sec_reOR0_7: Sec_sO7 + Sec_UDP_Fuc => Sec_sO16 + Sec_UDP; OFUT1_kf_OR0_7*Sec_OFUT1*Sec_sO7*Sec_UDP_Fuc/(OFUT1_Km_OR0_7*OFUT1_Kmd_UDP_Fuc*(1 + Sec_UDP_Fuc/OFUT1_Kmd_UDP_Fuc)*(1 + cis_sO0/OFUT1_Km_OR0_7 + medial_sO0/OFUT1_Km_OR0_7 + trans_sO0/OFUT1_Km_OR0_7 + TGN_sO0/OFUT1_Km_OR0_7 + Sec_sO0/OFUT1_Km_OR0_7));  // modifiers: Sec_OFUT1
  Sec_reOR0_8: Sec_sO8 + Sec_UDP_Fuc => Sec_sO17 + Sec_UDP; OFUT1_kf_OR0_8*Sec_OFUT1*Sec_sO8*Sec_UDP_Fuc/(OFUT1_Km_OR0_8*OFUT1_Kmd_UDP_Fuc*(1 + Sec_UDP_Fuc/OFUT1_Kmd_UDP_Fuc)*(1 + cis_sO0/OFUT1_Km_OR0_8 + medial_sO0/OFUT1_Km_OR0_8 + trans_sO0/OFUT1_Km_OR0_8 + TGN_sO0/OFUT1_Km_OR0_8 + Sec_sO0/OFUT1_Km_OR0_8));  // modifiers: Sec_OFUT1
  Sec_reOR1_0: Sec_sO9 + Sec_UDP_GlcNAc => Sec_sO18 + Sec_UDP; Fringe_kf_OR1_0*Sec_Fringe*Sec_sO9*Sec_UDP_GlcNAc/(Fringe_Km_OR1_0*Fringe_Kmd_UDP_GlcNAc*(1 + Sec_UDP_GlcNAc/Fringe_Kmd_UDP_GlcNAc)*(1 + cis_sO9/Fringe_Km_OR1_0 + medial_sO9/Fringe_Km_OR1_0 + trans_sO9/Fringe_Km_OR1_0 + TGN_sO9/Fringe_Km_OR1_0 + Sec_sO9/Fringe_Km_OR1_0));  // modifiers: Sec_Fringe
  Sec_reOR1_1: Sec_sO10 + Sec_UDP_GlcNAc => Sec_sO19 + Sec_UDP; Fringe_kf_OR1_1*Sec_Fringe*Sec_sO10*Sec_UDP_GlcNAc/(Fringe_Km_OR1_1*Fringe_Kmd_UDP_GlcNAc*(1 + Sec_UDP_GlcNAc/Fringe_Kmd_UDP_GlcNAc)*(1 + cis_sO9/Fringe_Km_OR1_1 + medial_sO9/Fringe_Km_OR1_1 + trans_sO9/Fringe_Km_OR1_1 + TGN_sO9/Fringe_Km_OR1_1 + Sec_sO9/Fringe_Km_OR1_1));  // modifiers: Sec_Fringe
  Sec_reOR1_2: Sec_sO11 + Sec_UDP_GlcNAc => Sec_sO20 + Sec_UDP; Fringe_kf_OR1_2*Sec_Fringe*Sec_sO11*Sec_UDP_GlcNAc/(Fringe_Km_OR1_2*Fringe_Kmd_UDP_GlcNAc*(1 + Sec_UDP_GlcNAc/Fringe_Kmd_UDP_GlcNAc)*(1 + cis_sO9/Fringe_Km_OR1_2 + medial_sO9/Fringe_Km_OR1_2 + trans_sO9/Fringe_Km_OR1_2 + TGN_sO9/Fringe_Km_OR1_2 + Sec_sO9/Fringe_Km_OR1_2));  // modifiers: Sec_Fringe
  Sec_reOR1_3: Sec_sO12 + Sec_UDP_GlcNAc => Sec_sO21 + Sec_UDP; Fringe_kf_OR1_3*Sec_Fringe*Sec_sO12*Sec_UDP_GlcNAc/(Fringe_Km_OR1_3*Fringe_Kmd_UDP_GlcNAc*(1 + Sec_UDP_GlcNAc/Fringe_Kmd_UDP_GlcNAc)*(1 + cis_sO9/Fringe_Km_OR1_3 + medial_sO9/Fringe_Km_OR1_3 + trans_sO9/Fringe_Km_OR1_3 + TGN_sO9/Fringe_Km_OR1_3 + Sec_sO9/Fringe_Km_OR1_3));  // modifiers: Sec_Fringe
  Sec_reOR1_4: Sec_sO13 + Sec_UDP_GlcNAc => Sec_sO22 + Sec_UDP; Fringe_kf_OR1_4*Sec_Fringe*Sec_sO13*Sec_UDP_GlcNAc/(Fringe_Km_OR1_4*Fringe_Kmd_UDP_GlcNAc*(1 + Sec_UDP_GlcNAc/Fringe_Kmd_UDP_GlcNAc)*(1 + cis_sO9/Fringe_Km_OR1_4 + medial_sO9/Fringe_Km_OR1_4 + trans_sO9/Fringe_Km_OR1_4 + TGN_sO9/Fringe_Km_OR1_4 + Sec_sO9/Fringe_Km_OR1_4));  // modifiers: Sec_Fringe
  Sec_reOR1_5: Sec_sO14 + Sec_UDP_GlcNAc => Sec_sO23 + Sec_UDP; Fringe_kf_OR1_5*Sec_Fringe*Sec_sO14*Sec_UDP_GlcNAc/(Fringe_Km_OR1_5*Fringe_Kmd_UDP_GlcNAc*(1 + Sec_UDP_GlcNAc/Fringe_Kmd_UDP_GlcNAc)*(1 + cis_sO9/Fringe_Km_OR1_5 + medial_sO9/Fringe_Km_OR1_5 + trans_sO9/Fringe_Km_OR1_5 + TGN_sO9/Fringe_Km_OR1_5 + Sec_sO9/Fringe_Km_OR1_5));  // modifiers: Sec_Fringe
  Sec_reOR1_6: Sec_sO15 + Sec_UDP_GlcNAc => Sec_sO24 + Sec_UDP; Fringe_kf_OR1_6*Sec_Fringe*Sec_sO15*Sec_UDP_GlcNAc/(Fringe_Km_OR1_6*Fringe_Kmd_UDP_GlcNAc*(1 + Sec_UDP_GlcNAc/Fringe_Kmd_UDP_GlcNAc)*(1 + cis_sO9/Fringe_Km_OR1_6 + medial_sO9/Fringe_Km_OR1_6 + trans_sO9/Fringe_Km_OR1_6 + TGN_sO9/Fringe_Km_OR1_6 + Sec_sO9/Fringe_Km_OR1_6));  // modifiers: Sec_Fringe
  Sec_reOR1_7: Sec_sO16 + Sec_UDP_GlcNAc => Sec_sO25 + Sec_UDP; Fringe_kf_OR1_7*Sec_Fringe*Sec_sO16*Sec_UDP_GlcNAc/(Fringe_Km_OR1_7*Fringe_Kmd_UDP_GlcNAc*(1 + Sec_UDP_GlcNAc/Fringe_Kmd_UDP_GlcNAc)*(1 + cis_sO9/Fringe_Km_OR1_7 + medial_sO9/Fringe_Km_OR1_7 + trans_sO9/Fringe_Km_OR1_7 + TGN_sO9/Fringe_Km_OR1_7 + Sec_sO9/Fringe_Km_OR1_7));  // modifiers: Sec_Fringe
  Sec_reOR2_0: Sec_sO0 + Sec_UDP_Fuc => Sec_sO3 + Sec_UDP; OFUT1_kf_OR2_0*Sec_OFUT1*Sec_sO0*Sec_UDP_Fuc/(OFUT1_Km_OR2_0*OFUT1_Kmd_UDP_Fuc*(1 + Sec_UDP_Fuc/OFUT1_Kmd_UDP_Fuc)*(1 + cis_sO0/OFUT1_Km_OR2_0 + medial_sO0/OFUT1_Km_OR2_0 + trans_sO0/OFUT1_Km_OR2_0 + TGN_sO0/OFUT1_Km_OR2_0 + Sec_sO0/OFUT1_Km_OR2_0));  // modifiers: Sec_OFUT1
  Sec_reOR2_1: Sec_sO1 + Sec_UDP_Fuc => Sec_sO4 + Sec_UDP; OFUT1_kf_OR2_1*Sec_OFUT1*Sec_sO1*Sec_UDP_Fuc/(OFUT1_Km_OR2_1*OFUT1_Kmd_UDP_Fuc*(1 + Sec_UDP_Fuc/OFUT1_Kmd_UDP_Fuc)*(1 + cis_sO0/OFUT1_Km_OR2_1 + medial_sO0/OFUT1_Km_OR2_1 + trans_sO0/OFUT1_Km_OR2_1 + TGN_sO0/OFUT1_Km_OR2_1 + Sec_sO0/OFUT1_Km_OR2_1));  // modifiers: Sec_OFUT1
  Sec_reOR2_2: Sec_sO2 + Sec_UDP_Fuc => Sec_sO5 + Sec_UDP; OFUT1_kf_OR2_2*Sec_OFUT1*Sec_sO2*Sec_UDP_Fuc/(OFUT1_Km_OR2_2*OFUT1_Kmd_UDP_Fuc*(1 + Sec_UDP_Fuc/OFUT1_Kmd_UDP_Fuc)*(1 + cis_sO0/OFUT1_Km_OR2_2 + medial_sO0/OFUT1_Km_OR2_2 + trans_sO0/OFUT1_Km_OR2_2 + TGN_sO0/OFUT1_Km_OR2_2 + Sec_sO0/OFUT1_Km_OR2_2));  // modifiers: Sec_OFUT1
  Sec_reOR2_3: Sec_sO9 + Sec_UDP_Fuc => Sec_sO12 + Sec_UDP; OFUT1_kf_OR2_3*Sec_OFUT1*Sec_sO9*Sec_UDP_Fuc/(OFUT1_Km_OR2_3*OFUT1_Kmd_UDP_Fuc*(1 + Sec_UDP_Fuc/OFUT1_Kmd_UDP_Fuc)*(1 + cis_sO0/OFUT1_Km_OR2_3 + medial_sO0/OFUT1_Km_OR2_3 + trans_sO0/OFUT1_Km_OR2_3 + TGN_sO0/OFUT1_Km_OR2_3 + Sec_sO0/OFUT1_Km_OR2_3));  // modifiers: Sec_OFUT1
  Sec_reOR2_4: Sec_sO10 + Sec_UDP_Fuc => Sec_sO13 + Sec_UDP; OFUT1_kf_OR2_4*Sec_OFUT1*Sec_sO10*Sec_UDP_Fuc/(OFUT1_Km_OR2_4*OFUT1_Kmd_UDP_Fuc*(1 + Sec_UDP_Fuc/OFUT1_Kmd_UDP_Fuc)*(1 + cis_sO0/OFUT1_Km_OR2_4 + medial_sO0/OFUT1_Km_OR2_4 + trans_sO0/OFUT1_Km_OR2_4 + TGN_sO0/OFUT1_Km_OR2_4 + Sec_sO0/OFUT1_Km_OR2_4));  // modifiers: Sec_OFUT1
  Sec_reOR2_5: Sec_sO11 + Sec_UDP_Fuc => Sec_sO14 + Sec_UDP; OFUT1_kf_OR2_5*Sec_OFUT1*Sec_sO11*Sec_UDP_Fuc/(OFUT1_Km_OR2_5*OFUT1_Kmd_UDP_Fuc*(1 + Sec_UDP_Fuc/OFUT1_Kmd_UDP_Fuc)*(1 + cis_sO0/OFUT1_Km_OR2_5 + medial_sO0/OFUT1_Km_OR2_5 + trans_sO0/OFUT1_Km_OR2_5 + TGN_sO0/OFUT1_Km_OR2_5 + Sec_sO0/OFUT1_Km_OR2_5));  // modifiers: Sec_OFUT1
  Sec_reOR2_6: Sec_sO18 + Sec_UDP_Fuc => Sec_sO21 + Sec_UDP; OFUT1_kf_OR2_6*Sec_OFUT1*Sec_sO18*Sec_UDP_Fuc/(OFUT1_Km_OR2_6*OFUT1_Kmd_UDP_Fuc*(1 + Sec_UDP_Fuc/OFUT1_Kmd_UDP_Fuc)*(1 + cis_sO0/OFUT1_Km_OR2_6 + medial_sO0/OFUT1_Km_OR2_6 + trans_sO0/OFUT1_Km_OR2_6 + TGN_sO0/OFUT1_Km_OR2_6 + Sec_sO0/OFUT1_Km_OR2_6));  // modifiers: Sec_OFUT1
  Sec_reOR2_7: Sec_sO19 + Sec_UDP_Fuc => Sec_sO22 + Sec_UDP; OFUT1_kf_OR2_7*Sec_OFUT1*Sec_sO19*Sec_UDP_Fuc/(OFUT1_Km_OR2_7*OFUT1_Kmd_UDP_Fuc*(1 + Sec_UDP_Fuc/OFUT1_Kmd_UDP_Fuc)*(1 + cis_sO0/OFUT1_Km_OR2_7 + medial_sO0/OFUT1_Km_OR2_7 + trans_sO0/OFUT1_Km_OR2_7 + TGN_sO0/OFUT1_Km_OR2_7 + Sec_sO0/OFUT1_Km_OR2_7));  // modifiers: Sec_OFUT1
  Sec_reOR2_8: Sec_sO20 + Sec_UDP_Fuc => Sec_sO23 + Sec_UDP; OFUT1_kf_OR2_8*Sec_OFUT1*Sec_sO20*Sec_UDP_Fuc/(OFUT1_Km_OR2_8*OFUT1_Kmd_UDP_Fuc*(1 + Sec_UDP_Fuc/OFUT1_Kmd_UDP_Fuc)*(1 + cis_sO0/OFUT1_Km_OR2_8 + medial_sO0/OFUT1_Km_OR2_8 + trans_sO0/OFUT1_Km_OR2_8 + TGN_sO0/OFUT1_Km_OR2_8 + Sec_sO0/OFUT1_Km_OR2_8));  // modifiers: Sec_OFUT1
  Sec_reOR3_0: Sec_sO3 + Sec_UDP_GlcNAc => Sec_sO6 + Sec_UDP; Fringe_kf_OR3_0*Sec_Fringe*Sec_sO3*Sec_UDP_GlcNAc/(Fringe_Km_OR3_0*Fringe_Kmd_UDP_GlcNAc*(1 + Sec_UDP_GlcNAc/Fringe_Kmd_UDP_GlcNAc)*(1 + cis_sO9/Fringe_Km_OR3_0 + medial_sO9/Fringe_Km_OR3_0 + trans_sO9/Fringe_Km_OR3_0 + TGN_sO9/Fringe_Km_OR3_0 + Sec_sO9/Fringe_Km_OR3_0));  // modifiers: Sec_Fringe
  Sec_reOR3_1: Sec_sO4 + Sec_UDP_GlcNAc => Sec_sO7 + Sec_UDP; Fringe_kf_OR3_1*Sec_Fringe*Sec_sO4*Sec_UDP_GlcNAc/(Fringe_Km_OR3_1*Fringe_Kmd_UDP_GlcNAc*(1 + Sec_UDP_GlcNAc/Fringe_Kmd_UDP_GlcNAc)*(1 + cis_sO9/Fringe_Km_OR3_1 + medial_sO9/Fringe_Km_OR3_1 + trans_sO9/Fringe_Km_OR3_1 + TGN_sO9/Fringe_Km_OR3_1 + Sec_sO9/Fringe_Km_OR3_1));  // modifiers: Sec_Fringe
  Sec_reOR3_2: Sec_sO5 + Sec_UDP_GlcNAc => Sec_sO8 + Sec_UDP; Fringe_kf_OR3_2*Sec_Fringe*Sec_sO5*Sec_UDP_GlcNAc/(Fringe_Km_OR3_2*Fringe_Kmd_UDP_GlcNAc*(1 + Sec_UDP_GlcNAc/Fringe_Kmd_UDP_GlcNAc)*(1 + cis_sO9/Fringe_Km_OR3_2 + medial_sO9/Fringe_Km_OR3_2 + trans_sO9/Fringe_Km_OR3_2 + TGN_sO9/Fringe_Km_OR3_2 + Sec_sO9/Fringe_Km_OR3_2));  // modifiers: Sec_Fringe
  Sec_reOR3_3: Sec_sO12 + Sec_UDP_GlcNAc => Sec_sO15 + Sec_UDP; Fringe_kf_OR3_3*Sec_Fringe*Sec_sO12*Sec_UDP_GlcNAc/(Fringe_Km_OR3_3*Fringe_Kmd_UDP_GlcNAc*(1 + Sec_UDP_GlcNAc/Fringe_Kmd_UDP_GlcNAc)*(1 + cis_sO9/Fringe_Km_OR3_3 + medial_sO9/Fringe_Km_OR3_3 + trans_sO9/Fringe_Km_OR3_3 + TGN_sO9/Fringe_Km_OR3_3 + Sec_sO9/Fringe_Km_OR3_3));  // modifiers: Sec_Fringe
  Sec_reOR3_4: Sec_sO13 + Sec_UDP_GlcNAc => Sec_sO16 + Sec_UDP; Fringe_kf_OR3_4*Sec_Fringe*Sec_sO13*Sec_UDP_GlcNAc/(Fringe_Km_OR3_4*Fringe_Kmd_UDP_GlcNAc*(1 + Sec_UDP_GlcNAc/Fringe_Kmd_UDP_GlcNAc)*(1 + cis_sO9/Fringe_Km_OR3_4 + medial_sO9/Fringe_Km_OR3_4 + trans_sO9/Fringe_Km_OR3_4 + TGN_sO9/Fringe_Km_OR3_4 + Sec_sO9/Fringe_Km_OR3_4));  // modifiers: Sec_Fringe
  Sec_reOR3_5: Sec_sO14 + Sec_UDP_GlcNAc => Sec_sO17 + Sec_UDP; Fringe_kf_OR3_5*Sec_Fringe*Sec_sO14*Sec_UDP_GlcNAc/(Fringe_Km_OR3_5*Fringe_Kmd_UDP_GlcNAc*(1 + Sec_UDP_GlcNAc/Fringe_Kmd_UDP_GlcNAc)*(1 + cis_sO9/Fringe_Km_OR3_5 + medial_sO9/Fringe_Km_OR3_5 + trans_sO9/Fringe_Km_OR3_5 + TGN_sO9/Fringe_Km_OR3_5 + Sec_sO9/Fringe_Km_OR3_5));  // modifiers: Sec_Fringe
  Sec_reOR3_6: Sec_sO21 + Sec_UDP_GlcNAc => Sec_sO24 + Sec_UDP; Fringe_kf_OR3_6*Sec_Fringe*Sec_sO21*Sec_UDP_GlcNAc/(Fringe_Km_OR3_6*Fringe_Kmd_UDP_GlcNAc*(1 + Sec_UDP_GlcNAc/Fringe_Kmd_UDP_GlcNAc)*(1 + cis_sO9/Fringe_Km_OR3_6 + medial_sO9/Fringe_Km_OR3_6 + trans_sO9/Fringe_Km_OR3_6 + TGN_sO9/Fringe_Km_OR3_6 + Sec_sO9/Fringe_Km_OR3_6));  // modifiers: Sec_Fringe
  Sec_reOR3_7: Sec_sO22 + Sec_UDP_GlcNAc => Sec_sO25 + Sec_UDP; Fringe_kf_OR3_7*Sec_Fringe*Sec_sO22*Sec_UDP_GlcNAc/(Fringe_Km_OR3_7*Fringe_Kmd_UDP_GlcNAc*(1 + Sec_UDP_GlcNAc/Fringe_Kmd_UDP_GlcNAc)*(1 + cis_sO9/Fringe_Km_OR3_7 + medial_sO9/Fringe_Km_OR3_7 + trans_sO9/Fringe_Km_OR3_7 + TGN_sO9/Fringe_Km_OR3_7 + Sec_sO9/Fringe_Km_OR3_7));  // modifiers: Sec_Fringe
  Sec_reOR4_0: Sec_sO0 + Sec_UDP_Fuc => Sec_sO1 + Sec_UDP; OFUT1_kf_OR4_0*Sec_OFUT1*Sec_sO0*Sec_UDP_Fuc/(OFUT1_Km_OR4_0*OFUT1_Kmd_UDP_Fuc*(1 + Sec_UDP_Fuc/OFUT1_Kmd_UDP_Fuc)*(1 + cis_sO0/OFUT1_Km_OR4_0 + medial_sO0/OFUT1_Km_OR4_0 + trans_sO0/OFUT1_Km_OR4_0 + TGN_sO0/OFUT1_Km_OR4_0 + Sec_sO0/OFUT1_Km_OR4_0));  // modifiers: Sec_OFUT1
  Sec_reOR4_1: Sec_sO3 + Sec_UDP_Fuc => Sec_sO4 + Sec_UDP; OFUT1_kf_OR4_1*Sec_OFUT1*Sec_sO3*Sec_UDP_Fuc/(OFUT1_Km_OR4_1*OFUT1_Kmd_UDP_Fuc*(1 + Sec_UDP_Fuc/OFUT1_Kmd_UDP_Fuc)*(1 + cis_sO0/OFUT1_Km_OR4_1 + medial_sO0/OFUT1_Km_OR4_1 + trans_sO0/OFUT1_Km_OR4_1 + TGN_sO0/OFUT1_Km_OR4_1 + Sec_sO0/OFUT1_Km_OR4_1));  // modifiers: Sec_OFUT1
  Sec_reOR4_2: Sec_sO6 + Sec_UDP_Fuc => Sec_sO7 + Sec_UDP; OFUT1_kf_OR4_2*Sec_OFUT1*Sec_sO6*Sec_UDP_Fuc/(OFUT1_Km_OR4_2*OFUT1_Kmd_UDP_Fuc*(1 + Sec_UDP_Fuc/OFUT1_Kmd_UDP_Fuc)*(1 + cis_sO0/OFUT1_Km_OR4_2 + medial_sO0/OFUT1_Km_OR4_2 + trans_sO0/OFUT1_Km_OR4_2 + TGN_sO0/OFUT1_Km_OR4_2 + Sec_sO0/OFUT1_Km_OR4_2));  // modifiers: Sec_OFUT1
  Sec_reOR4_3: Sec_sO9 + Sec_UDP_Fuc => Sec_sO10 + Sec_UDP; OFUT1_kf_OR4_3*Sec_OFUT1*Sec_sO9*Sec_UDP_Fuc/(OFUT1_Km_OR4_3*OFUT1_Kmd_UDP_Fuc*(1 + Sec_UDP_Fuc/OFUT1_Kmd_UDP_Fuc)*(1 + cis_sO0/OFUT1_Km_OR4_3 + medial_sO0/OFUT1_Km_OR4_3 + trans_sO0/OFUT1_Km_OR4_3 + TGN_sO0/OFUT1_Km_OR4_3 + Sec_sO0/OFUT1_Km_OR4_3));  // modifiers: Sec_OFUT1
  Sec_reOR4_4: Sec_sO12 + Sec_UDP_Fuc => Sec_sO13 + Sec_UDP; OFUT1_kf_OR4_4*Sec_OFUT1*Sec_sO12*Sec_UDP_Fuc/(OFUT1_Km_OR4_4*OFUT1_Kmd_UDP_Fuc*(1 + Sec_UDP_Fuc/OFUT1_Kmd_UDP_Fuc)*(1 + cis_sO0/OFUT1_Km_OR4_4 + medial_sO0/OFUT1_Km_OR4_4 + trans_sO0/OFUT1_Km_OR4_4 + TGN_sO0/OFUT1_Km_OR4_4 + Sec_sO0/OFUT1_Km_OR4_4));  // modifiers: Sec_OFUT1
  Sec_reOR4_5: Sec_sO15 + Sec_UDP_Fuc => Sec_sO16 + Sec_UDP; OFUT1_kf_OR4_5*Sec_OFUT1*Sec_sO15*Sec_UDP_Fuc/(OFUT1_Km_OR4_5*OFUT1_Kmd_UDP_Fuc*(1 + Sec_UDP_Fuc/OFUT1_Kmd_UDP_Fuc)*(1 + cis_sO0/OFUT1_Km_OR4_5 + medial_sO0/OFUT1_Km_OR4_5 + trans_sO0/OFUT1_Km_OR4_5 + TGN_sO0/OFUT1_Km_OR4_5 + Sec_sO0/OFUT1_Km_OR4_5));  // modifiers: Sec_OFUT1
  Sec_reOR4_6: Sec_sO18 + Sec_UDP_Fuc => Sec_sO19 + Sec_UDP; OFUT1_kf_OR4_6*Sec_OFUT1*Sec_sO18*Sec_UDP_Fuc/(OFUT1_Km_OR4_6*OFUT1_Kmd_UDP_Fuc*(1 + Sec_UDP_Fuc/OFUT1_Kmd_UDP_Fuc)*(1 + cis_sO0/OFUT1_Km_OR4_6 + medial_sO0/OFUT1_Km_OR4_6 + trans_sO0/OFUT1_Km_OR4_6 + TGN_sO0/OFUT1_Km_OR4_6 + Sec_sO0/OFUT1_Km_OR4_6));  // modifiers: Sec_OFUT1
  Sec_reOR4_7: Sec_sO21 + Sec_UDP_Fuc => Sec_sO22 + Sec_UDP; OFUT1_kf_OR4_7*Sec_OFUT1*Sec_sO21*Sec_UDP_Fuc/(OFUT1_Km_OR4_7*OFUT1_Kmd_UDP_Fuc*(1 + Sec_UDP_Fuc/OFUT1_Kmd_UDP_Fuc)*(1 + cis_sO0/OFUT1_Km_OR4_7 + medial_sO0/OFUT1_Km_OR4_7 + trans_sO0/OFUT1_Km_OR4_7 + TGN_sO0/OFUT1_Km_OR4_7 + Sec_sO0/OFUT1_Km_OR4_7));  // modifiers: Sec_OFUT1
  Sec_reOR4_8: Sec_sO24 + Sec_UDP_Fuc => Sec_sO25 + Sec_UDP; OFUT1_kf_OR4_8*Sec_OFUT1*Sec_sO24*Sec_UDP_Fuc/(OFUT1_Km_OR4_8*OFUT1_Kmd_UDP_Fuc*(1 + Sec_UDP_Fuc/OFUT1_Kmd_UDP_Fuc)*(1 + cis_sO0/OFUT1_Km_OR4_8 + medial_sO0/OFUT1_Km_OR4_8 + trans_sO0/OFUT1_Km_OR4_8 + TGN_sO0/OFUT1_Km_OR4_8 + Sec_sO0/OFUT1_Km_OR4_8));  // modifiers: Sec_OFUT1
  Sec_reOR5_0: Sec_sO1 + Sec_UDP_GlcNAc => Sec_sO2 + Sec_UDP; Fringe_kf_OR5_0*Sec_Fringe*Sec_sO1*Sec_UDP_GlcNAc/(Fringe_Km_OR5_0*Fringe_Kmd_UDP_GlcNAc*(1 + Sec_UDP_GlcNAc/Fringe_Kmd_UDP_GlcNAc)*(1 + cis_sO9/Fringe_Km_OR5_0 + medial_sO9/Fringe_Km_OR5_0 + trans_sO9/Fringe_Km_OR5_0 + TGN_sO9/Fringe_Km_OR5_0 + Sec_sO9/Fringe_Km_OR5_0));  // modifiers: Sec_Fringe
  Sec_reOR5_1: Sec_sO4 + Sec_UDP_GlcNAc => Sec_sO5 + Sec_UDP; Fringe_kf_OR5_1*Sec_Fringe*Sec_sO4*Sec_UDP_GlcNAc/(Fringe_Km_OR5_1*Fringe_Kmd_UDP_GlcNAc*(1 + Sec_UDP_GlcNAc/Fringe_Kmd_UDP_GlcNAc)*(1 + cis_sO9/Fringe_Km_OR5_1 + medial_sO9/Fringe_Km_OR5_1 + trans_sO9/Fringe_Km_OR5_1 + TGN_sO9/Fringe_Km_OR5_1 + Sec_sO9/Fringe_Km_OR5_1));  // modifiers: Sec_Fringe
  Sec_reOR5_2: Sec_sO7 + Sec_UDP_GlcNAc => Sec_sO8 + Sec_UDP; Fringe_kf_OR5_2*Sec_Fringe*Sec_sO7*Sec_UDP_GlcNAc/(Fringe_Km_OR5_2*Fringe_Kmd_UDP_GlcNAc*(1 + Sec_UDP_GlcNAc/Fringe_Kmd_UDP_GlcNAc)*(1 + cis_sO9/Fringe_Km_OR5_2 + medial_sO9/Fringe_Km_OR5_2 + trans_sO9/Fringe_Km_OR5_2 + TGN_sO9/Fringe_Km_OR5_2 + Sec_sO9/Fringe_Km_OR5_2));  // modifiers: Sec_Fringe
  Sec_reOR5_3: Sec_sO10 + Sec_UDP_GlcNAc => Sec_sO11 + Sec_UDP; Fringe_kf_OR5_3*Sec_Fringe*Sec_sO10*Sec_UDP_GlcNAc/(Fringe_Km_OR5_3*Fringe_Kmd_UDP_GlcNAc*(1 + Sec_UDP_GlcNAc/Fringe_Kmd_UDP_GlcNAc)*(1 + cis_sO9/Fringe_Km_OR5_3 + medial_sO9/Fringe_Km_OR5_3 + trans_sO9/Fringe_Km_OR5_3 + TGN_sO9/Fringe_Km_OR5_3 + Sec_sO9/Fringe_Km_OR5_3));  // modifiers: Sec_Fringe
  Sec_reOR5_4: Sec_sO13 + Sec_UDP_GlcNAc => Sec_sO14 + Sec_UDP; Fringe_kf_OR5_4*Sec_Fringe*Sec_sO13*Sec_UDP_GlcNAc/(Fringe_Km_OR5_4*Fringe_Kmd_UDP_GlcNAc*(1 + Sec_UDP_GlcNAc/Fringe_Kmd_UDP_GlcNAc)*(1 + cis_sO9/Fringe_Km_OR5_4 + medial_sO9/Fringe_Km_OR5_4 + trans_sO9/Fringe_Km_OR5_4 + TGN_sO9/Fringe_Km_OR5_4 + Sec_sO9/Fringe_Km_OR5_4));  // modifiers: Sec_Fringe
  Sec_reOR5_5: Sec_sO16 + Sec_UDP_GlcNAc => Sec_sO17 + Sec_UDP; Fringe_kf_OR5_5*Sec_Fringe*Sec_sO16*Sec_UDP_GlcNAc/(Fringe_Km_OR5_5*Fringe_Kmd_UDP_GlcNAc*(1 + Sec_UDP_GlcNAc/Fringe_Kmd_UDP_GlcNAc)*(1 + cis_sO9/Fringe_Km_OR5_5 + medial_sO9/Fringe_Km_OR5_5 + trans_sO9/Fringe_Km_OR5_5 + TGN_sO9/Fringe_Km_OR5_5 + Sec_sO9/Fringe_Km_OR5_5));  // modifiers: Sec_Fringe
  Sec_reOR5_6: Sec_sO19 + Sec_UDP_GlcNAc => Sec_sO20 + Sec_UDP; Fringe_kf_OR5_6*Sec_Fringe*Sec_sO19*Sec_UDP_GlcNAc/(Fringe_Km_OR5_6*Fringe_Kmd_UDP_GlcNAc*(1 + Sec_UDP_GlcNAc/Fringe_Kmd_UDP_GlcNAc)*(1 + cis_sO9/Fringe_Km_OR5_6 + medial_sO9/Fringe_Km_OR5_6 + trans_sO9/Fringe_Km_OR5_6 + TGN_sO9/Fringe_Km_OR5_6 + Sec_sO9/Fringe_Km_OR5_6));  // modifiers: Sec_Fringe
  Sec_reOR5_7: Sec_sO22 + Sec_UDP_GlcNAc => Sec_sO23 + Sec_UDP; Fringe_kf_OR5_7*Sec_Fringe*Sec_sO22*Sec_UDP_GlcNAc/(Fringe_Km_OR5_7*Fringe_Kmd_UDP_GlcNAc*(1 + Sec_UDP_GlcNAc/Fringe_Kmd_UDP_GlcNAc)*(1 + cis_sO9/Fringe_Km_OR5_7 + medial_sO9/Fringe_Km_OR5_7 + trans_sO9/Fringe_Km_OR5_7 + TGN_sO9/Fringe_Km_OR5_7 + Sec_sO9/Fringe_Km_OR5_7));  // modifiers: Sec_Fringe
  cis_transportO0: cis_sO0 => medial_sO0; cis_transport_O0*cis_sO0;
  cis_transportO9: cis_sO9 => medial_sO9; cis_transport_O9*cis_sO9;
  cis_transportO1: cis_sO1 => medial_sO1; cis_transport_O1*cis_sO1;
  cis_transportO10: cis_sO10 => medial_sO10; cis_transport_O10*cis_sO10;
  cis_transportO2: cis_sO2 => medial_sO2; cis_transport_O2*cis_sO2;
  cis_transportO11: cis_sO11 => medial_sO11; cis_transport_O11*cis_sO11;
  cis_transportO3: cis_sO3 => medial_sO3; cis_transport_O3*cis_sO3;
  cis_transportO12: cis_sO12 => medial_sO12; cis_transport_O12*cis_sO12;
  cis_transportO4: cis_sO4 => medial_sO4; cis_transport_O4*cis_sO4;
  cis_transportO13: cis_sO13 => medial_sO13; cis_transport_O13*cis_sO13;
  cis_transportO5: cis_sO5 => medial_sO5; cis_transport_O5*cis_sO5;
  cis_transportO14: cis_sO14 => medial_sO14; cis_transport_O14*cis_sO14;
  cis_transportO6: cis_sO6 => medial_sO6; cis_transport_O6*cis_sO6;
  cis_transportO15: cis_sO15 => medial_sO15; cis_transport_O15*cis_sO15;
  cis_transportO7: cis_sO7 => medial_sO7; cis_transport_O7*cis_sO7;
  cis_transportO16: cis_sO16 => medial_sO16; cis_transport_O16*cis_sO16;
  cis_transportO8: cis_sO8 => medial_sO8; cis_transport_O8*cis_sO8;
  cis_transportO17: cis_sO17 => medial_sO17; cis_transport_O17*cis_sO17;
  cis_transportO18: cis_sO18 => medial_sO18; cis_transport_O18*cis_sO18;
  cis_transportO19: cis_sO19 => medial_sO19; cis_transport_O19*cis_sO19;
  cis_transportO20: cis_sO20 => medial_sO20; cis_transport_O20*cis_sO20;
  cis_transportO21: cis_sO21 => medial_sO21; cis_transport_O21*cis_sO21;
  cis_transportO22: cis_sO22 => medial_sO22; cis_transport_O22*cis_sO22;
  cis_transportO23: cis_sO23 => medial_sO23; cis_transport_O23*cis_sO23;
  cis_transportO24: cis_sO24 => medial_sO24; cis_transport_O24*cis_sO24;
  cis_transportO25: cis_sO25 => medial_sO25; cis_transport_O25*cis_sO25;
  medial_transportO0: medial_sO0 => trans_sO0; medial_transport_O0*medial_sO0;
  medial_transportO9: medial_sO9 => trans_sO9; medial_transport_O9*medial_sO9;
  medial_transportO1: medial_sO1 => trans_sO1; medial_transport_O1*medial_sO1;
  medial_transportO10: medial_sO10 => trans_sO10; medial_transport_O10*medial_sO10;
  medial_transportO2: medial_sO2 => trans_sO2; medial_transport_O2*medial_sO2;
  medial_transportO11: medial_sO11 => trans_sO11; medial_transport_O11*medial_sO11;
  medial_transportO3: medial_sO3 => trans_sO3; medial_transport_O3*medial_sO3;
  medial_transportO12: medial_sO12 => trans_sO12; medial_transport_O12*medial_sO12;
  medial_transportO4: medial_sO4 => trans_sO4; medial_transport_O4*medial_sO4;
  medial_transportO13: medial_sO13 => trans_sO13; medial_transport_O13*medial_sO13;
  medial_transportO5: medial_sO5 => trans_sO5; medial_transport_O5*medial_sO5;
  medial_transportO14: medial_sO14 => trans_sO14; medial_transport_O14*medial_sO14;
  medial_transportO6: medial_sO6 => trans_sO6; medial_transport_O6*medial_sO6;
  medial_transportO15: medial_sO15 => trans_sO15; medial_transport_O15*medial_sO15;
  medial_transportO7: medial_sO7 => trans_sO7; medial_transport_O7*medial_sO7;
  medial_transportO16: medial_sO16 => trans_sO16; medial_transport_O16*medial_sO16;
  medial_transportO8: medial_sO8 => trans_sO8; medial_transport_O8*medial_sO8;
  medial_transportO17: medial_sO17 => trans_sO17; medial_transport_O17*medial_sO17;
  medial_transportO18: medial_sO18 => trans_sO18; medial_transport_O18*medial_sO18;
  medial_transportO19: medial_sO19 => trans_sO19; medial_transport_O19*medial_sO19;
  medial_transportO20: medial_sO20 => trans_sO20; medial_transport_O20*medial_sO20;
  medial_transportO21: medial_sO21 => trans_sO21; medial_transport_O21*medial_sO21;
  medial_transportO22: medial_sO22 => trans_sO22; medial_transport_O22*medial_sO22;
  medial_transportO23: medial_sO23 => trans_sO23; medial_transport_O23*medial_sO23;
  medial_transportO24: medial_sO24 => trans_sO24; medial_transport_O24*medial_sO24;
  medial_transportO25: medial_sO25 => trans_sO25; medial_transport_O25*medial_sO25;
  trans_transportO0: trans_sO0 => TGN_sO0; trans_transport_O0*trans_sO0;
  trans_transportO9: trans_sO9 => TGN_sO9; trans_transport_O9*trans_sO9;
  trans_transportO1: trans_sO1 => TGN_sO1; trans_transport_O1*trans_sO1;
  trans_transportO10: trans_sO10 => TGN_sO10; trans_transport_O10*trans_sO10;
  trans_transportO2: trans_sO2 => TGN_sO2; trans_transport_O2*trans_sO2;
  trans_transportO11: trans_sO11 => TGN_sO11; trans_transport_O11*trans_sO11;
  trans_transportO3: trans_sO3 => TGN_sO3; trans_transport_O3*trans_sO3;
  trans_transportO12: trans_sO12 => TGN_sO12; trans_transport_O12*trans_sO12;
  trans_transportO4: trans_sO4 => TGN_sO4; trans_transport_O4*trans_sO4;
  trans_transportO13: trans_sO13 => TGN_sO13; trans_transport_O13*trans_sO13;
  trans_transportO5: trans_sO5 => TGN_sO5; trans_transport_O5*trans_sO5;
  trans_transportO14: trans_sO14 => TGN_sO14; trans_transport_O14*trans_sO14;
  trans_transportO6: trans_sO6 => TGN_sO6; trans_transport_O6*trans_sO6;
  trans_transportO15: trans_sO15 => TGN_sO15; trans_transport_O15*trans_sO15;
  trans_transportO7: trans_sO7 => TGN_sO7; trans_transport_O7*trans_sO7;
  trans_transportO16: trans_sO16 => TGN_sO16; trans_transport_O16*trans_sO16;
  trans_transportO8: trans_sO8 => TGN_sO8; trans_transport_O8*trans_sO8;
  trans_transportO17: trans_sO17 => TGN_sO17; trans_transport_O17*trans_sO17;
  trans_transportO18: trans_sO18 => TGN_sO18; trans_transport_O18*trans_sO18;
  trans_transportO19: trans_sO19 => TGN_sO19; trans_transport_O19*trans_sO19;
  trans_transportO20: trans_sO20 => TGN_sO20; trans_transport_O20*trans_sO20;
  trans_transportO21: trans_sO21 => TGN_sO21; trans_transport_O21*trans_sO21;
  trans_transportO22: trans_sO22 => TGN_sO22; trans_transport_O22*trans_sO22;
  trans_transportO23: trans_sO23 => TGN_sO23; trans_transport_O23*trans_sO23;
  trans_transportO24: trans_sO24 => TGN_sO24; trans_transport_O24*trans_sO24;
  trans_transportO25: trans_sO25 => TGN_sO25; trans_transport_O25*trans_sO25;
  TGN_transportO0: TGN_sO0 => Sec_sO0; TGN_transport_O0*TGN_sO0;
  TGN_transportO9: TGN_sO9 => Sec_sO9; TGN_transport_O9*TGN_sO9;
  TGN_transportO1: TGN_sO1 => Sec_sO1; TGN_transport_O1*TGN_sO1;
  TGN_transportO10: TGN_sO10 => Sec_sO10; TGN_transport_O10*TGN_sO10;
  TGN_transportO2: TGN_sO2 => Sec_sO2; TGN_transport_O2*TGN_sO2;
  TGN_transportO11: TGN_sO11 => Sec_sO11; TGN_transport_O11*TGN_sO11;
  TGN_transportO3: TGN_sO3 => Sec_sO3; TGN_transport_O3*TGN_sO3;
  TGN_transportO12: TGN_sO12 => Sec_sO12; TGN_transport_O12*TGN_sO12;
  TGN_transportO4: TGN_sO4 => Sec_sO4; TGN_transport_O4*TGN_sO4;
  TGN_transportO13: TGN_sO13 => Sec_sO13; TGN_transport_O13*TGN_sO13;
  TGN_transportO5: TGN_sO5 => Sec_sO5; TGN_transport_O5*TGN_sO5;
  TGN_transportO14: TGN_sO14 => Sec_sO14; TGN_transport_O14*TGN_sO14;
  TGN_transportO6: TGN_sO6 => Sec_sO6; TGN_transport_O6*TGN_sO6;
  TGN_transportO15: TGN_sO15 => Sec_sO15; TGN_transport_O15*TGN_sO15;
  TGN_transportO7: TGN_sO7 => Sec_sO7; TGN_transport_O7*TGN_sO7;
  TGN_transportO16: TGN_sO16 => Sec_sO16; TGN_transport_O16*TGN_sO16;
  TGN_transportO8: TGN_sO8 => Sec_sO8; TGN_transport_O8*TGN_sO8;
  TGN_transportO17: TGN_sO17 => Sec_sO17; TGN_transport_O17*TGN_sO17;
  TGN_transportO18: TGN_sO18 => Sec_sO18; TGN_transport_O18*TGN_sO18;
  TGN_transportO19: TGN_sO19 => Sec_sO19; TGN_transport_O19*TGN_sO19;
  TGN_transportO20: TGN_sO20 => Sec_sO20; TGN_transport_O20*TGN_sO20;
  TGN_transportO21: TGN_sO21 => Sec_sO21; TGN_transport_O21*TGN_sO21;
  TGN_transportO22: TGN_sO22 => Sec_sO22; TGN_transport_O22*TGN_sO22;
  TGN_transportO23: TGN_sO23 => Sec_sO23; TGN_transport_O23*TGN_sO23;
  TGN_transportO24: TGN_sO24 => Sec_sO24; TGN_transport_O24*TGN_sO24;
  TGN_transportO25: TGN_sO25 => Sec_sO25; TGN_transport_O25*TGN_sO25;

  // Unit definitions:
  unit minute = 60 second;
  unit micro_mole = 1e-6 mole;
  unit per_minute = 1 / (60 second);
  unit micro_molar = 1e-6 mole / litre;
end
