// SBML level 3 version 1

model testmodel()
  // model units - substance: micro_mole, time: minute, volume: litre, extent: micro_mole

  // Compartments:
  compartment TGN = 1 litre;

  // Species:
  species TGN_OFUT1 in TGN = 1;
  species TGN_Fringe in TGN = 1;
  species TGN_UDP_Fuc in TGN = 1;
  species TGN_UDP in TGN = 1;
  species TGN_UDP_GlcNAc in TGN = 1;
  species TGN_sO0 in TGN = 1; TGN_sO0 is "TGN_;Notch_:";
  species TGN_sO1 in TGN = 1; TGN_sO1 is "TGN_Fa;Notch_:12";
  species TGN_sO2 in TGN = 1; TGN_sO2 is "TGN_GNb3Fa;Notch_:12";
  species TGN_sO4 in TGN = 1; TGN_sO4 is "TGN_Fa;Notch_:8";
  species TGN_sO5 in TGN = 1; TGN_sO5 is "TGN_GNb3Fa;Notch_:8";
  species TGN_sO7 in TGN = 1; TGN_sO7 is "TGN_Fa;Notch_:9";
  species TGN_sO8 in TGN = 1; TGN_sO8 is "TGN_GNb3Fa;Notch_:9";

  // Parameters:
  OFUT1_kf_OR0 = 1 per_minute;
  OFUT1_Km_OR0 = 1 micro_molar;
  OFUT1_Kmd_UDP_Fuc = 1 micro_molar;
  Fringe_kf_OR1 = 1 per_minute;
  Fringe_Km_OR1 = 1 micro_molar;
  Fringe_Kmd_UDP_GlcNAc = 1 micro_molar;
  OFUT1_kf_OR2 = 1 per_minute;
  OFUT1_Km_OR2 = 1 micro_molar;
  Fringe_kf_OR3 = 1 per_minute;
  Fringe_Km_OR3 = 1 micro_molar;
  OFUT1_kf_OR4 = 1 per_minute;
  OFUT1_Km_OR4 = 1 micro_molar;
  Fringe_kf_OR5 = 1 per_minute;
  Fringe_Km_OR5 = 1 micro_molar;

  // Reactions:
  TGN_reOR0: TGN_sO0 + TGN_UDP_Fuc => TGN_sO1 + TGN_UDP; OFUT1_kf_OR0*TGN_OFUT1*TGN_sO0*TGN_UDP_Fuc/(OFUT1_Km_OR0*OFUT1_Kmd_UDP_Fuc*(1 + TGN_UDP_Fuc/OFUT1_Kmd_UDP_Fuc)*(1 + TGN_sO0/OFUT1_Km_OR0));  // modifiers: TGN_OFUT1
  TGN_reOR1: TGN_sO1 + TGN_UDP_GlcNAc => TGN_sO2 + TGN_UDP; Fringe_kf_OR1*TGN_Fringe*TGN_sO1*TGN_UDP_GlcNAc/(Fringe_Km_OR1*Fringe_Kmd_UDP_GlcNAc*(1 + TGN_UDP_GlcNAc/Fringe_Kmd_UDP_GlcNAc)*(1 + TGN_sO1/Fringe_Km_OR1));  // modifiers: TGN_Fringe
  TGN_reOR2: TGN_sO0 + TGN_UDP_Fuc => TGN_sO4 + TGN_UDP; OFUT1_kf_OR2*TGN_OFUT1*TGN_sO0*TGN_UDP_Fuc/(OFUT1_Km_OR2*OFUT1_Kmd_UDP_Fuc*(1 + TGN_UDP_Fuc/OFUT1_Kmd_UDP_Fuc)*(1 + TGN_sO0/OFUT1_Km_OR2));  // modifiers: TGN_OFUT1
  TGN_reOR3: TGN_sO4 + TGN_UDP_GlcNAc => TGN_sO5 + TGN_UDP; Fringe_kf_OR3*TGN_Fringe*TGN_sO4*TGN_UDP_GlcNAc/(Fringe_Km_OR3*Fringe_Kmd_UDP_GlcNAc*(1 + TGN_UDP_GlcNAc/Fringe_Kmd_UDP_GlcNAc)*(1 + TGN_sO1/Fringe_Km_OR3));  // modifiers: TGN_Fringe
  TGN_reOR4: TGN_sO0 + TGN_UDP_Fuc => TGN_sO7 + TGN_UDP; OFUT1_kf_OR4*TGN_OFUT1*TGN_sO0*TGN_UDP_Fuc/(OFUT1_Km_OR4*OFUT1_Kmd_UDP_Fuc*(1 + TGN_UDP_Fuc/OFUT1_Kmd_UDP_Fuc)*(1 + TGN_sO0/OFUT1_Km_OR4));  // modifiers: TGN_OFUT1
  TGN_reOR5: TGN_sO7 + TGN_UDP_GlcNAc => TGN_sO8 + TGN_UDP; Fringe_kf_OR5*TGN_Fringe*TGN_sO7*TGN_UDP_GlcNAc/(Fringe_Km_OR5*Fringe_Kmd_UDP_GlcNAc*(1 + TGN_UDP_GlcNAc/Fringe_Kmd_UDP_GlcNAc)*(1 + TGN_sO1/Fringe_Km_OR5));  // modifiers: TGN_Fringe

  // Unit definitions:
  unit minute = 60 second;
  unit micro_mole = 1e-6 mole;
  unit per_minute = 1 / (60 second);
  unit micro_molar = 1e-6 mole / litre;
end
