// SBML level 3 version 1

model testmodel()
  // model units - substance: micro_mole, time: minute, volume: litre, extent: micro_mole

  // Compartments:
  compartment cis = 1 litre;
  compartment medial = 1 litre;
  compartment trans = 1 litre;
  compartment TGN = 1 litre;
  compartment Sec = 1 litre;

  // Species:
  species cis_MAN1_1 in cis = 1;
  species cis_MAN1_2 in cis = 1;
  species cis_sN1 in cis = 1; cis_sN1 is "cis_Ma2Ma2Ma3(Ma3(Ma2Ma6)Ma6)Mb4GNb4GNb;N";
  species cis_sN2 in cis = 0; cis_sN2 is "cis_Ma2Ma2Ma3(Ma3(Ma6)Ma6)Mb4GNb4GNb;N";
  species cis_sN3 in cis = 0; cis_sN3 is "cis_Ma2Ma3(Ma3(Ma6)Ma6)Mb4GNb4GNb;N";
  species medial_MAN1_1 in medial = 1;
  species medial_MAN1_2 in medial = 1;
  species medial_sN1 in medial = 0; medial_sN1 is "medial_Ma2Ma2Ma3(Ma3(Ma2Ma6)Ma6)Mb4GNb4GNb;N";
  species medial_sN2 in medial = 0; medial_sN2 is "medial_Ma2Ma2Ma3(Ma3(Ma6)Ma6)Mb4GNb4GNb;N";
  species medial_sN3 in medial = 0; medial_sN3 is "medial_Ma2Ma3(Ma3(Ma6)Ma6)Mb4GNb4GNb;N";
  species trans_MAN1_1 in trans = 0;
  species trans_MAN1_2 in trans = 0;
  species trans_sN1 in trans = 0; trans_sN1 is "trans_Ma2Ma2Ma3(Ma3(Ma2Ma6)Ma6)Mb4GNb4GNb;N";
  species trans_sN2 in trans = 0; trans_sN2 is "trans_Ma2Ma2Ma3(Ma3(Ma6)Ma6)Mb4GNb4GNb;N";
  species trans_sN3 in trans = 0; trans_sN3 is "trans_Ma2Ma3(Ma3(Ma6)Ma6)Mb4GNb4GNb;N";
  species TGN_MAN1_1 in TGN = 0;
  species TGN_MAN1_2 in TGN = 0;
  species TGN_sN1 in TGN = 0; TGN_sN1 is "TGN_Ma2Ma2Ma3(Ma3(Ma2Ma6)Ma6)Mb4GNb4GNb;N";
  species TGN_sN2 in TGN = 0; TGN_sN2 is "TGN_Ma2Ma2Ma3(Ma3(Ma6)Ma6)Mb4GNb4GNb;N";
  species TGN_sN3 in TGN = 0; TGN_sN3 is "TGN_Ma2Ma3(Ma3(Ma6)Ma6)Mb4GNb4GNb;N";
  species Sec_MAN1_1 in Sec = 0;
  species Sec_MAN1_2 in Sec = 0;
  species Sec_sN1 in Sec = 0; Sec_sN1 is "Sec_Ma2Ma2Ma3(Ma3(Ma2Ma6)Ma6)Mb4GNb4GNb;N";
  species Sec_sN2 in Sec = 0; Sec_sN2 is "Sec_Ma2Ma2Ma3(Ma3(Ma6)Ma6)Mb4GNb4GNb;N";
  species Sec_sN3 in Sec = 0; Sec_sN3 is "Sec_Ma2Ma3(Ma3(Ma6)Ma6)Mb4GNb4GNb;N";

  // Parameters:
  MAN1_1_kf_NR1 = 1 per_minute;
  MAN1_1_Km_NR1 = 1 micro_molar;
  MAN1_2_kf_NR2 = 1 per_minute;
  MAN1_2_Km_NR2 = 1 micro_molar;
  cis_transport_N1 = 0.18 per_minute;
  cis_transport_N2 = 0.18 per_minute;
  cis_transport_N3 = 0.18 per_minute;
  medial_transport_N1 = 0.18 per_minute;
  medial_transport_N2 = 0.18 per_minute;
  medial_transport_N3 = 0.18 per_minute;
  trans_transport_N1 = 0.18 per_minute;
  trans_transport_N2 = 0.18 per_minute;
  trans_transport_N3 = 0.18 per_minute;
  TGN_transport_N1 = 0.18 per_minute;
  TGN_transport_N2 = 0.18 per_minute;
  TGN_transport_N3 = 0.18 per_minute;

  // Reactions:
  cis_reNR1: cis_sN1 => cis_sN2; MAN1_1_kf_NR1*cis_MAN1_1*cis_sN1/((1 + cis_sN1/MAN1_1_Km_NR1)*MAN1_1_Km_NR1);  // modifiers: cis_MAN1_1
  cis_reNR2: cis_sN2 => cis_sN3; MAN1_2_kf_NR2*cis_MAN1_2*cis_sN2/((1 + cis_sN2/MAN1_2_Km_NR2)*MAN1_2_Km_NR2);  // modifiers: cis_MAN1_2
  medial_reNR1: medial_sN1 => medial_sN2; MAN1_1_kf_NR1*medial_MAN1_1*medial_sN1/((1 + cis_sN1/MAN1_1_Km_NR1 + medial_sN1/MAN1_1_Km_NR1)*MAN1_1_Km_NR1);  // modifiers: medial_MAN1_1
  medial_reNR2: medial_sN2 => medial_sN3; MAN1_2_kf_NR2*medial_MAN1_2*medial_sN2/((1 + cis_sN2/MAN1_2_Km_NR2 + medial_sN2/MAN1_2_Km_NR2)*MAN1_2_Km_NR2);  // modifiers: medial_MAN1_2
  cis_transportN1: cis_sN1 => medial_sN1; cis_transport_N1*cis_sN1;
  cis_transportN2: cis_sN2 => medial_sN2; cis_transport_N2*cis_sN2;
  cis_transportN3: cis_sN3 => medial_sN3; cis_transport_N3*cis_sN3;
  medial_transportN1: medial_sN1 => trans_sN1; medial_transport_N1*medial_sN1;
  medial_transportN2: medial_sN2 => trans_sN2; medial_transport_N2*medial_sN2;
  medial_transportN3: medial_sN3 => trans_sN3; medial_transport_N3*medial_sN3;
  trans_transportN1: trans_sN1 => TGN_sN1; trans_transport_N1*trans_sN1;
  trans_transportN2: trans_sN2 => TGN_sN2; trans_transport_N2*trans_sN2;
  trans_transportN3: trans_sN3 => TGN_sN3; trans_transport_N3*trans_sN3;
  TGN_transportN1: TGN_sN1 => Sec_sN1; TGN_transport_N1*TGN_sN1;
  TGN_transportN2: TGN_sN2 => Sec_sN2; TGN_transport_N2*TGN_sN2;
  TGN_transportN3: TGN_sN3 => Sec_sN3; TGN_transport_N3*TGN_sN3;

  // Unit definitions:
  unit minute = 60 second;
  unit micro_mole = 1e-6 mole;
  unit per_minute = 1 / (60 second);
  unit micro_molar = 1e-6 mole / litre;
end
